<?xml version="1.0" encoding="UTF-8"?>
<channelml xmlns="http://morphml.org/channelml/schema"
           xmlns:xsi="http://www.w3.org/2001/XMLSchema-instance"
           xmlns:meta="http://morphml.org/metadata/schema"
           xsi:schemaLocation="http://morphml.org/channelml/schema  http://www.neuroml.org/NeuroMLValidator/NeuroMLFiles/Schemata/v1.8.1/Level2/ChannelML_v1.8.1.xsd"
           units="Physiological Units">

    <meta:notes>ChannelML file based on Traub et al. 2003</meta:notes>

    <channel_type name="Ca">

        <status value="in_progress">
            <meta:comment> Note: This is not (yet) based on experimental data from C. elegans</meta:comment>
            <meta:contributor>
                <meta:name>Stephen Larson</meta:name>
            </meta:contributor>
            <meta:contributor>
                <meta:name>Padraig Gleeson</meta:name>
            </meta:contributor>
        </status>

        <parameters>
            <parameter name="m0" value ="0"/>
        </parameters>

        <current_voltage_relation cond_law="ohmic" ion="ar" default_gmax="0.25" default_erev="-35">

            <gate name="m" instances="1">
                <closed_state id="mc"/>
                <open_state id="m"/>

                     <!-- An *incorrect* initialisation value for this, in order to compare to original mod file. Normally ignored-->
                <initialisation value="m0"/>

                     <!-- Note, extra brackets required to allow use of equation on GENESIS...-->
                <time_course name="tau" from="mc" to="m" expr_form="generic" expr="1 /((exp (-14.6 - (0.086 * v) )) + (exp (-1.87 + (0.07 * v))))" />

                <steady_state name="inf" from="mc" to="m" expr_form="sigmoid" rate="1" scale="5.5" midpoint="-75" />

            </gate>

        </current_voltage_relation>

        <impl_prefs>
            <comment>Using broad range of voltages for sufficient coverage</comment>
            <table_settings max_v="60" min_v="-120" table_divisions="741"/>
        </impl_prefs>

    </channel_type>
</channelml>
