<?xml version="1.0" encoding="UTF-8"?>
<neuroml xmlns="http://www.neuroml.org/schema/neuroml2" xmlns:xsi="http://www.w3.org/2001/XMLSchema-instance" xsi:schemaLocation="http://www.neuroml.org/schema/neuroml2  http://neuroml.svn.sourceforge.net/viewvc/neuroml/NeuroML2/Schemas/NeuroML2/NeuroML_v2alpha.xsd" id="network_CElegans">

<notes>

Network structure (NeuroML 2.x) for project: CElegans saved with neuroConstruct v1.6.0 on: 17:31:51, 23-Aug-12

Cell Group: RIVL contains 1 cells
Cell Group: URBR contains 1 cells
Cell Group: SABD contains 1 cells
Cell Group: URBL contains 1 cells
Cell Group: DB7 contains 1 cells
Cell Group: DB6 contains 1 cells
Cell Group: DB5 contains 1 cells
Cell Group: DB4 contains 1 cells
Cell Group: DB3 contains 1 cells
Cell Group: DB2 contains 1 cells
Cell Group: IL1VR contains 1 cells
Cell Group: DB1 contains 1 cells
Cell Group: IL1VL contains 1 cells
Cell Group: URYVR contains 1 cells
Cell Group: BAGR contains 1 cells
Cell Group: URYVL contains 1 cells
Cell Group: BAGL contains 1 cells
Cell Group: DA9 contains 1 cells
Cell Group: DA8 contains 1 cells
Cell Group: AIBR contains 1 cells
Cell Group: DA7 contains 1 cells
Cell Group: DA6 contains 1 cells
Cell Group: DA5 contains 1 cells
Cell Group: DA4 contains 1 cells
Cell Group: AUAR contains 1 cells
Cell Group: DA3 contains 1 cells
Cell Group: DA2 contains 1 cells
Cell Group: AIBL contains 1 cells
Cell Group: DA1 contains 1 cells
Cell Group: AUAL contains 1 cells
Cell Group: URXR contains 1 cells
Cell Group: PVDR contains 1 cells
Cell Group: URXL contains 1 cells
Cell Group: PVDL contains 1 cells
Cell Group: AIZR contains 1 cells
Cell Group: AS9 contains 1 cells
Cell Group: AS8 contains 1 cells
Cell Group: AS7 contains 1 cells
Cell Group: AS6 contains 1 cells
Cell Group: AS5 contains 1 cells
Cell Group: AS4 contains 1 cells
Cell Group: AIZL contains 1 cells
Cell Group: AS3 contains 1 cells
Cell Group: AS2 contains 1 cells
Cell Group: AIAR contains 1 cells
Cell Group: AS1 contains 1 cells
Cell Group: URAVR contains 1 cells
Cell Group: AIAL contains 1 cells
Cell Group: URAVL contains 1 cells
Cell Group: PVCR contains 1 cells
Cell Group: OLLR contains 1 cells
Cell Group: PVCL contains 1 cells
Cell Group: AIYR contains 1 cells
Cell Group: OLLL contains 1 cells
Cell Group: AIYL contains 1 cells
Cell Group: AQR contains 1 cells
Cell Group: PVT contains 1 cells
Cell Group: PVR contains 1 cells
Cell Group: PVM contains 1 cells
Cell Group: VA12 contains 1 cells
Cell Group: VA11 contains 1 cells
Cell Group: NSMR contains 1 cells
Cell Group: VA10 contains 1 cells
Cell Group: HSNR contains 1 cells
Cell Group: RIS contains 1 cells
Cell Group: NSML contains 1 cells
Cell Group: RIR contains 1 cells
Cell Group: ADFR contains 1 cells
Cell Group: HSNL contains 1 cells
Cell Group: ASKR contains 1 cells
Cell Group: ADFL contains 1 cells
Cell Group: ASKL contains 1 cells
Cell Group: RIH contains 1 cells
Cell Group: RID contains 1 cells
Cell Group: SMBVR contains 1 cells
Cell Group: DVC contains 1 cells
Cell Group: RIPR contains 1 cells
Cell Group: DVB contains 1 cells
Cell Group: DVA contains 1 cells
Cell Group: PLNR contains 1 cells
Cell Group: ADER contains 1 cells
Cell Group: SMBVL contains 1 cells
Cell Group: RIPL contains 1 cells
Cell Group: ASJR contains 1 cells
Cell Group: PLNL contains 1 cells
Cell Group: ADEL contains 1 cells
Cell Group: ASJL contains 1 cells
Cell Group: CEPDR contains 1 cells
Cell Group: IL2R contains 1 cells
Cell Group: CEPDL contains 1 cells
Cell Group: IL2L contains 1 cells
Cell Group: PLMR contains 1 cells
Cell Group: OLQDR contains 1 cells
Cell Group: ASIR contains 1 cells
Cell Group: PLML contains 1 cells
Cell Group: OLQDL contains 1 cells
Cell Group: ASIL contains 1 cells
Cell Group: IL1R contains 1 cells
Cell Group: AS11 contains 1 cells
Cell Group: AS10 contains 1 cells
Cell Group: SAADR contains 1 cells
Cell Group: IL1L contains 1 cells
Cell Group: SAADL contains 1 cells
Cell Group: SABVR contains 1 cells
Cell Group: SIBDR contains 1 cells
Cell Group: ASHR contains 1 cells
Cell Group: SABVL contains 1 cells
Cell Group: SIBDL contains 1 cells
Cell Group: ASHL contains 1 cells
Cell Group: PVWR contains 1 cells
Cell Group: M3R contains 1 cells
Cell Group: PVWL contains 1 cells
Cell Group: RIMR contains 1 cells
Cell Group: M3L contains 1 cells
Cell Group: RIML contains 1 cells
Cell Group: ASGR contains 1 cells
Cell Group: ASGL contains 1 cells
Cell Group: PQR contains 1 cells
Cell Group: M2R contains 1 cells
Cell Group: ALA contains 1 cells
Cell Group: M2L contains 1 cells
Cell Group: ADAR contains 1 cells
Cell Group: I2R contains 1 cells
Cell Group: ADAL contains 1 cells
Cell Group: I2L contains 1 cells
Cell Group: VD9 contains 1 cells
Cell Group: VD8 contains 1 cells
Cell Group: VD7 contains 1 cells
Cell Group: VD6 contains 1 cells
Cell Group: VD5 contains 1 cells
Cell Group: VD4 contains 1 cells
Cell Group: VD13 contains 1 cells
Cell Group: VD3 contains 1 cells
Cell Group: VD12 contains 1 cells
Cell Group: VD2 contains 1 cells
Cell Group: VD11 contains 1 cells
Cell Group: VD1 contains 1 cells
Cell Group: VD10 contains 1 cells
Cell Group: I1R contains 1 cells
Cell Group: AVKR contains 1 cells
Cell Group: ASER contains 1 cells
Cell Group: I1L contains 1 cells
Cell Group: AVKL contains 1 cells
Cell Group: SMDDR contains 1 cells
Cell Group: ASEL contains 1 cells
Cell Group: SMDDL contains 1 cells
Cell Group: VC6 contains 1 cells
Cell Group: VC5 contains 1 cells
Cell Group: VC4 contains 1 cells
Cell Group: VC3 contains 1 cells
Cell Group: VC2 contains 1 cells
Cell Group: VC1 contains 1 cells
Cell Group: AVJR contains 1 cells
Cell Group: AVJL contains 1 cells
Cell Group: VB9 contains 1 cells
Cell Group: VB8 contains 1 cells
Cell Group: VB7 contains 1 cells
Cell Group: VB6 contains 1 cells
Cell Group: VB5 contains 1 cells
Cell Group: VB4 contains 1 cells
Cell Group: VB3 contains 1 cells
Cell Group: VB2 contains 1 cells
Cell Group: VB1 contains 1 cells
Cell Group: AWCR contains 1 cells
Cell Group: RMDDR contains 1 cells
Cell Group: AWCL contains 1 cells
Cell Group: CEPVR contains 1 cells
Cell Group: RMDDL contains 1 cells
Cell Group: CEPVL contains 1 cells
Cell Group: IL2DR contains 1 cells
Cell Group: VA9 contains 1 cells
Cell Group: VA8 contains 1 cells
Cell Group: VA7 contains 1 cells
Cell Group: VA6 contains 1 cells
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</notes>

    <network id="network_CElegans">

        <extracellularProperties temperature="6.3 degC"/>

        <population id="RIVL" component="RIVL" size="1"/>

        <population id="URBR" component="URBR" size="1"/>

        <population id="SABD" component="SABD" size="1"/>

        <population id="URBL" component="URBL" size="1"/>

        <population id="DB7" component="DB7" size="1"/>

        <population id="DB6" component="DB6" size="1"/>

        <population id="DB5" component="DB5" size="1"/>

        <population id="DB4" component="DB4" size="1"/>

        <population id="DB3" component="DB3" size="1"/>

        <population id="DB2" component="DB2" size="1"/>

        <population id="IL1VR" component="IL1VR" size="1"/>

        <population id="DB1" component="DB1" size="1"/>

        <population id="IL1VL" component="IL1VL" size="1"/>

        <population id="URYVR" component="URYVR" size="1"/>

        <population id="BAGR" component="BAGR" size="1"/>

        <population id="URYVL" component="URYVL" size="1"/>

        <population id="BAGL" component="BAGL" size="1"/>

        <population id="DA9" component="DA9" size="1"/>

        <population id="DA8" component="DA8" size="1"/>

        <population id="AIBR" component="AIBR" size="1"/>

        <population id="DA7" component="DA7" size="1"/>

        <population id="DA6" component="DA6" size="1"/>

        <population id="DA5" component="DA5" size="1"/>

        <population id="DA4" component="DA4" size="1"/>

        <population id="AUAR" component="AUAR" size="1"/>

        <population id="DA3" component="DA3" size="1"/>

        <population id="DA2" component="DA2" size="1"/>

        <population id="AIBL" component="AIBL" size="1"/>

        <population id="DA1" component="DA1" size="1"/>

        <population id="AUAL" component="AUAL" size="1"/>

        <population id="URXR" component="URXR" size="1"/>

        <population id="PVDR" component="PVDR" size="1"/>

        <population id="URXL" component="URXL" size="1"/>

        <population id="PVDL" component="PVDL" size="1"/>

        <population id="AIZR" component="AIZR" size="1"/>

        <population id="AS9" component="AS9" size="1"/>

        <population id="AS8" component="AS8" size="1"/>

        <population id="AS7" component="AS7" size="1"/>

        <population id="AS6" component="AS6" size="1"/>

        <population id="AS5" component="AS5" size="1"/>

        <population id="AS4" component="AS4" size="1"/>

        <population id="AIZL" component="AIZL" size="1"/>

        <population id="AS3" component="AS3" size="1"/>

        <population id="AS2" component="AS2" size="1"/>

        <population id="AIAR" component="AIAR" size="1"/>

        <population id="AS1" component="AS1" size="1"/>

        <population id="URAVR" component="URAVR" size="1"/>

        <population id="AIAL" component="AIAL" size="1"/>

        <population id="URAVL" component="URAVL" size="1"/>

        <population id="PVCR" component="PVCR" size="1"/>

        <population id="OLLR" component="OLLR" size="1"/>

        <population id="PVCL" component="PVCL" size="1"/>

        <population id="AIYR" component="AIYR" size="1"/>

        <population id="OLLL" component="OLLL" size="1"/>

        <population id="AIYL" component="AIYL" size="1"/>

        <population id="AQR" component="AQR" size="1"/>

        <population id="PVT" component="PVT" size="1"/>

        <population id="PVR" component="PVR" size="1"/>

        <population id="PVM" component="PVM" size="1"/>

        <population id="VA12" component="VA12" size="1"/>

        <population id="VA11" component="VA11" size="1"/>

        <population id="NSMR" component="NSMR" size="1"/>

        <population id="VA10" component="VA10" size="1"/>

        <population id="HSNR" component="HSNR" size="1"/>

        <population id="RIS" component="RIS" size="1"/>

        <population id="NSML" component="NSML" size="1"/>

        <population id="RIR" component="RIR" size="1"/>

        <population id="ADFR" component="ADFR" size="1"/>

        <population id="HSNL" component="HSNL" size="1"/>

        <population id="ASKR" component="ASKR" size="1"/>

        <population id="ADFL" component="ADFL" size="1"/>

        <population id="ASKL" component="ASKL" size="1"/>

        <population id="RIH" component="RIH" size="1"/>

        <population id="RID" component="RID" size="1"/>

        <population id="SMBVR" component="SMBVR" size="1"/>

        <population id="DVC" component="DVC" size="1"/>

        <population id="RIPR" component="RIPR" size="1"/>

        <population id="DVB" component="DVB" size="1"/>

        <population id="DVA" component="DVA" size="1"/>

        <population id="PLNR" component="PLNR" size="1"/>

        <population id="ADER" component="ADER" size="1"/>

        <population id="SMBVL" component="SMBVL" size="1"/>

        <population id="RIPL" component="RIPL" size="1"/>

        <population id="ASJR" component="ASJR" size="1"/>

        <population id="PLNL" component="PLNL" size="1"/>

        <population id="ADEL" component="ADEL" size="1"/>

        <population id="ASJL" component="ASJL" size="1"/>

        <population id="CEPDR" component="CEPDR" size="1"/>

        <population id="IL2R" component="IL2R" size="1"/>

        <population id="CEPDL" component="CEPDL" size="1"/>

        <population id="IL2L" component="IL2L" size="1"/>

        <population id="PLMR" component="PLMR" size="1"/>

        <population id="OLQDR" component="OLQDR" size="1"/>

        <population id="ASIR" component="ASIR" size="1"/>

        <population id="PLML" component="PLML" size="1"/>

        <population id="OLQDL" component="OLQDL" size="1"/>

        <population id="ASIL" component="ASIL" size="1"/>

        <population id="IL1R" component="IL1R" size="1"/>

        <population id="AS11" component="AS11" size="1"/>

        <population id="AS10" component="AS10" size="1"/>

        <population id="SAADR" component="SAADR" size="1"/>

        <population id="IL1L" component="IL1L" size="1"/>

        <population id="SAADL" component="SAADL" size="1"/>

        <population id="SABVR" component="SABVR" size="1"/>

        <population id="SIBDR" component="SIBDR" size="1"/>

        <population id="ASHR" component="ASHR" size="1"/>

        <population id="SABVL" component="SABVL" size="1"/>

        <population id="SIBDL" component="SIBDL" size="1"/>

        <population id="ASHL" component="ASHL" size="1"/>

        <population id="PVWR" component="PVWR" size="1"/>

        <population id="M3R" component="M3R" size="1"/>

        <population id="PVWL" component="PVWL" size="1"/>

        <population id="RIMR" component="RIMR" size="1"/>

        <population id="M3L" component="M3L" size="1"/>

        <population id="RIML" component="RIML" size="1"/>

        <population id="ASGR" component="ASGR" size="1"/>

        <population id="ASGL" component="ASGL" size="1"/>

        <population id="PQR" component="PQR" size="1"/>

        <population id="M2R" component="M2R" size="1"/>

        <population id="ALA" component="ALA" size="1"/>

        <population id="M2L" component="M2L" size="1"/>

        <population id="ADAR" component="ADAR" size="1"/>

        <population id="I2R" component="I2R" size="1"/>

        <population id="ADAL" component="ADAL" size="1"/>

        <population id="I2L" component="I2L" size="1"/>

        <population id="VD9" component="VD9" size="1"/>

        <population id="VD8" component="VD8" size="1"/>

        <population id="VD7" component="VD7" size="1"/>

        <population id="VD6" component="VD6" size="1"/>

        <population id="VD5" component="VD5" size="1"/>

        <population id="VD4" component="VD4" size="1"/>

        <population id="VD13" component="VD13" size="1"/>

        <population id="VD3" component="VD3" size="1"/>

        <population id="VD12" component="VD12" size="1"/>

        <population id="VD2" component="VD2" size="1"/>

        <population id="VD11" component="VD11" size="1"/>

        <population id="VD1" component="VD1" size="1"/>

        <population id="VD10" component="VD10" size="1"/>

        <population id="I1R" component="I1R" size="1"/>

        <population id="AVKR" component="AVKR" size="1"/>

        <population id="ASER" component="ASER" size="1"/>

        <population id="I1L" component="I1L" size="1"/>

        <population id="AVKL" component="AVKL" size="1"/>

        <population id="SMDDR" component="SMDDR" size="1"/>

        <population id="ASEL" component="ASEL" size="1"/>

        <population id="SMDDL" component="SMDDL" size="1"/>

        <population id="VC6" component="VC6" size="1"/>

        <population id="VC5" component="VC5" size="1"/>

        <population id="VC4" component="VC4" size="1"/>

        <population id="VC3" component="VC3" size="1"/>

        <population id="VC2" component="VC2" size="1"/>

        <population id="VC1" component="VC1" size="1"/>

        <population id="AVJR" component="AVJR" size="1"/>

        <population id="AVJL" component="AVJL" size="1"/>

        <population id="VB9" component="VB9" size="1"/>

        <population id="VB8" component="VB8" size="1"/>

        <population id="VB7" component="VB7" size="1"/>

        <population id="VB6" component="VB6" size="1"/>

        <population id="VB5" component="VB5" size="1"/>

        <population id="VB4" component="VB4" size="1"/>

        <population id="VB3" component="VB3" size="1"/>

        <population id="VB2" component="VB2" size="1"/>

        <population id="VB1" component="VB1" size="1"/>

        <population id="AWCR" component="AWCR" size="1"/>

        <population id="RMDDR" component="RMDDR" size="1"/>

        <population id="AWCL" component="AWCL" size="1"/>

        <population id="CEPVR" component="CEPVR" size="1"/>

        <population id="RMDDL" component="RMDDL" size="1"/>

        <population id="CEPVL" component="CEPVL" size="1"/>

        <population id="IL2DR" component="IL2DR" size="1"/>

        <population id="VA9" component="VA9" size="1"/>

        <population id="VA8" component="VA8" size="1"/>

        <population id="VA7" component="VA7" size="1"/>

        <population id="VA6" component="VA6" size="1"/>

        <population id="IL2DL" component="IL2DL" size="1"/>

        <population id="RMHR" component="RMHR" size="1"/>

        <population id="VA5" component="VA5" size="1"/>

        <population id="VA4" component="VA4" size="1"/>

        <population id="VA3" component="VA3" size="1"/>

        <population id="VA2" component="VA2" size="1"/>

        <population id="VA1" component="VA1" size="1"/>

        <population id="RMHL" component="RMHL" size="1"/>

        <population id="OLQVR" component="OLQVR" size="1"/>

        <population id="AWBR" component="AWBR" size="1"/>

        <population id="OLQVL" component="OLQVL" size="1"/>

        <population id="AWBL" component="AWBL" size="1"/>

        <population id="AVHR" component="AVHR" size="1"/>

        <population id="FLPR" component="FLPR" size="1"/>

        <population id="AVHL" component="AVHL" size="1"/>

        <population id="FLPL" component="FLPL" size="1"/>

        <population id="SIADR" component="SIADR" size="1"/>

        <population id="SAAVR" component="SAAVR" size="1"/>

        <population id="SIADL" component="SIADL" size="1"/>

        <population id="SAAVL" component="SAAVL" size="1"/>

        <population id="RMGR" component="RMGR" size="1"/>

        <population id="PVQR" component="PVQR" size="1"/>

        <population id="RMGL" component="RMGL" size="1"/>

        <population id="PVQL" component="PVQL" size="1"/>

        <population id="SIBVR" component="SIBVR" size="1"/>

        <population id="AWAR" component="AWAR" size="1"/>

        <population id="RIGR" component="RIGR" size="1"/>

        <population id="SIBVL" component="SIBVL" size="1"/>

        <population id="AWAL" component="AWAL" size="1"/>

        <population id="RIGL" component="RIGL" size="1"/>

        <population id="AINR" component="AINR" size="1"/>

        <population id="SDQR" component="SDQR" size="1"/>

        <population id="AINL" component="AINL" size="1"/>

        <population id="PDER" component="PDER" size="1"/>

        <population id="SDQL" component="SDQL" size="1"/>

        <population id="RMFR" component="RMFR" size="1"/>

        <population id="PVPR" component="PVPR" size="1"/>

        <population id="PDEL" component="PDEL" size="1"/>

        <population id="RMFL" component="RMFL" size="1"/>

        <population id="PVPL" component="PVPL" size="1"/>

        <population id="RIFR" component="RIFR" size="1"/>

        <population id="RIFL" component="RIFL" size="1"/>

        <population id="AVFR" component="AVFR" size="1"/>

        <population id="AIMR" component="AIMR" size="1"/>

        <population id="AVFL" component="AVFL" size="1"/>

        <population id="AIML" component="AIML" size="1"/>

        <population id="RMEV" component="RMEV" size="1"/>

        <population id="RMER" component="RMER" size="1"/>

        <population id="RMEL" component="RMEL" size="1"/>

        <population id="RMED" component="RMED" size="1"/>

        <population id="AVER" component="AVER" size="1"/>

        <population id="AVEL" component="AVEL" size="1"/>

        <population id="PHCR" component="PHCR" size="1"/>

        <population id="PHCL" component="PHCL" size="1"/>

        <population id="MCR" component="MCR" size="1"/>

        <population id="RMDR" component="RMDR" size="1"/>

        <population id="PVNR" component="PVNR" size="1"/>

        <population id="MCL" component="MCL" size="1"/>

        <population id="RMDL" component="RMDL" size="1"/>

        <population id="PVNL" component="PVNL" size="1"/>

        <population id="SMDVR" component="SMDVR" size="1"/>

        <population id="AVDR" component="AVDR" size="1"/>

        <population id="SMDVL" component="SMDVL" size="1"/>

        <population id="AVDL" component="AVDL" size="1"/>

        <population id="PHBR" component="PHBR" size="1"/>

        <population id="PHBL" component="PHBL" size="1"/>

        <population id="BDUR" component="BDUR" size="1"/>

        <population id="RICR" component="RICR" size="1"/>

        <population id="BDUL" component="BDUL" size="1"/>

        <population id="RICL" component="RICL" size="1"/>

        <population id="AFDR" component="AFDR" size="1"/>

        <population id="PHAR" component="PHAR" size="1"/>

        <population id="AFDL" component="AFDL" size="1"/>

        <population id="PHAL" component="PHAL" size="1"/>

        <population id="MI" component="MI" size="1"/>

        <population id="IL1DR" component="IL1DR" size="1"/>

        <population id="RMDVR" component="RMDVR" size="1"/>

        <population id="IL1DL" component="IL1DL" size="1"/>

        <population id="URYDR" component="URYDR" size="1"/>

        <population id="RIBR" component="RIBR" size="1"/>

        <population id="RMDVL" component="RMDVL" size="1"/>

        <population id="URYDL" component="URYDL" size="1"/>

        <population id="AVBR" component="AVBR" size="1"/>

        <population id="RIBL" component="RIBL" size="1"/>

        <population id="IL2VR" component="IL2VR" size="1"/>

        <population id="M5" component="M5" size="1"/>

        <population id="AVBL" component="AVBL" size="1"/>

        <population id="M4" component="M4" size="1"/>

        <population id="IL2VL" component="IL2VL" size="1"/>

        <population id="M1" component="M1" size="1"/>

        <population id="RIAR" component="RIAR" size="1"/>

        <population id="AVAR" component="AVAR" size="1"/>

        <population id="SIAVR" component="SIAVR" size="1"/>

        <population id="RIAL" component="RIAL" size="1"/>

        <population id="LUAR" component="LUAR" size="1"/>

        <population id="ALNR" component="ALNR" size="1"/>

        <population id="AVAL" component="AVAL" size="1"/>

        <population id="SIAVL" component="SIAVL" size="1"/>

        <population id="LUAL" component="LUAL" size="1"/>

        <population id="ALNL" component="ALNL" size="1"/>

        <population id="URADR" component="URADR" size="1"/>

        <population id="URADL" component="URADL" size="1"/>

        <population id="ALMR" component="ALMR" size="1"/>

        <population id="ALML" component="ALML" size="1"/>

        <population id="PDB" component="PDB" size="1"/>

        <population id="PDA" component="PDA" size="1"/>

        <population id="VB11" component="VB11" size="1"/>

        <population id="VB10" component="VB10" size="1"/>

        <population id="CANR" component="CANR" size="1"/>

        <population id="ADLR" component="ADLR" size="1"/>

        <population id="SMBDR" component="SMBDR" size="1"/>

        <population id="CANL" component="CANL" size="1"/>

        <population id="ADLL" component="ADLL" size="1"/>

        <population id="SMBDL" component="SMBDL" size="1"/>

        <population id="I6" component="I6" size="1"/>

        <population id="I5" component="I5" size="1"/>

        <population id="I4" component="I4" size="1"/>

        <population id="DD6" component="DD6" size="1"/>

        <population id="I3" component="I3" size="1"/>

        <population id="AVM" component="AVM" size="1"/>

        <population id="DD5" component="DD5" size="1"/>

        <population id="AVL" component="AVL" size="1"/>

        <population id="DD4" component="DD4" size="1"/>

        <population id="DD3" component="DD3" size="1"/>

        <population id="DD2" component="DD2" size="1"/>

        <population id="DD1" component="DD1" size="1"/>

        <population id="AVG" component="AVG" size="1"/>

        <population id="RIVR" component="RIVR" size="1"/>

        <synapticConnection from="AIBR[0]" to="AVBR[0]" synapse="Glutamate"/>

        <synapticConnection from="AIBR[0]" to="AVBR[0]" synapse="Glutamate"/>

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
            <!--There are no electrical inputs present in the network-->

    </network>

</neuroml>
