<?xml version="1.0" encoding="UTF-8"?>
<neuroml xmlns="http://morphml.org/neuroml/schema" xmlns:meta="http://morphml.org/metadata/schema" xmlns:mml="http://morphml.org/morphml/schema" xmlns:bio="http://morphml.org/biophysics/schema" xmlns:cml="http://morphml.org/channelml/schema" xmlns:net="http://morphml.org/networkml/schema" xmlns:xsi="http://www.w3.org/2001/XMLSchema-instance" xsi:schemaLocation="http://morphml.org/neuroml/schema  http://neuroml.svn.sourceforge.net/viewvc/neuroml/trunk/web/NeuroMLFiles/Schemata/v1.8.1/Level3/NeuroML_Level3_v1.8.1.xsd" lengthUnits="micron">

    <cells>
        <cell name="I5">

            <meta:notes>
        Interneuron
      </meta:notes>

            <mml:segments>

                <mml:segment id="0" name="Seg0_soma_0" cable="0">
                    <mml:proximal x="-2.1" y="-247.84999" z="30.675" diameter="5.659726"/>
                    <mml:distal x="-2.1" y="-247.84999" z="30.675" diameter="5.659726"/>
                </mml:segment>

                <mml:segment id="1" name="Seg0_axon_0" parent="0" cable="1">
                    <mml:proximal x="-2.1" y="-247.84999" z="30.675" diameter="1.2041595"/>
                    <mml:distal x="-0.85" y="-247.7" z="31.400002" diameter="1.2041595"/>
                </mml:segment>

                <mml:segment id="2" name="Seg2_axon_0" parent="1" cable="1">
                    <mml:distal x="-0.70000005" y="-247.7" z="31.8" diameter="0.56568545"/>
                </mml:segment>

                <mml:segment id="3" name="Seg3_axon_0" parent="2" cable="1">
                    <mml:distal x="-0.45" y="-247.55002" z="33.25" diameter="0.4358899"/>
                </mml:segment>

                <mml:segment id="4" name="Seg4_neurite_0" parent="3" cable="2">
                    <mml:proximal x="-0.45" y="-247.55002" z="33.25" diameter="0.4358899"/>
                    <mml:distal x="-0.4" y="-247.4" z="33.399998" diameter="0.56568545"/>
                </mml:segment>

                <mml:segment id="5" name="Seg5_neurite_0" parent="4" cable="2">
                    <mml:distal x="-0.4" y="-246.4" z="33.274998" diameter="0.4924429"/>
                </mml:segment>

                <mml:segment id="6" name="Seg6_neurite_0" parent="5" cable="2">
                    <mml:distal x="-0.5" y="-241.9" z="32.7" diameter="0.4472136"/>
                </mml:segment>

                <mml:segment id="7" name="Seg7_axon_0" parent="6" cable="2">
                    <mml:distal x="-0.35000002" y="-241.70001" z="32.7" diameter="0.45825756"/>
                </mml:segment>

                <mml:segment id="8" name="Seg8_axon_0" parent="7" cable="2">
                    <mml:distal x="0.75" y="-241.59999" z="33.45" diameter="0.50990194"/>
                </mml:segment>

                <mml:segment id="9" name="Seg9_axon_0" parent="8" cable="2">
                    <mml:distal x="1.625" y="-241.475" z="34.9" diameter="0.43011624"/>
                </mml:segment>

                <mml:segment id="10" name="Seg10_axon_0" parent="9" cable="2">
                    <mml:distal x="1.8249999" y="-241.40001" z="36.3" diameter="0.60207975"/>
                </mml:segment>

                <mml:segment id="11" name="Seg11_axon_0" parent="10" cable="2">
                    <mml:distal x="1.55" y="-241.24998" z="37.8" diameter="0.46904156"/>
                </mml:segment>

                <mml:segment id="12" name="Seg12_axon_0" parent="11" cable="2">
                    <mml:distal x="0.775" y="-241.2" z="39.075" diameter="0.6363961"/>
                </mml:segment>

                <mml:segment id="13" name="Seg13_axon_0" parent="12" cable="2">
                    <mml:distal x="-0.225" y="-241.1" z="39.825" diameter="0.6204837"/>
                </mml:segment>

                <mml:segment id="14" name="Seg14_axon_0" parent="13" cable="2">
                    <mml:distal x="-0.45" y="-241.30002" z="39.899998" diameter="0.53851646"/>
                </mml:segment>

                <mml:segment id="15" name="Seg15_axon_0" parent="14" cable="2">
                    <mml:distal x="-0.425" y="-243.3" z="40.175" diameter="0.6041523"/>
                </mml:segment>

                <mml:segment id="16" name="Seg16_axon_0" parent="15" cable="2">
                    <mml:distal x="-0.4" y="-251.375" z="41.425" diameter="0.6041523"/>
                </mml:segment>

                <mml:segment id="17" name="Seg17_axon_0" parent="16" cable="2">
                    <mml:distal x="-0.4" y="-252.7" z="41.575" diameter="0.585235"/>
                </mml:segment>

                <mml:segment id="18" name="Seg18_neurite_0" parent="17" cable="3">
                    <mml:proximal x="-0.4" y="-252.7" z="41.575" diameter="0.585235"/>
                    <mml:distal x="-0.2" y="-252.92499" z="41.525" diameter="0.6670832"/>
                </mml:segment>

                <mml:segment id="19" name="Seg19_neurite_0" parent="18" cable="3">
                    <mml:distal x="0.675" y="-252.975" z="40.8" diameter="0.5338539"/>
                </mml:segment>

                <mml:segment id="20" name="Seg20_neurite_0" parent="19" cable="3">
                    <mml:distal x="1.55" y="-253.02501" z="39.449997" diameter="0.55"/>
                </mml:segment>

                <mml:segment id="21" name="Seg21_neurite_0" parent="20" cable="3">
                    <mml:distal x="1.85" y="-253.20001" z="37.95" diameter="0.50990194"/>
                </mml:segment>

                <mml:segment id="22" name="Seg22_axon_0" parent="21" cable="3">
                    <mml:distal x="1.8249999" y="-253.44998" z="37.75" diameter="0.61846584"/>
                </mml:segment>

                <mml:segment id="23" name="Seg23_axon_0" parent="22" cable="3">
                    <mml:distal x="1.8249999" y="-254.04999" z="37.9" diameter="0.48218253"/>
                </mml:segment>

                <mml:segment id="24" name="Seg24_axon_0" parent="23" cable="3">
                    <mml:distal x="1.6750001" y="-271.44998" z="44.0" diameter="0.48218253"/>
                </mml:segment>

                <mml:segment id="25" name="Seg25_axon_0" parent="24" cable="3">
                    <mml:distal x="1.25" y="-282.35" z="48.2" diameter="0.50990194"/>
                </mml:segment>

                <mml:segment id="26" name="Seg26_axon_0" parent="25" cable="3">
                    <mml:distal x="2.75" y="-288.4" z="50.825" diameter="0.5408327"/>
                </mml:segment>

                <mml:segment id="27" name="Seg27_neurite_0" parent="26" cable="4">
                    <mml:proximal x="2.75" y="-288.4" z="50.825" diameter="0.5408327"/>
                    <mml:distal x="2.75" y="-288.7" z="51.075" diameter="0.6873864"/>
                </mml:segment>

                <mml:segment id="28" name="Seg28_neurite_0" parent="27" cable="4">
                    <mml:distal x="2.575" y="-288.65" z="52.399998" diameter="0.8077747"/>
                </mml:segment>

                <mml:segment id="29" name="Seg29_neurite_0" parent="28" cable="4">
                    <mml:distal x="1.85" y="-288.55" z="53.975" diameter="0.7889867"/>
                </mml:segment>

                <mml:segment id="30" name="Seg30_neurite_0" parent="29" cable="4">
                    <mml:distal x="0.75" y="-288.45" z="55.05" diameter="0.76811457"/>
                </mml:segment>

                <mml:segment id="31" name="Seg31_neurite_0" parent="30" cable="5">
                    <mml:proximal x="0.75" y="-288.45" z="55.05" diameter="0.76811457"/>
                    <mml:distal x="0.275" y="-288.425" z="55.35" diameter="0.644205"/>
                </mml:segment>

                <mml:segment id="32" name="Seg32_neurite_0" parent="31" cable="5">
                    <mml:distal x="-1.05" y="-288.325" z="55.85" diameter="0.63442886"/>
                </mml:segment>

                <mml:segment id="33" name="Seg33_neurite_0" parent="32" cable="5">
                    <mml:distal x="-2.1" y="-288.3" z="56.024998" diameter="0.75"/>
                </mml:segment>

                <mml:segment id="34" name="Seg34_neurite_0" parent="33" cable="5">
                    <mml:distal x="-3.225" y="-288.325" z="55.85" diameter="0.8093207"/>
                </mml:segment>

                <mml:segment id="35" name="Seg35_neurite_0" parent="34" cable="5">
                    <mml:distal x="-4.5499997" y="-288.425" z="55.35" diameter="0.6946222"/>
                </mml:segment>

                <mml:segment id="36" name="Seg36_neurite_0" parent="35" cable="5">
                    <mml:distal x="-5.025" y="-288.45" z="55.05" diameter="0.77620876"/>
                </mml:segment>

                <mml:segment id="37" name="Seg37_neurite_0" parent="36" cable="5">
                    <mml:distal x="-6.125" y="-288.55" z="53.975" diameter="0.75828755"/>
                </mml:segment>

                <mml:segment id="38" name="Seg38_neurite_0" parent="37" cable="5">
                    <mml:distal x="-6.85" y="-288.65" z="52.399998" diameter="0.7615773"/>
                </mml:segment>

                <mml:segment id="39" name="Seg39_neurite_0" parent="38" cable="5">
                    <mml:distal x="-7.0" y="-288.7" z="51.075" diameter="0.7228416"/>
                </mml:segment>

                <mml:segment id="40" name="Seg40_neurite_0" parent="39" cable="6">
                    <mml:proximal x="-7.0" y="-288.7" z="51.075" diameter="0.7228416"/>
                    <mml:distal x="-7.05" y="-288.75" z="50.6" diameter="0.7615773"/>
                </mml:segment>

                <mml:segment id="41" name="Seg41_neurite_0" parent="40" cable="6">
                    <mml:distal x="-6.65" y="-288.85" z="49.05" diameter="0.8185353"/>
                </mml:segment>

                <mml:segment id="42" name="Seg42_neurite_0" parent="41" cable="6">
                    <mml:distal x="-5.65" y="-288.975" z="47.65" diameter="0.7228416"/>
                </mml:segment>

                <mml:segment id="43" name="Seg43_neurite_0" parent="42" cable="6">
                    <mml:distal x="-4.1499996" y="-289.1" z="46.55" diameter="0.678233"/>
                </mml:segment>

                <mml:segment id="44" name="Seg44_neurite_0" parent="43" cable="6">
                    <mml:distal x="-2.1" y="-289.19998" z="46.149998" diameter="0.67082036"/>
                </mml:segment>

                <mml:segment id="45" name="Seg45_neurite_0" parent="44" cable="6">
                    <mml:distal x="-0.15" y="-289.1" z="46.55" diameter="0.678233"/>
                </mml:segment>

                <mml:segment id="46" name="Seg46_neurite_0" parent="45" cable="6">
                    <mml:distal x="1.4000001" y="-288.975" z="47.65" diameter="0.7433034"/>
                </mml:segment>

                <mml:segment id="47" name="Seg47_neurite_0" parent="46" cable="6">
                    <mml:distal x="2.35" y="-288.85" z="49.05" diameter="0.76811457"/>
                </mml:segment>

                <mml:segment id="48" name="Seg48_neurite_0" parent="39" cable="7">
                    <mml:proximal x="-7.0" y="-288.7" z="51.075" diameter="0.7228416"/>
                    <mml:distal x="-7.0249996" y="-288.4" z="50.825" diameter="0.5700877"/>
                </mml:segment>

                <mml:segment id="49" name="Seg49_neurite_0" parent="48" cable="7">
                    <mml:distal x="-5.525" y="-282.35" z="48.2" diameter="0.4387482"/>
                </mml:segment>

                <mml:segment id="50" name="Seg50_neurite_0" parent="49" cable="7">
                    <mml:distal x="-5.9500003" y="-271.44998" z="44.0" diameter="0.50990194"/>
                </mml:segment>

                <mml:segment id="51" name="Seg51_neurite_0" parent="50" cable="7">
                    <mml:distal x="-6.1" y="-254.04999" z="37.9" diameter="0.5744563"/>
                </mml:segment>

                <mml:segment id="52" name="Seg52_neurite_0" parent="51" cable="7">
                    <mml:distal x="-6.1" y="-253.44998" z="37.75" diameter="0.5477225"/>
                </mml:segment>

                <mml:segment id="53" name="Seg53_axon_0" parent="52" cable="7">
                    <mml:distal x="-6.125" y="-253.20001" z="37.95" diameter="0.5408327"/>
                </mml:segment>

                <mml:segment id="54" name="Seg54_axon_0" parent="53" cable="7">
                    <mml:distal x="-5.825" y="-253.02501" z="39.449997" diameter="0.61237246"/>
                </mml:segment>

                <mml:segment id="55" name="Seg55_axon_0" parent="54" cable="7">
                    <mml:distal x="-4.95" y="-252.975" z="40.8" diameter="0.57662815"/>
                </mml:segment>

                <mml:segment id="56" name="Seg56_axon_0" parent="55" cable="7">
                    <mml:distal x="-4.05" y="-252.92499" z="41.525" diameter="0.644205"/>
                </mml:segment>

                <mml:segment id="57" name="Seg57_neurite_0" parent="56" cable="8">
                    <mml:proximal x="-4.05" y="-252.92499" z="41.525" diameter="0.644205"/>
                    <mml:distal x="-3.85" y="-252.7" z="41.575" diameter="0.62649816"/>
                </mml:segment>

                <mml:segment id="58" name="Seg58_neurite_0" parent="57" cable="8">
                    <mml:distal x="-3.85" y="-251.375" z="41.425" diameter="0.5244044"/>
                </mml:segment>

                <mml:segment id="59" name="Seg59_neurite_0" parent="58" cable="8">
                    <mml:distal x="-3.85" y="-243.3" z="40.175" diameter="0.5408327"/>
                </mml:segment>

                <mml:segment id="60" name="Seg60_neurite_0" parent="59" cable="8">
                    <mml:distal x="-3.85" y="-241.30002" z="39.899998" diameter="0.67082036"/>
                </mml:segment>

                <mml:segment id="61" name="Seg61_axon_0" parent="60" cable="8">
                    <mml:distal x="-4.05" y="-241.1" z="39.825" diameter="0.5408327"/>
                </mml:segment>

                <mml:segment id="62" name="Seg62_axon_0" parent="61" cable="8">
                    <mml:distal x="-5.05" y="-241.2" z="39.075" diameter="0.52201533"/>
                </mml:segment>

                <mml:segment id="63" name="Seg63_axon_0" parent="62" cable="8">
                    <mml:distal x="-5.7999997" y="-241.24998" z="37.8" diameter="0.5744563"/>
                </mml:segment>

                <mml:segment id="64" name="Seg64_axon_0" parent="63" cable="8">
                    <mml:distal x="-6.125" y="-241.40001" z="36.3" diameter="0.47169906"/>
                </mml:segment>

                <mml:segment id="65" name="Seg65_axon_0" parent="64" cable="8">
                    <mml:distal x="-5.9" y="-241.475" z="34.9" diameter="0.5123476"/>
                </mml:segment>

                <mml:segment id="66" name="Seg66_axon_0" parent="65" cable="8">
                    <mml:distal x="-5.0" y="-241.59999" z="33.45" diameter="0.45825756"/>
                </mml:segment>

                <mml:segment id="67" name="Seg67_axon_0" parent="66" cable="8">
                    <mml:distal x="-3.9500003" y="-241.70001" z="32.7" diameter="0.5744563"/>
                </mml:segment>

                <mml:segment id="68" name="Seg68_axon_0" parent="67" cable="8">
                    <mml:distal x="-3.8" y="-241.9" z="32.7" diameter="0.4472136"/>
                </mml:segment>

                <mml:segment id="69" name="Seg69_axon_0" parent="68" cable="8">
                    <mml:distal x="-3.85" y="-246.4" z="33.274998" diameter="0.4609772"/>
                </mml:segment>

                <mml:segment id="70" name="Seg70_axon_0" parent="69" cable="8">
                    <mml:distal x="-3.85" y="-247.4" z="33.399998" diameter="0.5"/>
                </mml:segment>

                <mml:segment id="71" name="Seg71_neurite_0" parent="70" cable="9">
                    <mml:proximal x="-3.85" y="-247.4" z="33.399998" diameter="0.5"/>
                    <mml:distal x="-3.85" y="-247.65001" z="33.45" diameter="0.4358899"/>
                </mml:segment>

                <mml:segment id="72" name="Seg72_neurite_0" parent="71" cable="9">
                    <mml:distal x="-3.85" y="-248.49998" z="33.6" diameter="0.5"/>
                </mml:segment>

                <mml:segment id="73" name="Seg73_neurite_0" parent="72" cable="9">
                    <mml:distal x="-3.8249998" y="-253.34999" z="34.325" diameter="0.48476797"/>
                </mml:segment>

                <mml:segment id="74" name="Seg74_axon_0" parent="73" cable="9">
                    <mml:distal x="-3.9250002" y="-253.575" z="34.425" diameter="0.5894913"/>
                </mml:segment>

                <mml:segment id="75" name="Seg75_axon_0" parent="74" cable="9">
                    <mml:distal x="-4.75" y="-253.525" z="34.975002" diameter="0.5244044"/>
                </mml:segment>

                <mml:segment id="76" name="Seg76_axon_0" parent="75" cable="9">
                    <mml:distal x="-5.6000004" y="-253.4" z="35.95" diameter="0.64031243"/>
                </mml:segment>

                <mml:segment id="77" name="Seg77_neurite_0" parent="70" cable="10">
                    <mml:proximal x="-3.85" y="-247.4" z="33.399998" diameter="0.5"/>
                    <mml:distal x="-3.85" y="-247.55002" z="33.25" diameter="0.4358899"/>
                </mml:segment>

                <mml:segment id="78" name="Seg78_neurite_0" parent="77" cable="10">
                    <mml:distal x="-3.6" y="-247.7" z="31.8" diameter="0.56568545"/>
                </mml:segment>

                <mml:segment id="79" name="Seg79_neurite_0" parent="78" cable="10">
                    <mml:distal x="-3.4499998" y="-247.79999" z="31.3" diameter="1.2688577"/>
                </mml:segment>

                <mml:segment id="80" name="Seg80_neurite_0" parent="56" cable="11">
                    <mml:proximal x="-4.05" y="-252.92499" z="41.525" diameter="0.644205"/>
                    <mml:distal x="-3.6499999" y="-252.90001" z="41.7" diameter="0.5744563"/>
                </mml:segment>

                <mml:segment id="81" name="Seg81_neurite_0" parent="80" cable="11">
                    <mml:distal x="-2.6000001" y="-252.875" z="41.975002" diameter="0.49497476"/>
                </mml:segment>

                <mml:segment id="82" name="Seg82_neurite_0" parent="81" cable="11">
                    <mml:distal x="-2.1" y="-252.875" z="42.025" diameter="0.51478153"/>
                </mml:segment>

                <mml:segment id="83" name="Seg83_neurite_0" parent="82" cable="11">
                    <mml:distal x="-1.65" y="-252.875" z="41.975002" diameter="0.50497526"/>
                </mml:segment>

                <mml:segment id="84" name="Seg84_neurite_0" parent="30" cable="12">
                    <mml:proximal x="0.75" y="-288.45" z="55.05" diameter="0.76811457"/>
                    <mml:distal x="0.475" y="-288.775" z="55.199997" diameter="0.65192026"/>
                </mml:segment>

                <mml:segment id="85" name="Seg85_neurite_0" parent="84" cable="12">
                    <mml:distal x="0.425" y="-289.7" z="55.4" diameter="0.42720017"/>
                </mml:segment>

                <mml:segment id="86" name="Seg86_neurite_0" parent="47" cable="6">
                    <mml:distal x="2.75" y="-288.75" z="50.6" diameter="0.7615773"/>
                </mml:segment>

                <mml:segment id="87" name="Seg87_neurite_0" parent="17" cable="13">
                    <mml:proximal x="-0.4" y="-252.7" z="41.575" diameter="0.585235"/>
                    <mml:distal x="-0.6" y="-252.90001" z="41.7" diameter="0.48989794"/>
                </mml:segment>

                <mml:segment id="88" name="Seg88_neurite_0" parent="3" cable="14">
                    <mml:proximal x="-0.45" y="-247.55002" z="33.25" diameter="0.4358899"/>
                    <mml:distal x="-0.4" y="-247.65001" z="33.45" diameter="0.37416574"/>
                </mml:segment>

                <mml:segment id="89" name="Seg89_neurite_0" parent="88" cable="14">
                    <mml:distal x="-0.4" y="-248.49998" z="33.6" diameter="0.4472136"/>
                </mml:segment>

                <mml:segment id="90" name="Seg90_neurite_0" parent="89" cable="14">
                    <mml:distal x="-0.475" y="-253.34999" z="34.325" diameter="0.48476797"/>
                </mml:segment>

                <mml:segment id="91" name="Seg91_axon_0" parent="90" cable="14">
                    <mml:distal x="-0.35000002" y="-253.575" z="34.425" diameter="0.57879186"/>
                </mml:segment>

                <mml:segment id="92" name="Seg92_axon_0" parent="91" cable="14">
                    <mml:distal x="0.475" y="-253.525" z="34.975002" diameter="0.5545268"/>
                </mml:segment>

                <mml:segment id="93" name="Seg93_axon_0" parent="92" cable="14">
                    <mml:distal x="1.3249999" y="-253.4" z="35.95" diameter="0.48218253"/>
                </mml:segment>

            </mml:segments>

            <mml:cables>

                <mml:cable id="0" name="Soma">
                    <meta:group>all</meta:group>
                    <meta:group>soma_group</meta:group>
                </mml:cable>

                <mml:cable id="1" name="Axon">
                    <meta:group>all</meta:group>
                    <meta:group>axon_group</meta:group>
                </mml:cable>

                <mml:cable id="2" name="Neurite2">
                    <meta:group>all</meta:group>
                    <meta:group>dendrite_group</meta:group>
                </mml:cable>

                <mml:cable id="3" name="Neurite3">
                    <meta:group>all</meta:group>
                    <meta:group>dendrite_group</meta:group>
                </mml:cable>

                <mml:cable id="4" name="Neurite4">
                    <meta:group>all</meta:group>
                    <meta:group>dendrite_group</meta:group>
                </mml:cable>

                <mml:cable id="5" name="Neurite5">
                    <meta:group>all</meta:group>
                    <meta:group>dendrite_group</meta:group>
                </mml:cable>

                <mml:cable id="6" name="Neurite6">
                    <meta:group>all</meta:group>
                    <meta:group>dendrite_group</meta:group>
                </mml:cable>

                <mml:cable id="7" name="Neurite7">
                    <meta:group>all</meta:group>
                    <meta:group>dendrite_group</meta:group>
                </mml:cable>

                <mml:cable id="8" name="Neurite8">
                    <meta:group>all</meta:group>
                    <meta:group>dendrite_group</meta:group>
                </mml:cable>

                <mml:cable id="9" name="Neurite9">
                    <meta:group>all</meta:group>
                    <meta:group>dendrite_group</meta:group>
                </mml:cable>

                <mml:cable id="10" name="Neurite10">
                    <meta:group>all</meta:group>
                    <meta:group>dendrite_group</meta:group>
                </mml:cable>

                <mml:cable id="11" name="Neurite11">
                    <meta:group>all</meta:group>
                    <meta:group>dendrite_group</meta:group>
                </mml:cable>

                <mml:cable id="12" name="Neurite12">
                    <meta:group>all</meta:group>
                    <meta:group>dendrite_group</meta:group>
                </mml:cable>

                <mml:cable id="13" name="Neurite14">
                    <meta:group>all</meta:group>
                    <meta:group>dendrite_group</meta:group>
                </mml:cable>

                <mml:cable id="14" name="Neurite15">
                    <meta:group>all</meta:group>
                    <meta:group>dendrite_group</meta:group>
                </mml:cable>

            </mml:cables>

            <!--Adding the biophysical parameters-->

            <biophysics units="Physiological Units">

                <bio:mechanism name="LeakConductance" type="Channel Mechanism" passive_conductance="true">
                    <bio:parameter name="e" value="-75.0">
                        <bio:group>all</bio:group>
                    </bio:parameter>
                    <bio:parameter name="gmax" value="0.025">
                        <bio:group>all</bio:group>
                    </bio:parameter>
                </bio:mechanism>

                <bio:spec_capacitance>
                    <bio:parameter value="1.0">
                        <bio:group>all</bio:group>
                    </bio:parameter>
                </bio:spec_capacitance>

                <bio:spec_axial_resistance>
                    <bio:parameter value="0.03">
                        <bio:group>all</bio:group>
                    </bio:parameter>
                </bio:spec_axial_resistance>

                <bio:init_memb_potential>
                    <bio:parameter value="-65.0">
                        <bio:group>all</bio:group>
                    </bio:parameter>
                </bio:init_memb_potential></biophysics>

            <connectivity>
                <net:potential_syn_loc synapse_type="Serotonin_GJ">
                    <net:group>all</net:group>
                </net:potential_syn_loc>

                <net:potential_syn_loc synapse_type="Acetylcholine_GJ">
                    <net:group>all</net:group>
                </net:potential_syn_loc>

                <net:potential_syn_loc synapse_type="Serotonin">
                    <net:group>all</net:group>
                </net:potential_syn_loc>

                <net:potential_syn_loc synapse_type="Glutamate_GJ">
                    <net:group>all</net:group>
                </net:potential_syn_loc>

                <net:potential_syn_loc synapse_type="Serotonin_Glutamate_GJ">
                    <net:group>all</net:group>
                </net:potential_syn_loc>

                <net:potential_syn_loc synapse_type="Acetylcholine">
                    <net:group>all</net:group>
                </net:potential_syn_loc>

                <net:potential_syn_loc synapse_type="Unknown_GJ">
                    <net:group>all</net:group>
                </net:potential_syn_loc>

                <net:potential_syn_loc synapse_type="Glutamate">
                    <net:group>all</net:group>
                </net:potential_syn_loc>

                <net:potential_syn_loc synapse_type="Serotonin_Glutamate">
                    <net:group>all</net:group>
                </net:potential_syn_loc>
            </connectivity>

        </cell>
    </cells>
</neuroml>
