<?xml version="1.0" encoding="UTF-8"?>
<neuroml xmlns="http://morphml.org/neuroml/schema" xmlns:meta="http://morphml.org/metadata/schema" xmlns:mml="http://morphml.org/morphml/schema" xmlns:bio="http://morphml.org/biophysics/schema" xmlns:cml="http://morphml.org/channelml/schema" xmlns:net="http://morphml.org/networkml/schema" xmlns:xsi="http://www.w3.org/2001/XMLSchema-instance" xsi:schemaLocation="http://morphml.org/neuroml/schema  http://neuroml.svn.sourceforge.net/viewvc/neuroml/trunk/web/NeuroMLFiles/Schemata/v1.8.1/Level3/NeuroML_Level3_v1.8.1.xsd" lengthUnits="micron">

    <cells>
        <cell name="M5">

            <meta:notes>
        Motor Neuron
      </meta:notes>

            <mml:segments>

                <mml:segment id="0" name="Seg0_soma_0" cable="0">
                    <mml:proximal x="-2.2" y="-241.45" z="41.800003" diameter="4.101219"/>
                    <mml:distal x="-2.2" y="-241.45" z="41.800003" diameter="4.101219"/>
                </mml:segment>

                <mml:segment id="26" name="Seg0_axon_0" parent="0" cable="1">
                    <mml:proximal x="-2.2" y="-241.45" z="41.800003" diameter="0.56568545"/>
                    <mml:distal x="-0.8" y="-241.00002" z="41.800003" diameter="0.56568545"/>
                </mml:segment>

                <mml:segment id="27" name="Seg27_axon_0" parent="26" cable="1">
                    <mml:distal x="0.9" y="-241.00002" z="40.9" diameter="0.6"/>
                </mml:segment>

                <mml:segment id="28" name="Seg28_axon_0" parent="27" cable="1">
                    <mml:distal x="2.3" y="-241.00002" z="38.15" diameter="0.5744563"/>
                </mml:segment>

                <mml:segment id="29" name="Seg29_axon_0" parent="28" cable="1">
                    <mml:distal x="1.7" y="-241.00002" z="33.8" diameter="0.6"/>
                </mml:segment>

                <mml:segment id="30" name="Seg30_axon_0" parent="29" cable="1">
                    <mml:distal x="-0.05" y="-241.00002" z="32.600002" diameter="0.5744563"/>
                </mml:segment>

                <mml:segment id="31" name="Seg31_axon_0" parent="30" cable="1">
                    <mml:distal x="-4.75" y="-241.1" z="32.600002" diameter="0.5744563"/>
                </mml:segment>

                <mml:segment id="32" name="Seg32_axon_0" parent="31" cable="1">
                    <mml:distal x="-6.2" y="-241.1" z="34.4" diameter="0.56568545"/>
                </mml:segment>

                <mml:segment id="33" name="Seg33_axon_0" parent="32" cable="1">
                    <mml:distal x="-6.8999996" y="-242.65001" z="34.5" diameter="0.5744563"/>
                </mml:segment>

                <mml:segment id="34" name="Seg34_axon_0" parent="33" cable="1">
                    <mml:distal x="-6.8999996" y="-246.90001" z="34.5" diameter="0.56568545"/>
                </mml:segment>

                <mml:segment id="35" name="Seg35_axon_0" parent="34" cable="1">
                    <mml:distal x="-7.0" y="-249.75" z="34.8" diameter="0.5744563"/>
                </mml:segment>

                <mml:segment id="36" name="Seg36_axon_0" parent="35" cable="1">
                    <mml:distal x="-6.5" y="-255.20001" z="35.95" diameter="0.53851646"/>
                </mml:segment>

                <mml:segment id="37" name="Seg37_axon_0" parent="36" cable="1">
                    <mml:distal x="-6.5" y="-255.45001" z="36.3" diameter="0.53851646"/>
                </mml:segment>

                <mml:segment id="38" name="Seg38_axon_0" parent="37" cable="1">
                    <mml:distal x="-6.5" y="-255.5" z="36.85" diameter="0.5744563"/>
                </mml:segment>

                <mml:segment id="39" name="Seg39_axon_0" parent="38" cable="1">
                    <mml:distal x="-6.3" y="-255.3" z="39.0" diameter="0.6"/>
                </mml:segment>

                <mml:segment id="40" name="Seg40_axon_0" parent="39" cable="1">
                    <mml:distal x="-5.45" y="-255.1" z="41.525" diameter="0.559017"/>
                </mml:segment>

                <mml:segment id="1" name="Seg0_dendrit_2" parent="0" cable="2">
                    <mml:proximal x="-2.2" y="-241.45" z="41.800003" diameter="0.56568545"/>
                    <mml:distal x="-3.6" y="-241.9" z="41.800003" diameter="0.56568545"/>
                </mml:segment>

                <mml:segment id="2" name="Seg2_dendrite_0" parent="1" cable="2">
                    <mml:distal x="-5.2999997" y="-241.9" z="40.9" diameter="0.6"/>
                </mml:segment>

                <mml:segment id="3" name="Seg3_dendrite_0" parent="2" cable="2">
                    <mml:distal x="-6.6" y="-241.9" z="38.15" diameter="0.5744563"/>
                </mml:segment>

                <mml:segment id="4" name="Seg4_dendrite_0" parent="3" cable="2">
                    <mml:distal x="-6.1" y="-241.9" z="33.8" diameter="0.6"/>
                </mml:segment>

                <mml:segment id="5" name="Seg5_dendrite_0" parent="4" cable="2">
                    <mml:distal x="-4.35" y="-241.9" z="32.600002" diameter="0.5744563"/>
                </mml:segment>

                <mml:segment id="6" name="Seg6_dendrite_0" parent="5" cable="2">
                    <mml:distal x="0.35000002" y="-241.8" z="32.600002" diameter="0.5744563"/>
                </mml:segment>

                <mml:segment id="7" name="Seg7_dendrite_0" parent="6" cable="2">
                    <mml:distal x="1.8" y="-241.8" z="34.4" diameter="0.56568545"/>
                </mml:segment>

                <mml:segment id="8" name="Seg8_dendrite_0" parent="7" cable="2">
                    <mml:distal x="2.5" y="-242.65001" z="34.5" diameter="0.5744563"/>
                </mml:segment>

                <mml:segment id="9" name="Seg9_dendrite_0" parent="8" cable="2">
                    <mml:distal x="2.55" y="-246.90001" z="34.5" diameter="0.5"/>
                </mml:segment>

                <mml:segment id="10" name="Seg10_dendrite_0" parent="9" cable="2">
                    <mml:distal x="2.6000001" y="-249.75" z="34.8" diameter="0.5744563"/>
                </mml:segment>

                <mml:segment id="11" name="Seg11_dendrite_0" parent="10" cable="2">
                    <mml:distal x="2.1" y="-255.20001" z="35.95" diameter="0.53851646"/>
                </mml:segment>

                <mml:segment id="12" name="Seg12_dendrite_0" parent="11" cable="2">
                    <mml:distal x="2.1" y="-255.45001" z="36.3" diameter="0.53851646"/>
                </mml:segment>

                <mml:segment id="13" name="Seg13_dendrite_0" parent="12" cable="2">
                    <mml:distal x="2.1" y="-255.5" z="36.85" diameter="0.5744563"/>
                </mml:segment>

                <mml:segment id="14" name="Seg14_dendrite_0" parent="13" cable="2">
                    <mml:distal x="1.95" y="-255.3" z="39.0" diameter="0.53851646"/>
                </mml:segment>

                <mml:segment id="15" name="Seg15_dendrite_0" parent="14" cable="2">
                    <mml:distal x="1.1" y="-255.1" z="41.525" diameter="0.5123476"/>
                </mml:segment>

                <mml:segment id="41" name="Seg41_neurite_0" parent="40" cable="3">
                    <mml:proximal x="-5.45" y="-255.1" z="41.525" diameter="0.559017"/>
                    <mml:distal x="-5.35" y="-254.90001" z="41.625" diameter="0.4609772"/>
                </mml:segment>

                <mml:segment id="42" name="Seg42_neurite_0" parent="41" cable="3">
                    <mml:distal x="-5.4" y="-254.55" z="41.575" diameter="0.6103278"/>
                </mml:segment>

                <mml:segment id="43" name="Seg43_neurite_0" parent="42" cable="3">
                    <mml:distal x="-5.4249997" y="-253.3" z="41.525" diameter="0.45276928"/>
                </mml:segment>

                <mml:segment id="44" name="Seg44_neurite_0" parent="40" cable="4">
                    <mml:proximal x="-5.45" y="-255.1" z="41.525" diameter="0.559017"/>
                    <mml:distal x="-5.2000003" y="-255.1" z="41.75" diameter="0.53851646"/>
                </mml:segment>

                <mml:segment id="45" name="Seg45_neurite_0" parent="44" cable="4">
                    <mml:distal x="-4.475" y="-255.0" z="42.35" diameter="0.52201533"/>
                </mml:segment>

                <mml:segment id="46" name="Seg46_neurite_0" parent="45" cable="5">
                    <mml:proximal x="-4.475" y="-255.0" z="42.35" diameter="0.52201533"/>
                    <mml:distal x="-4.35" y="-254.8" z="42.375" diameter="0.3640055"/>
                </mml:segment>

                <mml:segment id="47" name="Seg47_neurite_0" parent="46" cable="5">
                    <mml:distal x="-4.375" y="-254.5" z="42.35" diameter="0.5408327"/>
                </mml:segment>

                <mml:segment id="48" name="Seg48_neurite_0" parent="47" cable="5">
                    <mml:distal x="-4.5" y="-253.3" z="42.275" diameter="0.4924429"/>
                </mml:segment>

                <mml:segment id="49" name="Seg49_neurite_0" parent="45" cable="6">
                    <mml:proximal x="-4.475" y="-255.0" z="42.35" diameter="0.52201533"/>
                    <mml:distal x="-4.1749997" y="-255.0" z="42.399998" diameter="0.585235"/>
                </mml:segment>

                <mml:segment id="50" name="Seg50_neurite_0" parent="49" cable="6">
                    <mml:distal x="-2.575" y="-254.8" z="42.8" diameter="0.5678908"/>
                </mml:segment>

                <mml:segment id="16" name="Seg16_neurite_0" parent="15" cable="7">
                    <mml:proximal x="1.1" y="-255.1" z="41.525" diameter="0.5123476"/>
                    <mml:distal x="1.0" y="-254.90001" z="41.625" diameter="0.60207975"/>
                </mml:segment>

                <mml:segment id="17" name="Seg17_neurite_0" parent="16" cable="7">
                    <mml:distal x="1.0" y="-254.55" z="41.575" diameter="0.6103278"/>
                </mml:segment>

                <mml:segment id="18" name="Seg18_neurite_0" parent="17" cable="7">
                    <mml:distal x="1.1" y="-253.3" z="41.525" diameter="0.60207975"/>
                </mml:segment>

                <mml:segment id="19" name="Seg19_neurite_0" parent="15" cable="8">
                    <mml:proximal x="1.1" y="-255.1" z="41.525" diameter="0.5123476"/>
                    <mml:distal x="0.825" y="-255.1" z="41.75" diameter="0.559017"/>
                </mml:segment>

                <mml:segment id="20" name="Seg20_neurite_0" parent="19" cable="8">
                    <mml:distal x="0.1" y="-255.0" z="42.35" diameter="0.53851646"/>
                </mml:segment>

                <mml:segment id="21" name="Seg21_neurite_0" parent="20" cable="9">
                    <mml:proximal x="0.1" y="-255.0" z="42.35" diameter="0.53851646"/>
                    <mml:distal x="-0.05" y="-254.8" z="42.375" diameter="0.559017"/>
                </mml:segment>

                <mml:segment id="22" name="Seg22_neurite_0" parent="21" cable="9">
                    <mml:distal x="0.0" y="-254.5" z="42.35" diameter="0.5"/>
                </mml:segment>

                <mml:segment id="23" name="Seg23_neurite_0" parent="22" cable="9">
                    <mml:distal x="0.15" y="-253.3" z="42.275" diameter="0.4609772"/>
                </mml:segment>

                <mml:segment id="24" name="Seg24_neurite_0" parent="20" cable="10">
                    <mml:proximal x="0.1" y="-255.0" z="42.35" diameter="0.53851646"/>
                    <mml:distal x="-0.2" y="-255.0" z="42.399998" diameter="0.6"/>
                </mml:segment>

                <mml:segment id="25" name="Seg25_neurite_0" parent="24" cable="10">
                    <mml:distal x="-1.8249999" y="-254.8" z="42.8" diameter="0.5678908"/>
                </mml:segment>

            </mml:segments>

            <mml:cables>

                <mml:cable id="0" name="Soma">
                    <meta:group>all</meta:group>
                    <meta:group>soma_group</meta:group>
                </mml:cable>

                <mml:cable id="1" name="Axon">
                    <meta:group>all</meta:group>
                    <meta:group>axon_group</meta:group>
                </mml:cable>

                <mml:cable id="2" name="Dendrite2">
                    <meta:group>all</meta:group>
                    <meta:group>axon_group</meta:group>
                </mml:cable>

                <mml:cable id="3" name="Neurite3">
                    <meta:group>all</meta:group>
                    <meta:group>axon_group</meta:group>
                </mml:cable>

                <mml:cable id="4" name="Neurite4">
                    <meta:group>all</meta:group>
                    <meta:group>axon_group</meta:group>
                </mml:cable>

                <mml:cable id="5" name="Neurite5">
                    <meta:group>all</meta:group>
                    <meta:group>axon_group</meta:group>
                </mml:cable>

                <mml:cable id="6" name="Neurite6">
                    <meta:group>all</meta:group>
                    <meta:group>axon_group</meta:group>
                </mml:cable>

                <mml:cable id="7" name="Neurite7">
                    <meta:group>all</meta:group>
                    <meta:group>axon_group</meta:group>
                </mml:cable>

                <mml:cable id="8" name="Neurite8">
                    <meta:group>all</meta:group>
                    <meta:group>axon_group</meta:group>
                </mml:cable>

                <mml:cable id="9" name="Neurite9">
                    <meta:group>all</meta:group>
                    <meta:group>axon_group</meta:group>
                </mml:cable>

                <mml:cable id="10" name="Neurite10">
                    <meta:group>all</meta:group>
                    <meta:group>axon_group</meta:group>
                </mml:cable>

            </mml:cables>

            <!--Adding the biophysical parameters-->

            <biophysics units="Physiological Units">

                <bio:mechanism name="LeakConductance" type="Channel Mechanism" passive_conductance="true">
                    <bio:parameter name="e" value="-75.0">
                        <bio:group>all</bio:group>
                    </bio:parameter>
                    <bio:parameter name="gmax" value="0.025">
                        <bio:group>all</bio:group>
                    </bio:parameter>
                </bio:mechanism>

                <bio:spec_capacitance>
                    <bio:parameter value="1.0">
                        <bio:group>all</bio:group>
                    </bio:parameter>
                </bio:spec_capacitance>

                <bio:spec_axial_resistance>
                    <bio:parameter value="0.03">
                        <bio:group>all</bio:group>
                    </bio:parameter>
                </bio:spec_axial_resistance>

                <bio:init_memb_potential>
                    <bio:parameter value="-65.0">
                        <bio:group>all</bio:group>
                    </bio:parameter>
                </bio:init_memb_potential></biophysics>

            <connectivity>
                <net:potential_syn_loc synapse_type="Serotonin_GJ">
                    <net:group>all</net:group>
                </net:potential_syn_loc>

                <net:potential_syn_loc synapse_type="Acetylcholine_GJ">
                    <net:group>all</net:group>
                </net:potential_syn_loc>

                <net:potential_syn_loc synapse_type="Serotonin">
                    <net:group>all</net:group>
                </net:potential_syn_loc>

                <net:potential_syn_loc synapse_type="Glutamate_GJ">
                    <net:group>all</net:group>
                </net:potential_syn_loc>

                <net:potential_syn_loc synapse_type="Serotonin_Acetylcholine">
                    <net:group>all</net:group>
                </net:potential_syn_loc>

                <net:potential_syn_loc synapse_type="Serotonin_Glutamate_GJ">
                    <net:group>all</net:group>
                </net:potential_syn_loc>

                <net:potential_syn_loc synapse_type="Acetylcholine">
                    <net:group>all</net:group>
                </net:potential_syn_loc>

                <net:potential_syn_loc synapse_type="Glutamate">
                    <net:group>all</net:group>
                </net:potential_syn_loc>

                <net:potential_syn_loc synapse_type="Serotonin_Glutamate">
                    <net:group>all</net:group>
                </net:potential_syn_loc>
            </connectivity>

        </cell>
    </cells>
</neuroml>
