<?xml version="1.0" encoding="UTF-8"?>
<neuroml xmlns="http://morphml.org/neuroml/schema" xmlns:meta="http://morphml.org/metadata/schema" xmlns:mml="http://morphml.org/morphml/schema" xmlns:bio="http://morphml.org/biophysics/schema" xmlns:cml="http://morphml.org/channelml/schema" xmlns:net="http://morphml.org/networkml/schema" xmlns:xsi="http://www.w3.org/2001/XMLSchema-instance" xsi:schemaLocation="http://morphml.org/neuroml/schema  http://neuroml.svn.sourceforge.net/viewvc/neuroml/trunk/web/NeuroMLFiles/Schemata/v1.8.1/Level3/NeuroML_Level3_v1.8.1.xsd" lengthUnits="micron">

    <cells>
        <cell name="SAADR">

            <meta:notes>
        Interneuron
      </meta:notes>

            <mml:segments>

                <mml:segment id="0" name="Seg0_soma_0" cable="0">
                    <mml:proximal x="0.531" y="-270.169" z="42.131" diameter="2.2803507"/>
                    <mml:distal x="0.531" y="-270.169" z="42.131" diameter="2.2803507"/>
                </mml:segment>

                <mml:segment id="1" name="Seg0_axon_0" parent="0" cable="1">
                    <mml:proximal x="0.531" y="-270.169" z="42.131" diameter="0.28284273"/>
                    <mml:distal x="-4.0" y="-267.5" z="36.6" diameter="0.28284273"/>
                </mml:segment>

                <mml:segment id="2" name="Seg2_axon_0" parent="1" cable="1">
                    <mml:distal x="-4.0" y="-267.6" z="35.350002" diameter="0.3"/>
                </mml:segment>

                <mml:segment id="3" name="Seg3_axon_0" parent="2" cable="1">
                    <mml:distal x="-4.0" y="-268.05" z="34.850002" diameter="0.37416574"/>
                </mml:segment>

                <mml:segment id="4" name="Seg4_axon_0" parent="3" cable="1">
                    <mml:distal x="-4.0" y="-269.0" z="35.2" diameter="0.34641016"/>
                </mml:segment>

                <mml:segment id="5" name="Seg5_axon_0" parent="4" cable="1">
                    <mml:distal x="-4.4500003" y="-272.95" z="37.6" diameter="0.50990194"/>
                </mml:segment>

                <mml:segment id="17" name="Seg0_dendrit_2" parent="0" cable="2">
                    <mml:proximal x="0.531" y="-270.169" z="42.131" diameter="0.5"/>
                    <mml:distal x="-4.0" y="-266.65002" z="36.6" diameter="0.5"/>
                </mml:segment>

                <mml:segment id="18" name="Seg18_dendrite_0" parent="17" cable="2">
                    <mml:distal x="-4.0" y="-266.59998" z="34.8" diameter="0.28284273"/>
                </mml:segment>

                <mml:segment id="19" name="Seg19_dendrite_0" parent="18" cable="2">
                    <mml:distal x="-4.0" y="-266.30002" z="31.600002" diameter="0.34641016"/>
                </mml:segment>

                <mml:segment id="20" name="Seg20_dendrite_0" parent="19" cable="2">
                    <mml:distal x="-4.0" y="-265.0" z="30.599998" diameter="0.28284273"/>
                </mml:segment>

                <mml:segment id="21" name="Seg21_dendrite_0" parent="20" cable="2">
                    <mml:distal x="-4.0" y="-245.65001" z="22.8" diameter="0.3"/>
                </mml:segment>

                <mml:segment id="22" name="Seg22_dendrite_0" parent="21" cable="2">
                    <mml:distal x="-4.0" y="-245.25002" z="22.7" diameter="0.3"/>
                </mml:segment>

                <mml:segment id="27" name="Seg0_dendrit_3" parent="0" cable="3">
                    <mml:proximal x="0.531" y="-270.169" z="42.131" diameter="0.49497476"/>
                    <mml:distal x="5.725" y="-272.90002" z="47.675" diameter="0.49497476"/>
                </mml:segment>

                <mml:segment id="28" name="Seg28_dendrite_0" parent="27" cable="3">
                    <mml:distal x="5.9500003" y="-272.225" z="51.075" diameter="0.3391165"/>
                </mml:segment>

                <mml:segment id="29" name="Seg29_dendrite_0" parent="28" cable="3">
                    <mml:distal x="5.925" y="-272.075" z="55.800003" diameter="0.47434163"/>
                </mml:segment>

                <mml:segment id="30" name="Seg30_dendrite_0" parent="29" cable="3">
                    <mml:distal x="5.925" y="-272.75" z="59.975" diameter="0.48476797"/>
                </mml:segment>

                <mml:segment id="31" name="Seg31_dendrite_0" parent="30" cable="3">
                    <mml:distal x="5.925" y="-273.9" z="60.75" diameter="0.33541018"/>
                </mml:segment>

                <mml:segment id="32" name="Seg32_dendrite_0" parent="31" cable="3">
                    <mml:distal x="5.85" y="-281.0" z="61.75" diameter="0.31622776"/>
                </mml:segment>

                <mml:segment id="33" name="Seg33_dendrite_0" parent="32" cable="3">
                    <mml:distal x="5.85" y="-294.4" z="63.15" diameter="0.31622776"/>
                </mml:segment>

                <mml:segment id="34" name="Seg34_dendrite_0" parent="33" cable="3">
                    <mml:distal x="5.2000003" y="-309.40002" z="64.35" diameter="0.3"/>
                </mml:segment>

                <mml:segment id="35" name="Seg35_dendrite_0" parent="34" cable="3">
                    <mml:distal x="3.7500002" y="-326.0" z="64.950005" diameter="0.31622776"/>
                </mml:segment>

                <mml:segment id="36" name="Seg36_dendrite_0" parent="35" cable="3">
                    <mml:distal x="3.6499999" y="-326.69998" z="64.950005" diameter="0.31622776"/>
                </mml:segment>

                <mml:segment id="23" name="Seg0_dendrit_4" parent="0" cable="4">
                    <mml:proximal x="0.531" y="-270.169" z="42.131" diameter="0.3640055"/>
                    <mml:distal x="4.4" y="-273.625" z="47.65" diameter="0.3640055"/>
                </mml:segment>

                <mml:segment id="24" name="Seg24_dendrite_0" parent="23" cable="4">
                    <mml:distal x="4.425" y="-274.65" z="48.25" diameter="0.40311286"/>
                </mml:segment>

                <mml:segment id="25" name="Seg25_dendrite_0" parent="24" cable="4">
                    <mml:distal x="3.0" y="-275.0" z="51.1" diameter="0.48989794"/>
                </mml:segment>

                <mml:segment id="26" name="Seg26_dendrite_0" parent="25" cable="4">
                    <mml:distal x="0.65000004" y="-275.3" z="52.824997" diameter="0.48218253"/>
                </mml:segment>

                <mml:segment id="6" name="Seg6_neurite_0" parent="5" cable="5">
                    <mml:proximal x="-4.4500003" y="-272.95" z="37.6" diameter="0.50990194"/>
                    <mml:distal x="-4.4500003" y="-273.1" z="37.825" diameter="0.5024938"/>
                </mml:segment>

                <mml:segment id="7" name="Seg7_neurite_0" parent="6" cable="5">
                    <mml:distal x="-4.8500004" y="-273.15" z="38.125" diameter="0.42720017"/>
                </mml:segment>

                <mml:segment id="8" name="Seg8_neurite_0" parent="7" cable="5">
                    <mml:distal x="-7.05" y="-273.42502" z="39.825" diameter="0.36742347"/>
                </mml:segment>

                <mml:segment id="9" name="Seg9_neurite_0" parent="8" cable="5">
                    <mml:distal x="-8.625" y="-273.775" z="42.449997" diameter="0.44158804"/>
                </mml:segment>

                <mml:segment id="10" name="Seg10_neurite_0" parent="9" cable="5">
                    <mml:distal x="-9.15" y="-274.2" z="45.5" diameter="0.5"/>
                </mml:segment>

                <mml:segment id="11" name="Seg11_neurite_0" parent="10" cable="5">
                    <mml:distal x="-8.575" y="-274.65" z="48.525" diameter="0.5244044"/>
                </mml:segment>

                <mml:segment id="12" name="Seg12_neurite_0" parent="11" cable="5">
                    <mml:distal x="-7.05" y="-275.0" z="51.1" diameter="0.45825756"/>
                </mml:segment>

                <mml:segment id="13" name="Seg13_neurite_0" parent="12" cable="5">
                    <mml:distal x="-4.75" y="-275.3" z="52.824997" diameter="0.48218253"/>
                </mml:segment>

                <mml:segment id="14" name="Seg14_neurite_0" parent="13" cable="5">
                    <mml:distal x="-2.0" y="-275.35" z="53.399998" diameter="0.5"/>
                </mml:segment>

                <mml:segment id="15" name="Seg15_neurite_0" parent="5" cable="6">
                    <mml:proximal x="-4.4500003" y="-272.95" z="37.6" diameter="0.50990194"/>
                    <mml:distal x="-4.4500003" y="-273.35" z="37.725" diameter="0.40311286"/>
                </mml:segment>

                <mml:segment id="16" name="Seg16_neurite_0" parent="15" cable="6">
                    <mml:distal x="-4.4500003" y="-274.65" z="37.9" diameter="0.37416574"/>
                </mml:segment>

            </mml:segments>

            <mml:cables>

                <mml:cable id="0" name="Soma">
                    <meta:group>all</meta:group>
                    <meta:group>soma_group</meta:group>
                </mml:cable>

                <mml:cable id="1" name="Axon">
                    <meta:group>all</meta:group>
                    <meta:group>axon_group</meta:group>
                </mml:cable>

                <mml:cable id="2" name="Dendrite2">
                    <meta:group>all</meta:group>
                    <meta:group>dendrite_group</meta:group>
                </mml:cable>

                <mml:cable id="3" name="Dendrite3">
                    <meta:group>all</meta:group>
                    <meta:group>dendrite_group</meta:group>
                </mml:cable>

                <mml:cable id="4" name="Dendrite4">
                    <meta:group>all</meta:group>
                    <meta:group>dendrite_group</meta:group>
                </mml:cable>

                <mml:cable id="5" name="Neurite5">
                    <meta:group>all</meta:group>
                    <meta:group>dendrite_group</meta:group>
                </mml:cable>

                <mml:cable id="6" name="Neurite6">
                    <meta:group>all</meta:group>
                    <meta:group>dendrite_group</meta:group>
                </mml:cable>

            </mml:cables>

            <!--Adding the biophysical parameters-->

            <biophysics units="Physiological Units">

                <bio:mechanism name="LeakConductance" type="Channel Mechanism" passive_conductance="true">
                    <bio:parameter name="e" value="-75.0">
                        <bio:group>all</bio:group>
                    </bio:parameter>
                    <bio:parameter name="gmax" value="0.025">
                        <bio:group>all</bio:group>
                    </bio:parameter>
                </bio:mechanism>

                <bio:spec_capacitance>
                    <bio:parameter value="1.0">
                        <bio:group>all</bio:group>
                    </bio:parameter>
                </bio:spec_capacitance>

                <bio:spec_axial_resistance>
                    <bio:parameter value="0.03">
                        <bio:group>all</bio:group>
                    </bio:parameter>
                </bio:spec_axial_resistance>

                <bio:init_memb_potential>
                    <bio:parameter value="-65.0">
                        <bio:group>all</bio:group>
                    </bio:parameter>
                </bio:init_memb_potential></biophysics>

            <connectivity>
                <net:potential_syn_loc synapse_type="GABA">
                    <net:group>all</net:group>
                </net:potential_syn_loc>

                <net:potential_syn_loc synapse_type="Glutamate">
                    <net:group>all</net:group>
                </net:potential_syn_loc>

                <net:potential_syn_loc synapse_type="Acetylcholine">
                    <net:group>all</net:group>
                </net:potential_syn_loc>

                <net:potential_syn_loc synapse_type="Tyramine">
                    <net:group>all</net:group>
                </net:potential_syn_loc>

                <net:potential_syn_loc synapse_type="FMRFamide">
                    <net:group>all</net:group>
                </net:potential_syn_loc>

                <net:potential_syn_loc synapse_type="Acetylcholine_Tyramine">
                    <net:group>all</net:group>
                </net:potential_syn_loc>

                <net:potential_syn_loc synapse_type="Acetylcholine_GJ">
                    <net:group>all</net:group>
                </net:potential_syn_loc>
            </connectivity>

        </cell>
    </cells>
</neuroml>
