<?xml version="1.0" encoding="UTF-8"?>
<neuroml xmlns="http://morphml.org/neuroml/schema" xmlns:meta="http://morphml.org/metadata/schema" xmlns:mml="http://morphml.org/morphml/schema" xmlns:bio="http://morphml.org/biophysics/schema" xmlns:cml="http://morphml.org/channelml/schema" xmlns:net="http://morphml.org/networkml/schema" xmlns:xsi="http://www.w3.org/2001/XMLSchema-instance" xsi:schemaLocation="http://morphml.org/neuroml/schema  http://neuroml.svn.sourceforge.net/viewvc/neuroml/trunk/web/NeuroMLFiles/Schemata/v1.8.1/Level3/NeuroML_Level3_v1.8.1.xsd" lengthUnits="micron">

    <cells>
        <cell name="VC3">

            <meta:notes>
        Motor Neuron
      </meta:notes>

            <mml:segments>

                <mml:segment id="0" name="Seg0_soma_0" cable="0">
                    <mml:proximal x="-1.4499999" y="-6.45" z="-54.000004" diameter="2.787472"/>
                    <mml:distal x="-1.4499999" y="-6.45" z="-54.000004" diameter="2.787472"/>
                </mml:segment>

                <mml:segment id="1" name="Seg0_axon_0" parent="0" cable="1">
                    <mml:proximal x="-1.4499999" y="-6.45" z="-54.000004" diameter="0.71414286"/>
                    <mml:distal x="-1.4499999" y="-5.45" z="-53.750004" diameter="0.71414286"/>
                </mml:segment>

                <mml:segment id="2" name="Seg2_axon_0" parent="1" cable="1">
                    <mml:distal x="-1.4499999" y="-3.4499998" z="-53.250004" diameter="0.4358899"/>
                </mml:segment>

                <mml:segment id="3" name="Seg3_axon_0" parent="2" cable="1">
                    <mml:distal x="-1.4499999" y="3.7500002" z="-50.050003" diameter="0.4358899"/>
                </mml:segment>

                <mml:segment id="4" name="Seg4_axon_0" parent="3" cable="1">
                    <mml:distal x="-1.4499999" y="32.2" z="-35.350002" diameter="0.42426404"/>
                </mml:segment>

                <mml:segment id="5" name="Seg5_axon_0" parent="4" cable="1">
                    <mml:distal x="-4.35" y="36.1" z="-30.55" diameter="0.46904156"/>
                </mml:segment>

                <mml:segment id="6" name="Seg6_axon_0" parent="5" cable="1">
                    <mml:distal x="-10.625" y="42.05" z="-24.449999" diameter="0.55"/>
                </mml:segment>

                <mml:segment id="7" name="Seg7_axon_0" parent="6" cable="1">
                    <mml:distal x="-13.349999" y="47.600002" z="-19.875" diameter="0.4387482"/>
                </mml:segment>

                <mml:segment id="8" name="Seg8_axon_0" parent="7" cable="1">
                    <mml:distal x="-13.45" y="56.199997" z="-14.45" diameter="0.42426404"/>
                </mml:segment>

                <mml:segment id="9" name="Seg9_axon_0" parent="8" cable="1">
                    <mml:distal x="-10.375" y="61.85" z="-12.65" diameter="0.45"/>
                </mml:segment>

                <mml:segment id="10" name="Seg10_axon_0" parent="9" cable="1">
                    <mml:distal x="-5.85" y="65.525" z="-10.75" diameter="0.45"/>
                </mml:segment>

                <mml:segment id="11" name="Seg11_axon_0" parent="10" cable="1">
                    <mml:distal x="-2.2" y="69.5" z="-11.85" diameter="0.41231057"/>
                </mml:segment>

                <mml:segment id="12" name="Seg12_axon_0" parent="11" cable="1">
                    <mml:distal x="-1.85" y="77.8" z="-6.3500004" diameter="0.42426404"/>
                </mml:segment>

                <mml:segment id="13" name="Seg13_axon_0" parent="12" cable="1">
                    <mml:distal x="-1.4499999" y="84.75" z="-2.0" diameter="0.50990194"/>
                </mml:segment>

                <mml:segment id="14" name="Seg14_axon_0" parent="13" cable="1">
                    <mml:distal x="-1.4499999" y="89.3" z="-0.5" diameter="0.5"/>
                </mml:segment>

                <mml:segment id="15" name="Seg15_axon_0" parent="14" cable="1">
                    <mml:distal x="-1.5" y="109.4" z="3.25" diameter="0.5"/>
                </mml:segment>

                <mml:segment id="16" name="Seg16_axon_0" parent="15" cable="1">
                    <mml:distal x="-1.5" y="109.8" z="3.3500001" diameter="0.5"/>
                </mml:segment>

                <mml:segment id="51" name="Seg0_dendrit_2" parent="0" cable="2">
                    <mml:proximal x="-1.4499999" y="-6.45" z="-54.000004" diameter="0.71414286"/>
                    <mml:distal x="-1.4499999" y="-7.4500003" z="-54.25" diameter="0.71414286"/>
                </mml:segment>

                <mml:segment id="52" name="Seg52_dendrite_0" parent="51" cable="2">
                    <mml:distal x="-1.4499999" y="-10.400001" z="-55.1" diameter="0.5"/>
                </mml:segment>

                <mml:segment id="53" name="Seg53_dendrite_0" parent="52" cable="2">
                    <mml:distal x="-1.4499999" y="-47.15" z="-65.85" diameter="0.4358899"/>
                </mml:segment>

                <mml:segment id="54" name="Seg54_dendrite_0" parent="53" cable="2">
                    <mml:distal x="-1.4499999" y="-53.3" z="-67.049995" diameter="0.42426404"/>
                </mml:segment>

                <mml:segment id="55" name="Seg55_dendrite_0" parent="54" cable="2">
                    <mml:distal x="-1.4499999" y="-84.15" z="-66.649994" diameter="0.4358899"/>
                </mml:segment>

                <mml:segment id="56" name="Seg56_dendrite_0" parent="55" cable="2">
                    <mml:distal x="-1.4499999" y="-102.35" z="-64.0" diameter="0.50990194"/>
                </mml:segment>

                <mml:segment id="57" name="Seg57_dendrite_0" parent="56" cable="2">
                    <mml:distal x="-1.4499999" y="-118.49999" z="-60.2" diameter="0.5"/>
                </mml:segment>

                <mml:segment id="58" name="Seg58_dendrite_0" parent="57" cable="2">
                    <mml:distal x="-1.4499999" y="-135.45001" z="-53.95" diameter="0.4358899"/>
                </mml:segment>

                <mml:segment id="59" name="Seg59_dendrite_0" parent="58" cable="2">
                    <mml:distal x="-1.4499999" y="-162.85" z="-40.05" diameter="0.4358899"/>
                </mml:segment>

                <mml:segment id="60" name="Seg60_dendrite_0" parent="59" cable="2">
                    <mml:distal x="-1.4499999" y="-167.6" z="-37.6" diameter="0.5"/>
                </mml:segment>

                <mml:segment id="61" name="Seg61_dendrite_0" parent="60" cable="2">
                    <mml:distal x="-1.4499999" y="-210.2" z="-8.4" diameter="0.5"/>
                </mml:segment>

                <mml:segment id="62" name="Seg62_dendrite_0" parent="61" cable="2">
                    <mml:distal x="-1.4499999" y="-214.94998" z="-5.25" diameter="0.4358899"/>
                </mml:segment>

                <mml:segment id="63" name="Seg63_dendrite_0" parent="62" cable="2">
                    <mml:distal x="-1.4499999" y="-234.45001" z="8.55" diameter="0.4358899"/>
                </mml:segment>

                <mml:segment id="64" name="Seg64_dendrite_0" parent="63" cable="2">
                    <mml:distal x="-1.4499999" y="-238.84999" z="11.55" diameter="0.4358899"/>
                </mml:segment>

                <mml:segment id="17" name="Seg17_neurite_0" parent="16" cable="3">
                    <mml:proximal x="-1.5" y="109.8" z="3.3500001" diameter="0.5"/>
                    <mml:distal x="-1.5" y="110.2" z="3.4" diameter="0.56568545"/>
                </mml:segment>

                <mml:segment id="18" name="Seg18_neurite_0" parent="17" cable="3">
                    <mml:distal x="-1.5" y="110.950005" z="3.5" diameter="0.5744563"/>
                </mml:segment>

                <mml:segment id="19" name="Seg19_neurite_0" parent="18" cable="4">
                    <mml:proximal x="-1.5" y="110.950005" z="3.5" diameter="0.5744563"/>
                    <mml:distal x="-1.3000001" y="111.12501" z="3.525" diameter="0.51478153"/>
                </mml:segment>

                <mml:segment id="20" name="Seg20_neurite_0" parent="19" cable="4">
                    <mml:distal x="-1.0" y="111.12501" z="3.5500002" diameter="0.39051247"/>
                </mml:segment>

                <mml:segment id="21" name="Seg21_neurite_0" parent="20" cable="4">
                    <mml:distal x="-0.1" y="111.09999" z="3.5500002" diameter="0.2236068"/>
                </mml:segment>

                <mml:segment id="22" name="Seg22_neurite_0" parent="21" cable="4">
                    <mml:distal x="1.05" y="111.09999" z="3.5500002" diameter="0.24494897"/>
                </mml:segment>

                <mml:segment id="23" name="Seg23_neurite_0" parent="22" cable="4">
                    <mml:distal x="1.5" y="110.65" z="3.5500002" diameter="0.24494897"/>
                </mml:segment>

                <mml:segment id="24" name="Seg24_neurite_0" parent="23" cable="4">
                    <mml:distal x="1.525" y="109.2" z="3.5500002" diameter="0.26925823"/>
                </mml:segment>

                <mml:segment id="25" name="Seg25_neurite_0" parent="18" cable="5">
                    <mml:proximal x="-1.5" y="110.950005" z="3.5" diameter="0.5744563"/>
                    <mml:distal x="-1.5" y="111.3" z="3.5500002" diameter="0.5"/>
                </mml:segment>

                <mml:segment id="26" name="Seg26_neurite_0" parent="25" cable="5">
                    <mml:distal x="-1.4499999" y="112.399994" z="3.7500002" diameter="0.42426404"/>
                </mml:segment>

                <mml:segment id="27" name="Seg27_neurite_0" parent="26" cable="6">
                    <mml:proximal x="-1.4499999" y="112.399994" z="3.7500002" diameter="0.42426404"/>
                    <mml:distal x="-1.6" y="112.65" z="3.8" diameter="0.64031243"/>
                </mml:segment>

                <mml:segment id="28" name="Seg28_neurite_0" parent="27" cable="6">
                    <mml:distal x="-1.9" y="112.65" z="3.8" diameter="0.36055514"/>
                </mml:segment>

                <mml:segment id="29" name="Seg29_neurite_0" parent="28" cable="6">
                    <mml:distal x="-2.55" y="112.625" z="3.8" diameter="0.26925823"/>
                </mml:segment>

                <mml:segment id="30" name="Seg30_neurite_0" parent="29" cable="6">
                    <mml:distal x="-2.875" y="113.049995" z="3.8" diameter="0.41533118"/>
                </mml:segment>

                <mml:segment id="31" name="Seg31_neurite_0" parent="30" cable="6">
                    <mml:distal x="-2.8999999" y="113.90001" z="4.05" diameter="0.36055514"/>
                </mml:segment>

                <mml:segment id="32" name="Seg32_neurite_0" parent="31" cable="6">
                    <mml:distal x="-2.95" y="119.1" z="4.4500003" diameter="0.42426404"/>
                </mml:segment>

                <mml:segment id="33" name="Seg33_neurite_0" parent="32" cable="6">
                    <mml:distal x="-2.95" y="123.09999" z="4.4500003" diameter="0.31622776"/>
                </mml:segment>

                <mml:segment id="34" name="Seg34_neurite_0" parent="26" cable="7">
                    <mml:proximal x="-1.4499999" y="112.399994" z="3.7500002" diameter="0.42426404"/>
                    <mml:distal x="-1.4499999" y="112.899994" z="3.85" diameter="0.42426404"/>
                </mml:segment>

                <mml:segment id="35" name="Seg35_neurite_0" parent="34" cable="7">
                    <mml:distal x="-1.4499999" y="116.2" z="4.4500003" diameter="0.42426404"/>
                </mml:segment>

                <mml:segment id="36" name="Seg36_neurite_0" parent="35" cable="7">
                    <mml:distal x="-1.4499999" y="119.149994" z="4.4500003" diameter="0.4358899"/>
                </mml:segment>

                <mml:segment id="37" name="Seg37_neurite_0" parent="26" cable="8">
                    <mml:proximal x="-1.4499999" y="112.399994" z="3.7500002" diameter="0.42426404"/>
                    <mml:distal x="-1.3000001" y="112.65" z="3.8" diameter="0.53851646"/>
                </mml:segment>

                <mml:segment id="38" name="Seg38_neurite_0" parent="37" cable="8">
                    <mml:distal x="-0.9" y="112.65" z="3.8" diameter="0.36055514"/>
                </mml:segment>

                <mml:segment id="39" name="Seg39_neurite_0" parent="38" cable="8">
                    <mml:distal x="0.70000005" y="112.65" z="3.8" diameter="0.36055514"/>
                </mml:segment>

                <mml:segment id="40" name="Seg40_neurite_0" parent="39" cable="8">
                    <mml:distal x="2.2" y="112.65" z="4.1749997" diameter="0.5024938"/>
                </mml:segment>

                <mml:segment id="41" name="Seg41_neurite_0" parent="40" cable="8">
                    <mml:distal x="2.6499999" y="112.15" z="4.5499997" diameter="0.4358899"/>
                </mml:segment>

                <mml:segment id="42" name="Seg42_neurite_0" parent="41" cable="8">
                    <mml:distal x="2.85" y="111.399994" z="4.975" diameter="0.4609772"/>
                </mml:segment>

                <mml:segment id="43" name="Seg43_neurite_0" parent="42" cable="8">
                    <mml:distal x="2.85" y="109.1" z="5.35" diameter="0.42426404"/>
                </mml:segment>

                <mml:segment id="44" name="Seg44_neurite_0" parent="26" cable="9">
                    <mml:proximal x="-1.4499999" y="112.399994" z="3.7500002" diameter="0.42426404"/>
                    <mml:distal x="-1.4499999" y="112.899994" z="3.85" diameter="0.42426404"/>
                </mml:segment>

                <mml:segment id="45" name="Seg45_neurite_0" parent="16" cable="10">
                    <mml:proximal x="-1.5" y="109.8" z="3.3500001" diameter="0.5"/>
                    <mml:distal x="-1.7" y="110.0" z="3.3750002" diameter="0.53150725"/>
                </mml:segment>

                <mml:segment id="46" name="Seg46_neurite_0" parent="45" cable="10">
                    <mml:distal x="-1.9" y="110.0" z="3.3500001" diameter="0.2236068"/>
                </mml:segment>

                <mml:segment id="47" name="Seg47_neurite_0" parent="46" cable="10">
                    <mml:distal x="-2.1" y="110.0" z="3.3500001" diameter="0.2236068"/>
                </mml:segment>

                <mml:segment id="48" name="Seg48_neurite_0" parent="47" cable="10">
                    <mml:distal x="-2.45" y="110.075" z="3.3500001" diameter="0.28722814"/>
                </mml:segment>

                <mml:segment id="49" name="Seg49_neurite_0" parent="48" cable="10">
                    <mml:distal x="-2.75" y="110.5" z="3.3500001" diameter="0.31622776"/>
                </mml:segment>

                <mml:segment id="50" name="Seg50_neurite_0" parent="49" cable="10">
                    <mml:distal x="-2.85" y="112.0" z="3.3500001" diameter="0.31622776"/>
                </mml:segment>

            </mml:segments>

            <mml:cables>

                <mml:cable id="0" name="Soma">
                    <meta:group>all</meta:group>
                    <meta:group>soma_group</meta:group>
                </mml:cable>

                <mml:cable id="1" name="Axon">
                    <meta:group>all</meta:group>
                    <meta:group>axon_group</meta:group>
                </mml:cable>

                <mml:cable id="2" name="Dendrite2">
                    <meta:group>all</meta:group>
                    <meta:group>dendrite_group</meta:group>
                </mml:cable>

                <mml:cable id="3" name="Neurite3">
                    <meta:group>all</meta:group>
                    <meta:group>dendrite_group</meta:group>
                </mml:cable>

                <mml:cable id="4" name="Neurite4">
                    <meta:group>all</meta:group>
                    <meta:group>dendrite_group</meta:group>
                </mml:cable>

                <mml:cable id="5" name="Neurite5">
                    <meta:group>all</meta:group>
                    <meta:group>dendrite_group</meta:group>
                </mml:cable>

                <mml:cable id="6" name="Neurite6">
                    <meta:group>all</meta:group>
                    <meta:group>dendrite_group</meta:group>
                </mml:cable>

                <mml:cable id="7" name="Neurite7">
                    <meta:group>all</meta:group>
                    <meta:group>dendrite_group</meta:group>
                </mml:cable>

                <mml:cable id="8" name="Neurite8">
                    <meta:group>all</meta:group>
                    <meta:group>dendrite_group</meta:group>
                </mml:cable>

                <mml:cable id="9" name="Neurite9">
                    <meta:group>all</meta:group>
                    <meta:group>dendrite_group</meta:group>
                </mml:cable>

                <mml:cable id="10" name="Neurite10">
                    <meta:group>all</meta:group>
                    <meta:group>dendrite_group</meta:group>
                </mml:cable>

            </mml:cables>

            <!--Adding the biophysical parameters-->

            <biophysics units="Physiological Units">

                <bio:mechanism name="LeakConductance" type="Channel Mechanism" passive_conductance="true">
                    <bio:parameter name="e" value="-75.0">
                        <bio:group>all</bio:group>
                    </bio:parameter>
                    <bio:parameter name="gmax" value="0.025">
                        <bio:group>all</bio:group>
                    </bio:parameter>
                </bio:mechanism>

                <bio:spec_capacitance>
                    <bio:parameter value="1.0">
                        <bio:group>all</bio:group>
                    </bio:parameter>
                </bio:spec_capacitance>

                <bio:spec_axial_resistance>
                    <bio:parameter value="0.03">
                        <bio:group>all</bio:group>
                    </bio:parameter>
                </bio:spec_axial_resistance>

                <bio:init_memb_potential>
                    <bio:parameter value="-65.0">
                        <bio:group>all</bio:group>
                    </bio:parameter>
                </bio:init_memb_potential></biophysics>

            <connectivity>
                <net:potential_syn_loc synapse_type="GABA_GJ">
                    <net:group>all</net:group>
                </net:potential_syn_loc>

                <net:potential_syn_loc synapse_type="Glutamate">
                    <net:group>all</net:group>
                </net:potential_syn_loc>

                <net:potential_syn_loc synapse_type="Serotonin_Acetylcholine">
                    <net:group>all</net:group>
                </net:potential_syn_loc>

                <net:potential_syn_loc synapse_type="Serotonin_Acetylcholine_GJ">
                    <net:group>all</net:group>
                </net:potential_syn_loc>

                <net:potential_syn_loc synapse_type="Acetylcholine">
                    <net:group>all</net:group>
                </net:potential_syn_loc>

                <net:potential_syn_loc synapse_type="Serotonin">
                    <net:group>all</net:group>
                </net:potential_syn_loc>

                <net:potential_syn_loc synapse_type="Serotonin_GJ">
                    <net:group>all</net:group>
                </net:potential_syn_loc>

                <net:potential_syn_loc synapse_type="Acetylcholine_GJ">
                    <net:group>all</net:group>
                </net:potential_syn_loc>
            </connectivity>

        </cell>
    </cells>
</neuroml>
