<?xml version="1.0" encoding="UTF-8"?>
<neuroml xmlns="http://www.neuroml.org/schema/neuroml2" xmlns:xsi="http://www.w3.org/2001/XMLSchema-instance" xsi:schemaLocation="http://www.neuroml.org/schema/neuroml2  http://neuroml.svn.sourceforge.net/viewvc/neuroml/NeuroML2/Schemas/NeuroML2/NeuroML_v2alpha.xsd" id="URXL">

    <include href="LeakConductance.nml"/>

    <cell id="URXL">

        <notes>
        Interneuron
      </notes>

        <morphology id="morphology_URXL">

            <segment id="0" name="Seg0_soma_0">
                <proximal x="3.05" y="-269.875" z="48.275" diameter="2.0518284"/>
                <distal x="3.05" y="-269.875" z="48.275" diameter="2.0518284"/>
            </segment>

            <segment id="1" name="Seg0_axon_0">
                <parent segment="0"/>
                <proximal x="3.05" y="-269.875" z="48.275" diameter="0.42426404"/>
                <distal x="3.05" y="-270.30002" z="48.85" diameter="0.42426404"/>
            </segment>

            <segment id="2" name="Seg2_axon_0">
                <parent segment="1"/>
                <distal x="2.7" y="-271.6" z="49.2" diameter="0.28284273"/>
            </segment>

            <segment id="3" name="Seg3_axon_0">
                <parent segment="2"/>
                <distal x="0.6" y="-281.5" z="51.65" diameter="0.36055514"/>
            </segment>

            <segment id="4" name="Seg4_axon_0">
                <parent segment="3"/>
                <distal x="0.70000005" y="-282.4" z="52.249996" diameter="0.36055514"/>
            </segment>

            <segment id="5" name="Seg5_axon_0">
                <parent segment="4"/>
                <distal x="3.125" y="-288.07498" z="57.6" diameter="0.35355338"/>
            </segment>

            <segment id="6" name="Seg6_axon_0">
                <parent segment="5"/>
                <distal x="4.125" y="-291.1" z="59.574997" diameter="0.43011624"/>
            </segment>

            <segment id="7" name="Seg7_axon_0">
                <parent segment="6"/>
                <distal x="4.0750003" y="-298.275" z="60.149998" diameter="0.36742347"/>
            </segment>

            <segment id="8" name="Seg8_axon_0">
                <parent segment="7"/>
                <distal x="2.45" y="-304.55002" z="59.149998" diameter="0.4358899"/>
            </segment>

            <segment id="9" name="Seg9_axon_0">
                <parent segment="8"/>
                <distal x="1.525" y="-320.6" z="60.525" diameter="0.43011624"/>
            </segment>

            <segment id="10" name="Seg10_axon_0">
                <parent segment="9"/>
                <distal x="0.5" y="-336.6" z="61.05" diameter="0.36055514"/>
            </segment>

            <segment id="11" name="Seg11_axon_0">
                <parent segment="10"/>
                <distal x="-0.25" y="-341.35" z="60.725" diameter="0.35000002"/>
            </segment>

            <segment id="12" name="Seg0_dendrit_2">
                <parent segment="0"/>
                <proximal x="3.05" y="-269.875" z="48.275" diameter="0.42426404"/>
                <distal x="3.05" y="-269.45" z="47.7" diameter="0.42426404"/>
            </segment>

            <segment id="13" name="Seg13_dendrite_0">
                <parent segment="12"/>
                <distal x="3.05" y="-269.7" z="47.1" diameter="0.41231057"/>
            </segment>

            <segment id="14" name="Seg14_dendrite_0">
                <parent segment="13"/>
                <distal x="3.325" y="-271.75" z="46.2" diameter="0.33541018"/>
            </segment>

            <segment id="15" name="Seg15_dendrite_0">
                <parent segment="14"/>
                <distal x="3.5750003" y="-273.8" z="45.275" diameter="0.2915476"/>
            </segment>

            <segment id="16" name="Seg16_neurite_0">
                <parent segment="15"/>
                <proximal x="3.5750003" y="-273.8" z="45.275" diameter="0.2915476"/>
                <distal x="3.625" y="-274.0" z="45.4" diameter="0.47169906"/>
            </segment>

            <segment id="17" name="Seg17_neurite_0">
                <parent segment="16"/>
                <distal x="3.3750002" y="-274.175" z="46.5" diameter="0.43011624"/>
            </segment>

            <segment id="18" name="Seg18_neurite_0">
                <parent segment="17"/>
                <distal x="3.05" y="-274.32498" z="48.050003" diameter="0.47169906"/>
            </segment>

            <segment id="19" name="Seg19_neurite_0">
                <parent segment="15"/>
                <proximal x="3.5750003" y="-273.8" z="45.275" diameter="0.2915476"/>
                <distal x="3.6" y="-273.97498" z="45.125" diameter="0.40620193"/>
            </segment>

            <segment id="20" name="Seg20_neurite_0">
                <parent segment="19"/>
                <distal x="3.4499998" y="-273.825" z="44.100002" diameter="0.4609772"/>
            </segment>

            <segment id="21" name="Seg21_neurite_0">
                <parent segment="20"/>
                <distal x="3.2749999" y="-273.675" z="42.85" diameter="0.44158804"/>
            </segment>

            <segmentGroup id="Soma">
                <member segment="0"/>
            </segmentGroup>

            <segmentGroup id="Axon">
                <member segment="1"/>

                <member segment="2"/>

                <member segment="3"/>

                <member segment="4"/>

                <member segment="5"/>

                <member segment="6"/>

                <member segment="7"/>

                <member segment="8"/>

                <member segment="9"/>

                <member segment="10"/>

                <member segment="11"/>
            </segmentGroup>

            <segmentGroup id="Dendrite2">
                <member segment="12"/>

                <member segment="13"/>

                <member segment="14"/>

                <member segment="15"/>
            </segmentGroup>

            <segmentGroup id="Neurite3">
                <member segment="16"/>

                <member segment="17"/>

                <member segment="18"/>
            </segmentGroup>

            <segmentGroup id="Neurite4">
                <member segment="19"/>

                <member segment="20"/>

                <member segment="21"/>
            </segmentGroup>

            <segmentGroup id="all">
                <include segmentGroup="Soma"/>
                <include segmentGroup="Axon"/>
                <include segmentGroup="Dendrite2"/>
                <include segmentGroup="Neurite3"/>
                <include segmentGroup="Neurite4"/>
            </segmentGroup>

            <segmentGroup id="soma_group">
                <include segmentGroup="Soma"/>
            </segmentGroup>

            <segmentGroup id="axon_group">
                <include segmentGroup="Axon"/>
            </segmentGroup>

            <segmentGroup id="dendrite_group">
                <include segmentGroup="Dendrite2"/>
                <include segmentGroup="Neurite3"/>
                <include segmentGroup="Neurite4"/>
            </segmentGroup>

        </morphology>

            <!--Adding the biophysical parameters-->

        <biophysicalProperties id="biophys">

            <membraneProperties>

                <channelDensity condDensity="0.025 mS_per_cm2" id="LeakConductance_all" ionChannel="LeakConductance" ion="non_specific" erev="-75.0 mV"/>

                <spikeThresh value="0 mV"/>

                <specificCapacitance value="1.0 uF_per_cm2"/>

                <initMembPotential value="-65.0 mV"/>

            </membraneProperties>

            <intracellularProperties>

                <resistivity value="0.03 kohm_cm"/>

            </intracellularProperties>

        </biophysicalProperties>

    </cell>

</neuroml>
