<Lems>

    <!--

Parameters and setting used to generate this network:

    Cells:                         ['AS1', 'AS10', 'AS11', 'AS2', 'AS3', 'AS4', 'AS5', 'AS6', 'AS7', 'AS8', 'AS9', 'AVFL', 'AVFR', 'AVKR', 'AVL', 'CEPVL', 'CEPVR', 'DA1', 'DA2', 'DA3', 'DA4', 'DA5', 'DA6', 'DA7', 'DA8', 'DA9', 'DB1', 'DB2', 'DB3', 'DB4', 'DB5', 'DB6', 'DB7', 'DD1', 'DD2', 'DD3', 'DD4', 'DD5', 'DD6', 'DVB', 'HSNL', 'HSNR', 'IL1DL', 'IL1DR', 'IL1L', 'IL1R', 'IL1VL', 'IL1VR', 'PDA', 'PDB', 'PVNL', 'PVNR', 'RID', 'RIML', 'RIMR', 'RIVL', 'RIVR', 'RMDDL', 'RMDDR', 'RMDL', 'RMDR', 'RMDVL', 'RMDVR', 'RMED', 'RMEL', 'RMER', 'RMEV', 'RMFL', 'RMGL', 'RMGR', 'RMHL', 'RMHR', 'SMBDL', 'SMBDR', 'SMBVL', 'SMBVR', 'SMDDL', 'SMDDR', 'SMDVL', 'SMDVR', 'URADL', 'URADR', 'URAVL', 'URAVR', 'VA1', 'VA10', 'VA11', 'VA12', 'VA2', 'VA3', 'VA4', 'VA5', 'VA6', 'VA7', 'VA8', 'VA9', 'VB1', 'VB10', 'VB11', 'VB2', 'VB3', 'VB4', 'VB5', 'VB6', 'VB7', 'VB8', 'VB9', 'VC1', 'VC2', 'VC3', 'VC4', 'VC5', 'VC6', 'VD1', 'VD10', 'VD11', 'VD12', 'VD13', 'VD2', 'VD3', 'VD4', 'VD5', 'VD6', 'VD7', 'VD8', 'VD9']
    Cell stimulated:               ['AS1', 'AS10', 'AS11', 'AS2', 'AS3', 'AS4', 'SMBDL', 'SMBDR', 'VA1', 'VA10', 'DD1', 'DD2']
    Connection numbers overridden: None
    Connection numbers scaled:     None
    Include muscles:               True

    Known BioParameters:
        BioParameter: iaf_leak_reversal = -70mV (SRC: BlindGuess, certainty 0.1)
        BioParameter: iaf_reset = -70mV (SRC: BlindGuess, certainty 0.1)
        BioParameter: iaf_thresh = -50mV (SRC: BlindGuess, certainty 0.1)
        BioParameter: iaf_C = 0.2nF (SRC: BlindGuess, certainty 0.1)
        BioParameter: iaf_conductance = 0.01uS (SRC: BlindGuess, certainty 0.1)
        BioParameter: iaf_tau1 = 50ms (SRC: BlindGuess, certainty 0.1)
        BioParameter: chem_exc_syn_gbase = 0.8nS (SRC: BlindGuess, certainty 0.1)
        BioParameter: chem_exc_syn_erev = 0mV (SRC: BlindGuess, certainty 0.1)
        BioParameter: chem_exc_syn_rise = 3ms (SRC: BlindGuess, certainty 0.1)
        BioParameter: chem_exc_syn_decay = 10ms (SRC: BlindGuess, certainty 0.1)
        BioParameter: chem_inh_syn_gbase = 0.4nS (SRC: BlindGuess, certainty 0.1)
        BioParameter: chem_inh_syn_erev = -80mV (SRC: BlindGuess, certainty 0.1)
        BioParameter: chem_inh_syn_rise = 3ms (SRC: BlindGuess, certainty 0.1)
        BioParameter: chem_inh_syn_decay = 10ms (SRC: BlindGuess, certainty 0.1)
        BioParameter: elec_syn_gbase = 0.5nS (SRC: BlindGuess, certainty 0.1)
        BioParameter: unphysiological_offset_current = 0.3nA (SRC: KnownError, certainty 0)
        BioParameter: unphysiological_offset_current_dur = 200ms (SRC: KnownError, certainty 0)

    -->

    <Target component="sim_c302_B_Muscles" />

    <!-- Include core NeuroML2 ComponentType definitions -->

    <Include file="Cells.xml" />
    <Include file="Networks.xml" />
    <Include file="Simulation.xml" />

    <Include file="cell_B.xml" />

    <Include file="c302_B_Muscles.nml" />

    <!-- End of NeuroML2 content -->

    <Simulation id="sim_c302_B_Muscles" length="500ms" step="0.1ms" target="c302_B_Muscles">

        <Display id="neurons" title="c302_B_Muscles: Membrane potential of a number of neurons" timeScale="1ms" xmin="-50.0" xmax="550.0" ymin="-72" ymax="-48">

            <Line id="AS1" quantity="AS1[0]/v" scale="1mV" color="#f87100" timeScale="1ms" />
            <Line id="AS10" quantity="AS10[0]/v" scale="1mV" color="#ac15c4" timeScale="1ms" />
            <Line id="AVFL" quantity="AVFL[0]/v" scale="1mV" color="#58a09e" timeScale="1ms" />
            <Line id="DA1" quantity="DA1[0]/v" scale="1mV" color="#007df7" timeScale="1ms" />
            <Line id="DB1" quantity="DB1[0]/v" scale="1mV" color="#9a1694" timeScale="1ms" />
            <Line id="DVB" quantity="DVB[0]/v" scale="1mV" color="#7b5b40" timeScale="1ms" />
            <Line id="IL1DL" quantity="IL1DL[0]/v" scale="1mV" color="#008200" timeScale="1ms" />
            <Line id="RID" quantity="RID[0]/v" scale="1mV" color="#00962a" timeScale="1ms" />
            <Line id="RIML" quantity="RIML[0]/v" scale="1mV" color="#c6f524" timeScale="1ms" />
            <Line id="SMBDL" quantity="SMBDL[0]/v" scale="1mV" color="#cf2d27" timeScale="1ms" />
            <Line id="VB10" quantity="VB10[0]/v" scale="1mV" color="#006359" timeScale="1ms" />
            <Line id="VC1" quantity="VC1[0]/v" scale="1mV" color="#c979d2" timeScale="1ms" />
            <Line id="VC2" quantity="VC2[0]/v" scale="1mV" color="#d14b1f" timeScale="1ms" />

        </Display>

        <Display id="muscles" title="c302_B_Muscles: Membrane potential of a number of muscles" timeScale="1ms" xmin="-50.0" xmax="550.0" ymin="-72" ymax="-48">

            <Line id="MDL05" quantity="MDL05[0]/v" scale="1mV" color="#88d57c" timeScale="1ms" />
            <Line id="MDR05" quantity="MDR05[0]/v" scale="1mV" color="#58b4d0" timeScale="1ms" />
            <Line id="MDL08" quantity="MDL08[0]/v" scale="1mV" color="#27d8b9" timeScale="1ms" />
            <Line id="MDR08" quantity="MDR08[0]/v" scale="1mV" color="#650049" timeScale="1ms" />
            <Line id="MDL20" quantity="MDL20[0]/v" scale="1mV" color="#efb351" timeScale="1ms" />
            <Line id="MDR20" quantity="MDR20[0]/v" scale="1mV" color="#126d33" timeScale="1ms" />
            <Line id="MDL19" quantity="MDL19[0]/v" scale="1mV" color="#80d25c" timeScale="1ms" />
            <Line id="MDR19" quantity="MDR19[0]/v" scale="1mV" color="#2c964d" timeScale="1ms" />
            <Line id="MDL21" quantity="MDL21[0]/v" scale="1mV" color="#c68d55" timeScale="1ms" />
            <Line id="MDL22" quantity="MDL22[0]/v" scale="1mV" color="#d81153" timeScale="1ms" />
            <Line id="MDL23" quantity="MDL23[0]/v" scale="1mV" color="#c22637" timeScale="1ms" />
            <Line id="MDL24" quantity="MDL24[0]/v" scale="1mV" color="#d361e0" timeScale="1ms" />
            <Line id="MDR21" quantity="MDR21[0]/v" scale="1mV" color="#6cb0d9" timeScale="1ms" />
            <Line id="MDR22" quantity="MDR22[0]/v" scale="1mV" color="#69dc47" timeScale="1ms" />
            <Line id="MDR23" quantity="MDR23[0]/v" scale="1mV" color="#b89600" timeScale="1ms" />
            <Line id="MDR24" quantity="MDR24[0]/v" scale="1mV" color="#2a4f12" timeScale="1ms" />
            <Line id="MDL07" quantity="MDL07[0]/v" scale="1mV" color="#7b667a" timeScale="1ms" />
            <Line id="MDR07" quantity="MDR07[0]/v" scale="1mV" color="#3485ee" timeScale="1ms" />
            <Line id="MDL10" quantity="MDL10[0]/v" scale="1mV" color="#cdbaa9" timeScale="1ms" />
            <Line id="MDR10" quantity="MDR10[0]/v" scale="1mV" color="#1023e8" timeScale="1ms" />
            <Line id="MDL09" quantity="MDL09[0]/v" scale="1mV" color="#ff4cb0" timeScale="1ms" />
            <Line id="MDR09" quantity="MDR09[0]/v" scale="1mV" color="#32d147" timeScale="1ms" />
            <Line id="MDL12" quantity="MDL12[0]/v" scale="1mV" color="#555244" timeScale="1ms" />
            <Line id="MDR12" quantity="MDR12[0]/v" scale="1mV" color="#d34223" timeScale="1ms" />
            <Line id="MDL11" quantity="MDL11[0]/v" scale="1mV" color="#faabfe" timeScale="1ms" />
            <Line id="MDR11" quantity="MDR11[0]/v" scale="1mV" color="#11c34e" timeScale="1ms" />
            <Line id="MDL14" quantity="MDL14[0]/v" scale="1mV" color="#81a7d0" timeScale="1ms" />
            <Line id="MDR14" quantity="MDR14[0]/v" scale="1mV" color="#2980f1" timeScale="1ms" />
            <Line id="MDL13" quantity="MDL13[0]/v" scale="1mV" color="#9f25f3" timeScale="1ms" />
            <Line id="MDR13" quantity="MDR13[0]/v" scale="1mV" color="#81c6db" timeScale="1ms" />
            <Line id="MDL16" quantity="MDL16[0]/v" scale="1mV" color="#899972" timeScale="1ms" />
            <Line id="MDR16" quantity="MDR16[0]/v" scale="1mV" color="#ade39b" timeScale="1ms" />
            <Line id="MDL15" quantity="MDL15[0]/v" scale="1mV" color="#58f1b1" timeScale="1ms" />
            <Line id="MDR15" quantity="MDR15[0]/v" scale="1mV" color="#73144b" timeScale="1ms" />
            <Line id="MDL18" quantity="MDL18[0]/v" scale="1mV" color="#a7b2cc" timeScale="1ms" />
            <Line id="MDR18" quantity="MDR18[0]/v" scale="1mV" color="#2ca436" timeScale="1ms" />
            <Line id="MDL17" quantity="MDL17[0]/v" scale="1mV" color="#bb8022" timeScale="1ms" />
            <Line id="MDR17" quantity="MDR17[0]/v" scale="1mV" color="#ea7899" timeScale="1ms" />
            <Line id="MVL12" quantity="MVL12[0]/v" scale="1mV" color="#3c0050" timeScale="1ms" />
            <Line id="MVL11" quantity="MVL11[0]/v" scale="1mV" color="#de8998" timeScale="1ms" />
            <Line id="MVL14" quantity="MVL14[0]/v" scale="1mV" color="#eeb7a5" timeScale="1ms" />
            <Line id="MVR14" quantity="MVR14[0]/v" scale="1mV" color="#f88b69" timeScale="1ms" />
            <Line id="MVL10" quantity="MVL10[0]/v" scale="1mV" color="#2cf396" timeScale="1ms" />
            <Line id="MVR10" quantity="MVR10[0]/v" scale="1mV" color="#96d484" timeScale="1ms" />
            <Line id="MVL03" quantity="MVL03[0]/v" scale="1mV" color="#1aadda" timeScale="1ms" />
            <Line id="MVR04" quantity="MVR04[0]/v" scale="1mV" color="#7d8c21" timeScale="1ms" />
            <Line id="MANAL" quantity="MANAL[0]/v" scale="1mV" color="#56f5b6" timeScale="1ms" />
            <Line id="MVULVA" quantity="MVULVA[0]/v" scale="1mV" color="#79efee" timeScale="1ms" />
            <Line id="MDL01" quantity="MDL01[0]/v" scale="1mV" color="#8afe16" timeScale="1ms" />
            <Line id="MDL02" quantity="MDL02[0]/v" scale="1mV" color="#61b233" timeScale="1ms" />
            <Line id="MDL04" quantity="MDL04[0]/v" scale="1mV" color="#1900ae" timeScale="1ms" />
            <Line id="MDR01" quantity="MDR01[0]/v" scale="1mV" color="#eeb7e7" timeScale="1ms" />
            <Line id="MDR02" quantity="MDR02[0]/v" scale="1mV" color="#99ece9" timeScale="1ms" />
            <Line id="MDL03" quantity="MDL03[0]/v" scale="1mV" color="#28ec31" timeScale="1ms" />
            <Line id="MVL01" quantity="MVL01[0]/v" scale="1mV" color="#5645e4" timeScale="1ms" />
            <Line id="MDR03" quantity="MDR03[0]/v" scale="1mV" color="#3f49f9" timeScale="1ms" />
            <Line id="MVR01" quantity="MVR01[0]/v" scale="1mV" color="#f6ec5a" timeScale="1ms" />
            <Line id="MVR03" quantity="MVR03[0]/v" scale="1mV" color="#8dc8b8" timeScale="1ms" />
            <Line id="MVL02" quantity="MVL02[0]/v" scale="1mV" color="#a6b77c" timeScale="1ms" />
            <Line id="MVR02" quantity="MVR02[0]/v" scale="1mV" color="#d554d2" timeScale="1ms" />
            <Line id="MVL22" quantity="MVL22[0]/v" scale="1mV" color="#4dc5cd" timeScale="1ms" />
            <Line id="MVR21" quantity="MVR21[0]/v" scale="1mV" color="#2d234d" timeScale="1ms" />
            <Line id="MVL09" quantity="MVL09[0]/v" scale="1mV" color="#44ebf3" timeScale="1ms" />
            <Line id="MVL13" quantity="MVL13[0]/v" scale="1mV" color="#2bcb3b" timeScale="1ms" />
            <Line id="MVR05" quantity="MVR05[0]/v" scale="1mV" color="#d1d590" timeScale="1ms" />
            <Line id="MVL05" quantity="MVL05[0]/v" scale="1mV" color="#902536" timeScale="1ms" />
            <Line id="MVL07" quantity="MVL07[0]/v" scale="1mV" color="#855831" timeScale="1ms" />
            <Line id="MVR06" quantity="MVR06[0]/v" scale="1mV" color="#5d71af" timeScale="1ms" />
            <Line id="MVR08" quantity="MVR08[0]/v" scale="1mV" color="#f2a685" timeScale="1ms" />
            <Line id="MVL06" quantity="MVL06[0]/v" scale="1mV" color="#904e97" timeScale="1ms" />
            <Line id="MVL08" quantity="MVL08[0]/v" scale="1mV" color="#f992c3" timeScale="1ms" />
            <Line id="MDR04" quantity="MDR04[0]/v" scale="1mV" color="#1c6adc" timeScale="1ms" />
            <Line id="MVR07" quantity="MVR07[0]/v" scale="1mV" color="#cac03a" timeScale="1ms" />
            <Line id="MVL04" quantity="MVL04[0]/v" scale="1mV" color="#ad0082" timeScale="1ms" />
            <Line id="MDL06" quantity="MDL06[0]/v" scale="1mV" color="#00f300" timeScale="1ms" />
            <Line id="MDR06" quantity="MDR06[0]/v" scale="1mV" color="#a094e5" timeScale="1ms" />
            <Line id="MVR09" quantity="MVR09[0]/v" scale="1mV" color="#6bbe86" timeScale="1ms" />
            <Line id="MVR12" quantity="MVR12[0]/v" scale="1mV" color="#f598ea" timeScale="1ms" />
            <Line id="MVR11" quantity="MVR11[0]/v" scale="1mV" color="#9bec6d" timeScale="1ms" />
            <Line id="MVR13" quantity="MVR13[0]/v" scale="1mV" color="#18e4d6" timeScale="1ms" />
            <Line id="MVL15" quantity="MVL15[0]/v" scale="1mV" color="#879aa9" timeScale="1ms" />
            <Line id="MVL16" quantity="MVL16[0]/v" scale="1mV" color="#1be755" timeScale="1ms" />
            <Line id="MVR15" quantity="MVR15[0]/v" scale="1mV" color="#856551" timeScale="1ms" />
            <Line id="MVR16" quantity="MVR16[0]/v" scale="1mV" color="#a454ba" timeScale="1ms" />
            <Line id="MVL18" quantity="MVL18[0]/v" scale="1mV" color="#13ea73" timeScale="1ms" />
            <Line id="MVR18" quantity="MVR18[0]/v" scale="1mV" color="#9c1baa" timeScale="1ms" />
            <Line id="MVL17" quantity="MVL17[0]/v" scale="1mV" color="#44d5c1" timeScale="1ms" />
            <Line id="MVR17" quantity="MVR17[0]/v" scale="1mV" color="#009356" timeScale="1ms" />
            <Line id="MVL19" quantity="MVL19[0]/v" scale="1mV" color="#c6f0c7" timeScale="1ms" />
            <Line id="MVL20" quantity="MVL20[0]/v" scale="1mV" color="#8f58ae" timeScale="1ms" />
            <Line id="MVR19" quantity="MVR19[0]/v" scale="1mV" color="#753859" timeScale="1ms" />
            <Line id="MVR20" quantity="MVR20[0]/v" scale="1mV" color="#00225c" timeScale="1ms" />
            <Line id="MVL21" quantity="MVL21[0]/v" scale="1mV" color="#289e8f" timeScale="1ms" />
            <Line id="MVL23" quantity="MVL23[0]/v" scale="1mV" color="#c0add7" timeScale="1ms" />
            <Line id="MVR22" quantity="MVR22[0]/v" scale="1mV" color="#a093b6" timeScale="1ms" />
            <Line id="MVR23" quantity="MVR23[0]/v" scale="1mV" color="#23807a" timeScale="1ms" />
            <Line id="MVR24" quantity="MVR24[0]/v" scale="1mV" color="#2421ff" timeScale="1ms" />

        </Display>

        <Display id="activity_neurons" title="c302_B_Muscles: Activity of a number of neurons" timeScale="1ms" xmin="-50.0" xmax="550.0" ymin="-0.1" ymax="1.1">

            <Line id="AS1" quantity="AS1[0]/activity" scale="1" color="#eaf195" timeScale="1ms" />
            <Line id="AS10" quantity="AS10[0]/activity" scale="1" color="#3c00ca" timeScale="1ms" />
            <Line id="AVFL" quantity="AVFL[0]/activity" scale="1" color="#262f1d" timeScale="1ms" />
            <Line id="DA1" quantity="DA1[0]/activity" scale="1" color="#108b77" timeScale="1ms" />
            <Line id="DB1" quantity="DB1[0]/activity" scale="1" color="#458fa5" timeScale="1ms" />
            <Line id="DVB" quantity="DVB[0]/activity" scale="1" color="#ef7488" timeScale="1ms" />
            <Line id="IL1DL" quantity="IL1DL[0]/activity" scale="1" color="#247960" timeScale="1ms" />
            <Line id="RID" quantity="RID[0]/activity" scale="1" color="#8f25f0" timeScale="1ms" />
            <Line id="RIML" quantity="RIML[0]/activity" scale="1" color="#4e0047" timeScale="1ms" />
            <Line id="SMBDL" quantity="SMBDL[0]/activity" scale="1" color="#f527d6" timeScale="1ms" />
            <Line id="VB10" quantity="VB10[0]/activity" scale="1" color="#57d17a" timeScale="1ms" />
            <Line id="VC1" quantity="VC1[0]/activity" scale="1" color="#e270c8" timeScale="1ms" />
            <Line id="VC2" quantity="VC2[0]/activity" scale="1" color="#2f701e" timeScale="1ms" />

        </Display>

        <Display id="activity_muscles" title="c302_B_Muscles: Activity of a number of muscles" timeScale="1ms" xmin="-50.0" xmax="550.0" ymin="-0.1" ymax="1.1">

            <Line id="MDL05" quantity="MDL05[0]/activity" scale="1" color="#d2a8a4" timeScale="1ms" />
            <Line id="MDR05" quantity="MDR05[0]/activity" scale="1" color="#28e945" timeScale="1ms" />
            <Line id="MDL08" quantity="MDL08[0]/activity" scale="1" color="#cb7212" timeScale="1ms" />
            <Line id="MDR08" quantity="MDR08[0]/activity" scale="1" color="#008216" timeScale="1ms" />
            <Line id="MDL20" quantity="MDL20[0]/activity" scale="1" color="#f21142" timeScale="1ms" />
            <Line id="MDR20" quantity="MDR20[0]/activity" scale="1" color="#65b5e4" timeScale="1ms" />
            <Line id="MDL19" quantity="MDL19[0]/activity" scale="1" color="#dc84b4" timeScale="1ms" />
            <Line id="MDR19" quantity="MDR19[0]/activity" scale="1" color="#d08980" timeScale="1ms" />
            <Line id="MDL21" quantity="MDL21[0]/activity" scale="1" color="#21a0ed" timeScale="1ms" />
            <Line id="MDL22" quantity="MDL22[0]/activity" scale="1" color="#00ada4" timeScale="1ms" />
            <Line id="MDL23" quantity="MDL23[0]/activity" scale="1" color="#6fbd35" timeScale="1ms" />
            <Line id="MDL24" quantity="MDL24[0]/activity" scale="1" color="#f68aec" timeScale="1ms" />
            <Line id="MDR21" quantity="MDR21[0]/activity" scale="1" color="#d71742" timeScale="1ms" />
            <Line id="MDR22" quantity="MDR22[0]/activity" scale="1" color="#1d6036" timeScale="1ms" />
            <Line id="MDR23" quantity="MDR23[0]/activity" scale="1" color="#e171c7" timeScale="1ms" />
            <Line id="MDR24" quantity="MDR24[0]/activity" scale="1" color="#656eaf" timeScale="1ms" />
            <Line id="MDL07" quantity="MDL07[0]/activity" scale="1" color="#485e9a" timeScale="1ms" />
            <Line id="MDR07" quantity="MDR07[0]/activity" scale="1" color="#75aba9" timeScale="1ms" />
            <Line id="MDL10" quantity="MDL10[0]/activity" scale="1" color="#1a5ecc" timeScale="1ms" />
            <Line id="MDR10" quantity="MDR10[0]/activity" scale="1" color="#97fbc1" timeScale="1ms" />
            <Line id="MDL09" quantity="MDL09[0]/activity" scale="1" color="#54f34b" timeScale="1ms" />
            <Line id="MDR09" quantity="MDR09[0]/activity" scale="1" color="#899a57" timeScale="1ms" />
            <Line id="MDL12" quantity="MDL12[0]/activity" scale="1" color="#c3978c" timeScale="1ms" />
            <Line id="MDR12" quantity="MDR12[0]/activity" scale="1" color="#0000fe" timeScale="1ms" />
            <Line id="MDL11" quantity="MDL11[0]/activity" scale="1" color="#846f84" timeScale="1ms" />
            <Line id="MDR11" quantity="MDR11[0]/activity" scale="1" color="#b3e938" timeScale="1ms" />
            <Line id="MDL14" quantity="MDL14[0]/activity" scale="1" color="#af5590" timeScale="1ms" />
            <Line id="MDR14" quantity="MDR14[0]/activity" scale="1" color="#f42388" timeScale="1ms" />
            <Line id="MDL13" quantity="MDL13[0]/activity" scale="1" color="#3e2a82" timeScale="1ms" />
            <Line id="MDR13" quantity="MDR13[0]/activity" scale="1" color="#53b690" timeScale="1ms" />
            <Line id="MDL16" quantity="MDL16[0]/activity" scale="1" color="#5feec4" timeScale="1ms" />
            <Line id="MDR16" quantity="MDR16[0]/activity" scale="1" color="#123ace" timeScale="1ms" />
            <Line id="MDL15" quantity="MDL15[0]/activity" scale="1" color="#617e00" timeScale="1ms" />
            <Line id="MDR15" quantity="MDR15[0]/activity" scale="1" color="#ee26ad" timeScale="1ms" />
            <Line id="MDL18" quantity="MDL18[0]/activity" scale="1" color="#de5b5f" timeScale="1ms" />
            <Line id="MDR18" quantity="MDR18[0]/activity" scale="1" color="#32fe9f" timeScale="1ms" />
            <Line id="MDL17" quantity="MDL17[0]/activity" scale="1" color="#e9a700" timeScale="1ms" />
            <Line id="MDR17" quantity="MDR17[0]/activity" scale="1" color="#5f65c8" timeScale="1ms" />
            <Line id="MVL12" quantity="MVL12[0]/activity" scale="1" color="#fd1e9a" timeScale="1ms" />
            <Line id="MVL11" quantity="MVL11[0]/activity" scale="1" color="#8a525d" timeScale="1ms" />
            <Line id="MVL14" quantity="MVL14[0]/activity" scale="1" color="#75eae1" timeScale="1ms" />
            <Line id="MVR14" quantity="MVR14[0]/activity" scale="1" color="#3146de" timeScale="1ms" />
            <Line id="MVL10" quantity="MVL10[0]/activity" scale="1" color="#d988c1" timeScale="1ms" />
            <Line id="MVR10" quantity="MVR10[0]/activity" scale="1" color="#bace5f" timeScale="1ms" />
            <Line id="MVL03" quantity="MVL03[0]/activity" scale="1" color="#d620c9" timeScale="1ms" />
            <Line id="MVR04" quantity="MVR04[0]/activity" scale="1" color="#c53db3" timeScale="1ms" />
            <Line id="MANAL" quantity="MANAL[0]/activity" scale="1" color="#5b8c30" timeScale="1ms" />
            <Line id="MVULVA" quantity="MVULVA[0]/activity" scale="1" color="#527186" timeScale="1ms" />
            <Line id="MDL01" quantity="MDL01[0]/activity" scale="1" color="#329c56" timeScale="1ms" />
            <Line id="MDL02" quantity="MDL02[0]/activity" scale="1" color="#00f951" timeScale="1ms" />
            <Line id="MDL04" quantity="MDL04[0]/activity" scale="1" color="#6c57fb" timeScale="1ms" />
            <Line id="MDR01" quantity="MDR01[0]/activity" scale="1" color="#2af900" timeScale="1ms" />
            <Line id="MDR02" quantity="MDR02[0]/activity" scale="1" color="#b4ed9c" timeScale="1ms" />
            <Line id="MDL03" quantity="MDL03[0]/activity" scale="1" color="#747280" timeScale="1ms" />
            <Line id="MVL01" quantity="MVL01[0]/activity" scale="1" color="#64b07e" timeScale="1ms" />
            <Line id="MDR03" quantity="MDR03[0]/activity" scale="1" color="#e8283b" timeScale="1ms" />
            <Line id="MVR01" quantity="MVR01[0]/activity" scale="1" color="#8b6e72" timeScale="1ms" />
            <Line id="MVR03" quantity="MVR03[0]/activity" scale="1" color="#b8123e" timeScale="1ms" />
            <Line id="MVL02" quantity="MVL02[0]/activity" scale="1" color="#c8f5b1" timeScale="1ms" />
            <Line id="MVR02" quantity="MVR02[0]/activity" scale="1" color="#85cfaf" timeScale="1ms" />
            <Line id="MVL22" quantity="MVL22[0]/activity" scale="1" color="#802460" timeScale="1ms" />
            <Line id="MVR21" quantity="MVR21[0]/activity" scale="1" color="#7dcd9a" timeScale="1ms" />
            <Line id="MVL09" quantity="MVL09[0]/activity" scale="1" color="#dc79e0" timeScale="1ms" />
            <Line id="MVL13" quantity="MVL13[0]/activity" scale="1" color="#4011d4" timeScale="1ms" />
            <Line id="MVR05" quantity="MVR05[0]/activity" scale="1" color="#256537" timeScale="1ms" />
            <Line id="MVL05" quantity="MVL05[0]/activity" scale="1" color="#ba9eae" timeScale="1ms" />
            <Line id="MVL07" quantity="MVL07[0]/activity" scale="1" color="#398e00" timeScale="1ms" />
            <Line id="MVR06" quantity="MVR06[0]/activity" scale="1" color="#006c6c" timeScale="1ms" />
            <Line id="MVR08" quantity="MVR08[0]/activity" scale="1" color="#c2c6c8" timeScale="1ms" />
            <Line id="MVL06" quantity="MVL06[0]/activity" scale="1" color="#00b31f" timeScale="1ms" />
            <Line id="MVL08" quantity="MVL08[0]/activity" scale="1" color="#65356e" timeScale="1ms" />
            <Line id="MDR04" quantity="MDR04[0]/activity" scale="1" color="#9ceab9" timeScale="1ms" />
            <Line id="MVR07" quantity="MVR07[0]/activity" scale="1" color="#106120" timeScale="1ms" />
            <Line id="MVL04" quantity="MVL04[0]/activity" scale="1" color="#cdbb00" timeScale="1ms" />
            <Line id="MDL06" quantity="MDL06[0]/activity" scale="1" color="#c1e23b" timeScale="1ms" />
            <Line id="MDR06" quantity="MDR06[0]/activity" scale="1" color="#3e7543" timeScale="1ms" />
            <Line id="MVR09" quantity="MVR09[0]/activity" scale="1" color="#004ba8" timeScale="1ms" />
            <Line id="MVR12" quantity="MVR12[0]/activity" scale="1" color="#b4a7a1" timeScale="1ms" />
            <Line id="MVR11" quantity="MVR11[0]/activity" scale="1" color="#6f5749" timeScale="1ms" />
            <Line id="MVR13" quantity="MVR13[0]/activity" scale="1" color="#bc9256" timeScale="1ms" />
            <Line id="MVL15" quantity="MVL15[0]/activity" scale="1" color="#68712e" timeScale="1ms" />
            <Line id="MVL16" quantity="MVL16[0]/activity" scale="1" color="#97fa30" timeScale="1ms" />
            <Line id="MVR15" quantity="MVR15[0]/activity" scale="1" color="#83a3f3" timeScale="1ms" />
            <Line id="MVR16" quantity="MVR16[0]/activity" scale="1" color="#9d43df" timeScale="1ms" />
            <Line id="MVL18" quantity="MVL18[0]/activity" scale="1" color="#9d0000" timeScale="1ms" />
            <Line id="MVR18" quantity="MVR18[0]/activity" scale="1" color="#b42e93" timeScale="1ms" />
            <Line id="MVL17" quantity="MVL17[0]/activity" scale="1" color="#d24ff0" timeScale="1ms" />
            <Line id="MVR17" quantity="MVR17[0]/activity" scale="1" color="#8bbd16" timeScale="1ms" />
            <Line id="MVL19" quantity="MVL19[0]/activity" scale="1" color="#0015d8" timeScale="1ms" />
            <Line id="MVL20" quantity="MVL20[0]/activity" scale="1" color="#d19c00" timeScale="1ms" />
            <Line id="MVR19" quantity="MVR19[0]/activity" scale="1" color="#5663b2" timeScale="1ms" />
            <Line id="MVR20" quantity="MVR20[0]/activity" scale="1" color="#bf1844" timeScale="1ms" />
            <Line id="MVL21" quantity="MVL21[0]/activity" scale="1" color="#7e15ca" timeScale="1ms" />
            <Line id="MVL23" quantity="MVL23[0]/activity" scale="1" color="#6c508b" timeScale="1ms" />
            <Line id="MVR22" quantity="MVR22[0]/activity" scale="1" color="#2c6f80" timeScale="1ms" />
            <Line id="MVR23" quantity="MVR23[0]/activity" scale="1" color="#934e47" timeScale="1ms" />
            <Line id="MVR24" quantity="MVR24[0]/activity" scale="1" color="#aaff43" timeScale="1ms" />

        </Display>

        <OutputFile id="of0" fileName="c302_B_Muscles.dat">
            <OutputColumn id="AS1_v" quantity="AS1[0]/v"/>
            <OutputColumn id="AS10_v" quantity="AS10[0]/v"/>
            <OutputColumn id="AS11_v" quantity="AS11[0]/v"/>
            <OutputColumn id="AS2_v" quantity="AS2[0]/v"/>
            <OutputColumn id="AS3_v" quantity="AS3[0]/v"/>
            <OutputColumn id="AS4_v" quantity="AS4[0]/v"/>
            <OutputColumn id="AS5_v" quantity="AS5[0]/v"/>
            <OutputColumn id="AS6_v" quantity="AS6[0]/v"/>
            <OutputColumn id="AS7_v" quantity="AS7[0]/v"/>
            <OutputColumn id="AS8_v" quantity="AS8[0]/v"/>
            <OutputColumn id="AS9_v" quantity="AS9[0]/v"/>
            <OutputColumn id="AVFL_v" quantity="AVFL[0]/v"/>
            <OutputColumn id="AVFR_v" quantity="AVFR[0]/v"/>
            <OutputColumn id="AVKR_v" quantity="AVKR[0]/v"/>
            <OutputColumn id="AVL_v" quantity="AVL[0]/v"/>
            <OutputColumn id="CEPVL_v" quantity="CEPVL[0]/v"/>
            <OutputColumn id="CEPVR_v" quantity="CEPVR[0]/v"/>
            <OutputColumn id="DA1_v" quantity="DA1[0]/v"/>
            <OutputColumn id="DA2_v" quantity="DA2[0]/v"/>
            <OutputColumn id="DA3_v" quantity="DA3[0]/v"/>
            <OutputColumn id="DA4_v" quantity="DA4[0]/v"/>
            <OutputColumn id="DA5_v" quantity="DA5[0]/v"/>
            <OutputColumn id="DA6_v" quantity="DA6[0]/v"/>
            <OutputColumn id="DA7_v" quantity="DA7[0]/v"/>
            <OutputColumn id="DA8_v" quantity="DA8[0]/v"/>
            <OutputColumn id="DA9_v" quantity="DA9[0]/v"/>
            <OutputColumn id="DB1_v" quantity="DB1[0]/v"/>
            <OutputColumn id="DB2_v" quantity="DB2[0]/v"/>
            <OutputColumn id="DB3_v" quantity="DB3[0]/v"/>
            <OutputColumn id="DB4_v" quantity="DB4[0]/v"/>
            <OutputColumn id="DB5_v" quantity="DB5[0]/v"/>
            <OutputColumn id="DB6_v" quantity="DB6[0]/v"/>
            <OutputColumn id="DB7_v" quantity="DB7[0]/v"/>
            <OutputColumn id="DD1_v" quantity="DD1[0]/v"/>
            <OutputColumn id="DD2_v" quantity="DD2[0]/v"/>
            <OutputColumn id="DD3_v" quantity="DD3[0]/v"/>
            <OutputColumn id="DD4_v" quantity="DD4[0]/v"/>
            <OutputColumn id="DD5_v" quantity="DD5[0]/v"/>
            <OutputColumn id="DD6_v" quantity="DD6[0]/v"/>
            <OutputColumn id="DVB_v" quantity="DVB[0]/v"/>
            <OutputColumn id="HSNL_v" quantity="HSNL[0]/v"/>
            <OutputColumn id="HSNR_v" quantity="HSNR[0]/v"/>
            <OutputColumn id="IL1DL_v" quantity="IL1DL[0]/v"/>
            <OutputColumn id="IL1DR_v" quantity="IL1DR[0]/v"/>
            <OutputColumn id="IL1L_v" quantity="IL1L[0]/v"/>
            <OutputColumn id="IL1R_v" quantity="IL1R[0]/v"/>
            <OutputColumn id="IL1VL_v" quantity="IL1VL[0]/v"/>
            <OutputColumn id="IL1VR_v" quantity="IL1VR[0]/v"/>
            <OutputColumn id="PDA_v" quantity="PDA[0]/v"/>
            <OutputColumn id="PDB_v" quantity="PDB[0]/v"/>
            <OutputColumn id="PVNL_v" quantity="PVNL[0]/v"/>
            <OutputColumn id="PVNR_v" quantity="PVNR[0]/v"/>
            <OutputColumn id="RID_v" quantity="RID[0]/v"/>
            <OutputColumn id="RIML_v" quantity="RIML[0]/v"/>
            <OutputColumn id="RIMR_v" quantity="RIMR[0]/v"/>
            <OutputColumn id="RIVL_v" quantity="RIVL[0]/v"/>
            <OutputColumn id="RIVR_v" quantity="RIVR[0]/v"/>
            <OutputColumn id="RMDDL_v" quantity="RMDDL[0]/v"/>
            <OutputColumn id="RMDDR_v" quantity="RMDDR[0]/v"/>
            <OutputColumn id="RMDL_v" quantity="RMDL[0]/v"/>
            <OutputColumn id="RMDR_v" quantity="RMDR[0]/v"/>
            <OutputColumn id="RMDVL_v" quantity="RMDVL[0]/v"/>
            <OutputColumn id="RMDVR_v" quantity="RMDVR[0]/v"/>
            <OutputColumn id="RMED_v" quantity="RMED[0]/v"/>
            <OutputColumn id="RMEL_v" quantity="RMEL[0]/v"/>
            <OutputColumn id="RMER_v" quantity="RMER[0]/v"/>
            <OutputColumn id="RMEV_v" quantity="RMEV[0]/v"/>
            <OutputColumn id="RMFL_v" quantity="RMFL[0]/v"/>
            <OutputColumn id="RMGL_v" quantity="RMGL[0]/v"/>
            <OutputColumn id="RMGR_v" quantity="RMGR[0]/v"/>
            <OutputColumn id="RMHL_v" quantity="RMHL[0]/v"/>
            <OutputColumn id="RMHR_v" quantity="RMHR[0]/v"/>
            <OutputColumn id="SMBDL_v" quantity="SMBDL[0]/v"/>
            <OutputColumn id="SMBDR_v" quantity="SMBDR[0]/v"/>
            <OutputColumn id="SMBVL_v" quantity="SMBVL[0]/v"/>
            <OutputColumn id="SMBVR_v" quantity="SMBVR[0]/v"/>
            <OutputColumn id="SMDDL_v" quantity="SMDDL[0]/v"/>
            <OutputColumn id="SMDDR_v" quantity="SMDDR[0]/v"/>
            <OutputColumn id="SMDVL_v" quantity="SMDVL[0]/v"/>
            <OutputColumn id="SMDVR_v" quantity="SMDVR[0]/v"/>
            <OutputColumn id="URADL_v" quantity="URADL[0]/v"/>
            <OutputColumn id="URADR_v" quantity="URADR[0]/v"/>
            <OutputColumn id="URAVL_v" quantity="URAVL[0]/v"/>
            <OutputColumn id="URAVR_v" quantity="URAVR[0]/v"/>
            <OutputColumn id="VA1_v" quantity="VA1[0]/v"/>
            <OutputColumn id="VA10_v" quantity="VA10[0]/v"/>
            <OutputColumn id="VA11_v" quantity="VA11[0]/v"/>
            <OutputColumn id="VA12_v" quantity="VA12[0]/v"/>
            <OutputColumn id="VA2_v" quantity="VA2[0]/v"/>
            <OutputColumn id="VA3_v" quantity="VA3[0]/v"/>
            <OutputColumn id="VA4_v" quantity="VA4[0]/v"/>
            <OutputColumn id="VA5_v" quantity="VA5[0]/v"/>
            <OutputColumn id="VA6_v" quantity="VA6[0]/v"/>
            <OutputColumn id="VA7_v" quantity="VA7[0]/v"/>
            <OutputColumn id="VA8_v" quantity="VA8[0]/v"/>
            <OutputColumn id="VA9_v" quantity="VA9[0]/v"/>
            <OutputColumn id="VB1_v" quantity="VB1[0]/v"/>
            <OutputColumn id="VB10_v" quantity="VB10[0]/v"/>
            <OutputColumn id="VB11_v" quantity="VB11[0]/v"/>
            <OutputColumn id="VB2_v" quantity="VB2[0]/v"/>
            <OutputColumn id="VB3_v" quantity="VB3[0]/v"/>
            <OutputColumn id="VB4_v" quantity="VB4[0]/v"/>
            <OutputColumn id="VB5_v" quantity="VB5[0]/v"/>
            <OutputColumn id="VB6_v" quantity="VB6[0]/v"/>
            <OutputColumn id="VB7_v" quantity="VB7[0]/v"/>
            <OutputColumn id="VB8_v" quantity="VB8[0]/v"/>
            <OutputColumn id="VB9_v" quantity="VB9[0]/v"/>
            <OutputColumn id="VC1_v" quantity="VC1[0]/v"/>
            <OutputColumn id="VC2_v" quantity="VC2[0]/v"/>
            <OutputColumn id="VC3_v" quantity="VC3[0]/v"/>
            <OutputColumn id="VC4_v" quantity="VC4[0]/v"/>
            <OutputColumn id="VC5_v" quantity="VC5[0]/v"/>
            <OutputColumn id="VC6_v" quantity="VC6[0]/v"/>
            <OutputColumn id="VD1_v" quantity="VD1[0]/v"/>
            <OutputColumn id="VD10_v" quantity="VD10[0]/v"/>
            <OutputColumn id="VD11_v" quantity="VD11[0]/v"/>
            <OutputColumn id="VD12_v" quantity="VD12[0]/v"/>
            <OutputColumn id="VD13_v" quantity="VD13[0]/v"/>
            <OutputColumn id="VD2_v" quantity="VD2[0]/v"/>
            <OutputColumn id="VD3_v" quantity="VD3[0]/v"/>
            <OutputColumn id="VD4_v" quantity="VD4[0]/v"/>
            <OutputColumn id="VD5_v" quantity="VD5[0]/v"/>
            <OutputColumn id="VD6_v" quantity="VD6[0]/v"/>
            <OutputColumn id="VD7_v" quantity="VD7[0]/v"/>
            <OutputColumn id="VD8_v" quantity="VD8[0]/v"/>
            <OutputColumn id="VD9_v" quantity="VD9[0]/v"/>
        </OutputFile>

        <OutputFile id="of1" fileName="c302_B_Muscles.muscles.dat">
            <OutputColumn id="MDL05_v" quantity="MDL05[0]/v"/>
            <OutputColumn id="MDR05_v" quantity="MDR05[0]/v"/>
            <OutputColumn id="MDL08_v" quantity="MDL08[0]/v"/>
            <OutputColumn id="MDR08_v" quantity="MDR08[0]/v"/>
            <OutputColumn id="MDL20_v" quantity="MDL20[0]/v"/>
            <OutputColumn id="MDR20_v" quantity="MDR20[0]/v"/>
            <OutputColumn id="MDL19_v" quantity="MDL19[0]/v"/>
            <OutputColumn id="MDR19_v" quantity="MDR19[0]/v"/>
            <OutputColumn id="MDL21_v" quantity="MDL21[0]/v"/>
            <OutputColumn id="MDL22_v" quantity="MDL22[0]/v"/>
            <OutputColumn id="MDL23_v" quantity="MDL23[0]/v"/>
            <OutputColumn id="MDL24_v" quantity="MDL24[0]/v"/>
            <OutputColumn id="MDR21_v" quantity="MDR21[0]/v"/>
            <OutputColumn id="MDR22_v" quantity="MDR22[0]/v"/>
            <OutputColumn id="MDR23_v" quantity="MDR23[0]/v"/>
            <OutputColumn id="MDR24_v" quantity="MDR24[0]/v"/>
            <OutputColumn id="MDL07_v" quantity="MDL07[0]/v"/>
            <OutputColumn id="MDR07_v" quantity="MDR07[0]/v"/>
            <OutputColumn id="MDL10_v" quantity="MDL10[0]/v"/>
            <OutputColumn id="MDR10_v" quantity="MDR10[0]/v"/>
            <OutputColumn id="MDL09_v" quantity="MDL09[0]/v"/>
            <OutputColumn id="MDR09_v" quantity="MDR09[0]/v"/>
            <OutputColumn id="MDL12_v" quantity="MDL12[0]/v"/>
            <OutputColumn id="MDR12_v" quantity="MDR12[0]/v"/>
            <OutputColumn id="MDL11_v" quantity="MDL11[0]/v"/>
            <OutputColumn id="MDR11_v" quantity="MDR11[0]/v"/>
            <OutputColumn id="MDL14_v" quantity="MDL14[0]/v"/>
            <OutputColumn id="MDR14_v" quantity="MDR14[0]/v"/>
            <OutputColumn id="MDL13_v" quantity="MDL13[0]/v"/>
            <OutputColumn id="MDR13_v" quantity="MDR13[0]/v"/>
            <OutputColumn id="MDL16_v" quantity="MDL16[0]/v"/>
            <OutputColumn id="MDR16_v" quantity="MDR16[0]/v"/>
            <OutputColumn id="MDL15_v" quantity="MDL15[0]/v"/>
            <OutputColumn id="MDR15_v" quantity="MDR15[0]/v"/>
            <OutputColumn id="MDL18_v" quantity="MDL18[0]/v"/>
            <OutputColumn id="MDR18_v" quantity="MDR18[0]/v"/>
            <OutputColumn id="MDL17_v" quantity="MDL17[0]/v"/>
            <OutputColumn id="MDR17_v" quantity="MDR17[0]/v"/>
            <OutputColumn id="MVL12_v" quantity="MVL12[0]/v"/>
            <OutputColumn id="MVL11_v" quantity="MVL11[0]/v"/>
            <OutputColumn id="MVL14_v" quantity="MVL14[0]/v"/>
            <OutputColumn id="MVR14_v" quantity="MVR14[0]/v"/>
            <OutputColumn id="MVL10_v" quantity="MVL10[0]/v"/>
            <OutputColumn id="MVR10_v" quantity="MVR10[0]/v"/>
            <OutputColumn id="MVL03_v" quantity="MVL03[0]/v"/>
            <OutputColumn id="MVR04_v" quantity="MVR04[0]/v"/>
            <OutputColumn id="MANAL_v" quantity="MANAL[0]/v"/>
            <OutputColumn id="MVULVA_v" quantity="MVULVA[0]/v"/>
            <OutputColumn id="MDL01_v" quantity="MDL01[0]/v"/>
            <OutputColumn id="MDL02_v" quantity="MDL02[0]/v"/>
            <OutputColumn id="MDL04_v" quantity="MDL04[0]/v"/>
            <OutputColumn id="MDR01_v" quantity="MDR01[0]/v"/>
            <OutputColumn id="MDR02_v" quantity="MDR02[0]/v"/>
            <OutputColumn id="MDL03_v" quantity="MDL03[0]/v"/>
            <OutputColumn id="MVL01_v" quantity="MVL01[0]/v"/>
            <OutputColumn id="MDR03_v" quantity="MDR03[0]/v"/>
            <OutputColumn id="MVR01_v" quantity="MVR01[0]/v"/>
            <OutputColumn id="MVR03_v" quantity="MVR03[0]/v"/>
            <OutputColumn id="MVL02_v" quantity="MVL02[0]/v"/>
            <OutputColumn id="MVR02_v" quantity="MVR02[0]/v"/>
            <OutputColumn id="MVL22_v" quantity="MVL22[0]/v"/>
            <OutputColumn id="MVR21_v" quantity="MVR21[0]/v"/>
            <OutputColumn id="MVL09_v" quantity="MVL09[0]/v"/>
            <OutputColumn id="MVL13_v" quantity="MVL13[0]/v"/>
            <OutputColumn id="MVR05_v" quantity="MVR05[0]/v"/>
            <OutputColumn id="MVL05_v" quantity="MVL05[0]/v"/>
            <OutputColumn id="MVL07_v" quantity="MVL07[0]/v"/>
            <OutputColumn id="MVR06_v" quantity="MVR06[0]/v"/>
            <OutputColumn id="MVR08_v" quantity="MVR08[0]/v"/>
            <OutputColumn id="MVL06_v" quantity="MVL06[0]/v"/>
            <OutputColumn id="MVL08_v" quantity="MVL08[0]/v"/>
            <OutputColumn id="MDR04_v" quantity="MDR04[0]/v"/>
            <OutputColumn id="MVR07_v" quantity="MVR07[0]/v"/>
            <OutputColumn id="MVL04_v" quantity="MVL04[0]/v"/>
            <OutputColumn id="MDL06_v" quantity="MDL06[0]/v"/>
            <OutputColumn id="MDR06_v" quantity="MDR06[0]/v"/>
            <OutputColumn id="MVR09_v" quantity="MVR09[0]/v"/>
            <OutputColumn id="MVR12_v" quantity="MVR12[0]/v"/>
            <OutputColumn id="MVR11_v" quantity="MVR11[0]/v"/>
            <OutputColumn id="MVR13_v" quantity="MVR13[0]/v"/>
            <OutputColumn id="MVL15_v" quantity="MVL15[0]/v"/>
            <OutputColumn id="MVL16_v" quantity="MVL16[0]/v"/>
            <OutputColumn id="MVR15_v" quantity="MVR15[0]/v"/>
            <OutputColumn id="MVR16_v" quantity="MVR16[0]/v"/>
            <OutputColumn id="MVL18_v" quantity="MVL18[0]/v"/>
            <OutputColumn id="MVR18_v" quantity="MVR18[0]/v"/>
            <OutputColumn id="MVL17_v" quantity="MVL17[0]/v"/>
            <OutputColumn id="MVR17_v" quantity="MVR17[0]/v"/>
            <OutputColumn id="MVL19_v" quantity="MVL19[0]/v"/>
            <OutputColumn id="MVL20_v" quantity="MVL20[0]/v"/>
            <OutputColumn id="MVR19_v" quantity="MVR19[0]/v"/>
            <OutputColumn id="MVR20_v" quantity="MVR20[0]/v"/>
            <OutputColumn id="MVL21_v" quantity="MVL21[0]/v"/>
            <OutputColumn id="MVL23_v" quantity="MVL23[0]/v"/>
            <OutputColumn id="MVR22_v" quantity="MVR22[0]/v"/>
            <OutputColumn id="MVR23_v" quantity="MVR23[0]/v"/>
            <OutputColumn id="MVR24_v" quantity="MVR24[0]/v"/>
        </OutputFile>
    </Simulation>

</Lems>
