<Lems>

    <!--
${comment}
    -->

    <Target component="sim_${reference}" />

    <!-- Include core NeuroML2 ComponentType definitions -->

    <Include file="Cells.xml" />
    <Include file="Networks.xml" />
    <Include file="Simulation.xml" />
#foreach ($include in $includes)##

    <Include file="${include}" />
#end##

    <Include file="${reference}.nml" />

    <!-- End of NeuroML2 content -->

#set( $start = -0.1 * $duration )
#set( $end = 1.1 * $duration )

    <Simulation id="sim_${reference}" length="${duration}ms" step="${dt}ms" target="${reference}">

        <Display id="neurons" title="${reference}: Membrane potential of a number of neurons" timeScale="1ms" xmin="$start" xmax="$end" ymin="$vmin" ymax="$vmax">

#foreach ($plot in $plots)##
            <Line id="${plot.cell}" quantity="${plot.quantity}" scale="1mV" color="${plot.colour}" timeScale="1ms" />
#end##

        </Display>
#if ($muscle_plots)##

        <Display id="muscles" title="${reference}: Membrane potential of a number of muscles" timeScale="1ms" xmin="$start" xmax="$end" ymin="$vmin" ymax="$vmax">

#foreach ($plot in $muscle_plots)##
            <Line id="${plot.cell}" quantity="${plot.quantity}" scale="1mV" color="${plot.colour}" timeScale="1ms" />
#end##

        </Display>
#end##
#if ($activity_plots)##

        <Display id="activity_neurons" title="${reference}: Activity of a number of neurons" timeScale="1ms" xmin="$start" xmax="$end" ymin="-0.1" ymax="1.1">

#foreach ($plot in $activity_plots)##
            <Line id="${plot.cell}" quantity="${plot.quantity}" scale="1" color="${plot.colour}" timeScale="1ms" />
#end##

        </Display>
#end##
#if ($muscle_activity_plots)##

        <Display id="activity_muscles" title="${reference}: Activity of a number of muscles" timeScale="1ms" xmin="$start" xmax="$end" ymin="-0.1" ymax="1.1">

#foreach ($plot in $muscle_activity_plots)##
            <Line id="${plot.cell}" quantity="${plot.quantity}" scale="1" color="${plot.colour}" timeScale="1ms" />
#end##

        </Display>
#end##

        <OutputFile id="neurons_v" fileName="${reference}.dat">
#foreach ($save in $to_save)##
            <OutputColumn id="${save.cell}_v" quantity="${save.quantity}"/>
#end##
        </OutputFile>

#if ($activity_to_save)##
        <OutputFile id="neurons_activity" fileName="${reference}.activity.dat">
#foreach ($save in $activity_to_save)##
            <OutputColumn id="${save.cell}_v" quantity="${save.quantity}"/>
#end##
        </OutputFile>
#end##
#if ($muscles_to_save)##
        <OutputFile id="muscles_v" fileName="${reference}.muscles.dat">
#foreach ($save in $muscles_to_save)##
            <OutputColumn id="${save.cell}_v" quantity="${save.quantity}"/>
#end##
        </OutputFile>
#end##
#if ($muscles_activity_to_save)##
        <OutputFile id="muscles_activity" fileName="${reference}.muscles.activity.dat">
#foreach ($save in $muscles_activity_to_save)##
            <OutputColumn id="${save.cell}_v" quantity="${save.quantity}"/>
#end##
        </OutputFile>
#end##
    </Simulation>

</Lems>
