<neuroml xmlns="http://www.neuroml.org/schema/neuroml2"  xmlns:xs="http://www.w3.org/2001/XMLSchema" xmlns:xsi="http://www.w3.org/2001/XMLSchema-instance" xsi:schemaLocation="http://www.neuroml.org/schema/neuroml2 https://raw.github.com/NeuroML/NeuroML2/development/Schemas/NeuroML2/NeuroML_v2beta4.xsd" id="c302_B_Muscles">
    <notes>

Parameters and setting used to generate this network:

    Cells:                         ['AS1', 'AS10', 'AS11', 'AS2', 'AS3', 'AS4', 'AS5', 'AS6', 'AS7', 'AS8', 'AS9', 'AVFL', 'AVFR', 'AVKR', 'AVL', 'CEPVL', 'CEPVR', 'DA1', 'DA2', 'DA3', 'DA4', 'DA5', 'DA6', 'DA7', 'DA8', 'DA9', 'DB1', 'DB2', 'DB3', 'DB4', 'DB5', 'DB6', 'DB7', 'DD1', 'DD2', 'DD3', 'DD4', 'DD5', 'DD6', 'DVB', 'HSNL', 'HSNR', 'IL1DL', 'IL1DR', 'IL1L', 'IL1R', 'IL1VL', 'IL1VR', 'PDA', 'PDB', 'PVNL', 'PVNR', 'RID', 'RIML', 'RIMR', 'RIVL', 'RIVR', 'RMDDL', 'RMDDR', 'RMDL', 'RMDR', 'RMDVL', 'RMDVR', 'RMED', 'RMEL', 'RMER', 'RMEV', 'RMFL', 'RMGL', 'RMGR', 'RMHL', 'RMHR', 'SMBDL', 'SMBDR', 'SMBVL', 'SMBVR', 'SMDDL', 'SMDDR', 'SMDVL', 'SMDVR', 'URADL', 'URADR', 'URAVL', 'URAVR', 'VA1', 'VA10', 'VA11', 'VA12', 'VA2', 'VA3', 'VA4', 'VA5', 'VA6', 'VA7', 'VA8', 'VA9', 'VB1', 'VB10', 'VB11', 'VB2', 'VB3', 'VB4', 'VB5', 'VB6', 'VB7', 'VB8', 'VB9', 'VC1', 'VC2', 'VC3', 'VC4', 'VC5', 'VC6', 'VD1', 'VD10', 'VD11', 'VD12', 'VD13', 'VD2', 'VD3', 'VD4', 'VD5', 'VD6', 'VD7', 'VD8', 'VD9']
    Cell stimulated:               ['AS1', 'AS10', 'AS11', 'AS2', 'AS3', 'AS4', 'SMBDL', 'SMBDR', 'VA1', 'VA10', 'DD1', 'DD2']
    Connection numbers overridden: None
    Connection numbers scaled:     None
    Include muscles:               True

    Known BioParameters:
        BioParameter: iaf_leak_reversal = -70mV (SRC: BlindGuess, certainty 0.1)
        BioParameter: iaf_reset = -70mV (SRC: BlindGuess, certainty 0.1)
        BioParameter: iaf_thresh = -50mV (SRC: BlindGuess, certainty 0.1)
        BioParameter: iaf_C = 0.2nF (SRC: BlindGuess, certainty 0.1)
        BioParameter: iaf_conductance = 0.01uS (SRC: BlindGuess, certainty 0.1)
        BioParameter: iaf_tau1 = 50ms (SRC: BlindGuess, certainty 0.1)
        BioParameter: chem_exc_syn_gbase = 0.8nS (SRC: BlindGuess, certainty 0.1)
        BioParameter: chem_exc_syn_erev = 0mV (SRC: BlindGuess, certainty 0.1)
        BioParameter: chem_exc_syn_rise = 3ms (SRC: BlindGuess, certainty 0.1)
        BioParameter: chem_exc_syn_decay = 10ms (SRC: BlindGuess, certainty 0.1)
        BioParameter: chem_inh_syn_gbase = 0.4nS (SRC: BlindGuess, certainty 0.1)
        BioParameter: chem_inh_syn_erev = -80mV (SRC: BlindGuess, certainty 0.1)
        BioParameter: chem_inh_syn_rise = 3ms (SRC: BlindGuess, certainty 0.1)
        BioParameter: chem_inh_syn_decay = 10ms (SRC: BlindGuess, certainty 0.1)
        BioParameter: elec_syn_gbase = 0.5nS (SRC: BlindGuess, certainty 0.1)
        BioParameter: unphysiological_offset_current = 0.3nA (SRC: KnownError, certainty 0)
        BioParameter: unphysiological_offset_current_dur = 200ms (SRC: KnownError, certainty 0)

</notes>
    <expTwoSynapse id="exc_syn_2conns" erev="0mV" gbase="1.6nS" tauDecay="10ms" tauRise="3ms"/>
    <expTwoSynapse id="exc_syn_5conns" erev="0mV" gbase="4.0nS" tauDecay="10ms" tauRise="3ms"/>
    <expTwoSynapse id="exc_syn_1conns" erev="0mV" gbase="0.8nS" tauDecay="10ms" tauRise="3ms"/>
    <expTwoSynapse id="exc_syn_10conns" erev="0mV" gbase="8.0nS" tauDecay="10ms" tauRise="3ms"/>
    <expTwoSynapse id="exc_syn_15conns" erev="0mV" gbase="12.0nS" tauDecay="10ms" tauRise="3ms"/>
    <expTwoSynapse id="exc_syn_11conns" erev="0mV" gbase="8.8nS" tauDecay="10ms" tauRise="3ms"/>
    <expTwoSynapse id="exc_syn_9conns" erev="0mV" gbase="7.2nS" tauDecay="10ms" tauRise="3ms"/>
    <expTwoSynapse id="exc_syn_13conns" erev="0mV" gbase="10.4nS" tauDecay="10ms" tauRise="3ms"/>
    <expTwoSynapse id="exc_syn_7conns" erev="0mV" gbase="5.6nS" tauDecay="10ms" tauRise="3ms"/>
    <expTwoSynapse id="inh_syn_1conns" erev="-80mV" gbase="0.4nS" tauDecay="10ms" tauRise="3ms"/>
    <expTwoSynapse id="inh_syn_2conns" erev="-80mV" gbase="0.8nS" tauDecay="10ms" tauRise="3ms"/>
    <expTwoSynapse id="inh_syn_4conns" erev="-80mV" gbase="1.6nS" tauDecay="10ms" tauRise="3ms"/>
    <expTwoSynapse id="exc_syn_4conns" erev="0mV" gbase="3.2nS" tauDecay="10ms" tauRise="3ms"/>
    <expTwoSynapse id="exc_syn_17conns" erev="0mV" gbase="13.6nS" tauDecay="10ms" tauRise="3ms"/>
    <expTwoSynapse id="exc_syn_25conns" erev="0mV" gbase="20.0nS" tauDecay="10ms" tauRise="3ms"/>
    <expTwoSynapse id="exc_syn_6conns" erev="0mV" gbase="4.8nS" tauDecay="10ms" tauRise="3ms"/>
    <expTwoSynapse id="exc_syn_12conns" erev="0mV" gbase="9.6nS" tauDecay="10ms" tauRise="3ms"/>
    <expTwoSynapse id="exc_syn_16conns" erev="0mV" gbase="12.8nS" tauDecay="10ms" tauRise="3ms"/>
    <expTwoSynapse id="exc_syn_3conns" erev="0mV" gbase="2.4nS" tauDecay="10ms" tauRise="3ms"/>
    <expTwoSynapse id="exc_syn_21conns" erev="0mV" gbase="16.8nS" tauDecay="10ms" tauRise="3ms"/>
    <expTwoSynapse id="exc_syn_23conns" erev="0mV" gbase="18.4nS" tauDecay="10ms" tauRise="3ms"/>
    <expTwoSynapse id="exc_syn_14conns" erev="0mV" gbase="11.2nS" tauDecay="10ms" tauRise="3ms"/>
    <expTwoSynapse id="exc_syn_26conns" erev="0mV" gbase="20.8nS" tauDecay="10ms" tauRise="3ms"/>
    <expTwoSynapse id="inh_syn_5conns" erev="-80mV" gbase="2.0nS" tauDecay="10ms" tauRise="3ms"/>
    <expTwoSynapse id="inh_syn_3conns" erev="-80mV" gbase="1.2nS" tauDecay="10ms" tauRise="3ms"/>
    <expTwoSynapse id="inh_syn_6conns" erev="-80mV" gbase="2.4nS" tauDecay="10ms" tauRise="3ms"/>
    <expTwoSynapse id="exc_syn_8conns" erev="0mV" gbase="6.4nS" tauDecay="10ms" tauRise="3ms"/>
    <expTwoSynapse id="exc_syn_18conns" erev="0mV" gbase="14.4nS" tauDecay="10ms" tauRise="3ms"/>
    <expTwoSynapse id="exc_syn_24conns" erev="0mV" gbase="19.2nS" tauDecay="10ms" tauRise="3ms"/>
    <expTwoSynapse id="exc_syn_20conns" erev="0mV" gbase="16.0nS" tauDecay="10ms" tauRise="3ms"/>
    <expTwoSynapse id="exc_syn_37conns" erev="0mV" gbase="29.6nS" tauDecay="10ms" tauRise="3ms"/>
    <expTwoSynapse id="exc_syn_27conns" erev="0mV" gbase="21.6nS" tauDecay="10ms" tauRise="3ms"/>
    <expTwoSynapse id="exc_syn_30conns" erev="0mV" gbase="24.0nS" tauDecay="10ms" tauRise="3ms"/>
    <expTwoSynapse id="inh_syn_13conns" erev="-80mV" gbase="5.2nS" tauDecay="10ms" tauRise="3ms"/>
    <expTwoSynapse id="inh_syn_12conns" erev="-80mV" gbase="4.8nS" tauDecay="10ms" tauRise="3ms"/>
    <expTwoSynapse id="inh_syn_7conns" erev="-80mV" gbase="2.8nS" tauDecay="10ms" tauRise="3ms"/>
    <gapJunction id="elec_syn_1conns" conductance="0.5nS"/>
    <gapJunction id="elec_syn_2conns" conductance="1.0nS"/>
    <gapJunction id="elec_syn_7conns" conductance="3.5nS"/>
    <gapJunction id="elec_syn_23conns" conductance="11.5nS"/>
    <gapJunction id="elec_syn_6conns" conductance="3.0nS"/>
    <gapJunction id="elec_syn_4conns" conductance="2.0nS"/>
    <gapJunction id="elec_syn_5conns" conductance="2.5nS"/>
    <gapJunction id="elec_syn_3conns" conductance="1.5nS"/>
    <iafCell type="iafActivityCell" id="generic_iaf_cell" C="0.2nF" thresh="-50mV" reset="-70mV" leakConductance="0.01uS" leakReversal="-70mV" tau1="50ms"/>
    <pulseGenerator id="offset_current" delay="0ms" duration="200ms" amplitude="0.3nA"/>
    <network id="c302_B_Muscles">
        <population id="AS1" component="generic_iaf_cell" size="1">
            <property tag="OpenWormBackerAssignedName" value="Kottbusser Tor"/>
        </population>
        <population id="AS10" component="generic_iaf_cell" size="1"/>
        <population id="AS11" component="generic_iaf_cell" size="1"/>
        <population id="AS2" component="generic_iaf_cell" size="1">
            <property tag="OpenWormBackerAssignedName" value="Geraldine"/>
        </population>
        <population id="AS3" component="generic_iaf_cell" size="1"/>
        <population id="AS4" component="generic_iaf_cell" size="1"/>
        <population id="AS5" component="generic_iaf_cell" size="1"/>
        <population id="AS6" component="generic_iaf_cell" size="1"/>
        <population id="AS7" component="generic_iaf_cell" size="1"/>
        <population id="AS8" component="generic_iaf_cell" size="1"/>
        <population id="AS9" component="generic_iaf_cell" size="1"/>
        <population id="AVFL" component="generic_iaf_cell" size="1"/>
        <population id="AVFR" component="generic_iaf_cell" size="1"/>
        <population id="AVKR" component="generic_iaf_cell" size="1"/>
        <population id="AVL" component="generic_iaf_cell" size="1"/>
        <population id="CEPVL" component="generic_iaf_cell" size="1">
            <property tag="OpenWormBackerAssignedName" value="Gernot Weiser"/>
        </population>
        <population id="CEPVR" component="generic_iaf_cell" size="1">
            <property tag="OpenWormBackerAssignedName" value="The Swarm"/>
        </population>
        <population id="DA1" component="generic_iaf_cell" size="1">
            <property tag="OpenWormBackerAssignedName" value="KR"/>
        </population>
        <population id="DA2" component="generic_iaf_cell" size="1">
            <property tag="OpenWormBackerAssignedName" value="Ruzila"/>
        </population>
        <population id="DA3" component="generic_iaf_cell" size="1">
            <property tag="OpenWormBackerAssignedName" value="Magoo"/>
        </population>
        <population id="DA4" component="generic_iaf_cell" size="1"/>
        <population id="DA5" component="generic_iaf_cell" size="1"/>
        <population id="DA6" component="generic_iaf_cell" size="1"/>
        <population id="DA7" component="generic_iaf_cell" size="1"/>
        <population id="DA8" component="generic_iaf_cell" size="1"/>
        <population id="DA9" component="generic_iaf_cell" size="1"/>
        <population id="DB1" component="generic_iaf_cell" size="1"/>
        <population id="DB2" component="generic_iaf_cell" size="1"/>
        <population id="DB3" component="generic_iaf_cell" size="1"/>
        <population id="DB4" component="generic_iaf_cell" size="1"/>
        <population id="DB5" component="generic_iaf_cell" size="1"/>
        <population id="DB6" component="generic_iaf_cell" size="1"/>
        <population id="DB7" component="generic_iaf_cell" size="1"/>
        <population id="DD1" component="generic_iaf_cell" size="1">
            <property tag="OpenWormBackerAssignedName" value="Stanislav Petrov"/>
        </population>
        <population id="DD2" component="generic_iaf_cell" size="1">
            <property tag="OpenWormBackerAssignedName" value="Evolver"/>
        </population>
        <population id="DD3" component="generic_iaf_cell" size="1"/>
        <population id="DD4" component="generic_iaf_cell" size="1"/>
        <population id="DD5" component="generic_iaf_cell" size="1"/>
        <population id="DD6" component="generic_iaf_cell" size="1"/>
        <population id="DVB" component="generic_iaf_cell" size="1"/>
        <population id="HSNL" component="generic_iaf_cell" size="1">
            <property tag="OpenWormBackerAssignedName" value="The Stoner Neuron"/>
        </population>
        <population id="HSNR" component="generic_iaf_cell" size="1">
            <property tag="OpenWormBackerAssignedName" value="OpenScienceFTW"/>
        </population>
        <population id="IL1DL" component="generic_iaf_cell" size="1"/>
        <population id="IL1DR" component="generic_iaf_cell" size="1"/>
        <population id="IL1L" component="generic_iaf_cell" size="1"/>
        <population id="IL1R" component="generic_iaf_cell" size="1"/>
        <population id="IL1VL" component="generic_iaf_cell" size="1"/>
        <population id="IL1VR" component="generic_iaf_cell" size="1"/>
        <population id="PDA" component="generic_iaf_cell" size="1"/>
        <population id="PDB" component="generic_iaf_cell" size="1"/>
        <population id="PVNL" component="generic_iaf_cell" size="1"/>
        <population id="PVNR" component="generic_iaf_cell" size="1"/>
        <population id="RID" component="generic_iaf_cell" size="1"/>
        <population id="RIML" component="generic_iaf_cell" size="1"/>
        <population id="RIMR" component="generic_iaf_cell" size="1"/>
        <population id="RIVL" component="generic_iaf_cell" size="1"/>
        <population id="RIVR" component="generic_iaf_cell" size="1">
            <property tag="OpenWormBackerAssignedName" value="Wil Wheaton"/>
        </population>
        <population id="RMDDL" component="generic_iaf_cell" size="1"/>
        <population id="RMDDR" component="generic_iaf_cell" size="1"/>
        <population id="RMDL" component="generic_iaf_cell" size="1"/>
        <population id="RMDR" component="generic_iaf_cell" size="1"/>
        <population id="RMDVL" component="generic_iaf_cell" size="1"/>
        <population id="RMDVR" component="generic_iaf_cell" size="1"/>
        <population id="RMED" component="generic_iaf_cell" size="1"/>
        <population id="RMEL" component="generic_iaf_cell" size="1"/>
        <population id="RMER" component="generic_iaf_cell" size="1"/>
        <population id="RMEV" component="generic_iaf_cell" size="1"/>
        <population id="RMFL" component="generic_iaf_cell" size="1"/>
        <population id="RMGL" component="generic_iaf_cell" size="1"/>
        <population id="RMGR" component="generic_iaf_cell" size="1">
            <property tag="OpenWormBackerAssignedName" value="Bryan Nagle"/>
        </population>
        <population id="RMHL" component="generic_iaf_cell" size="1"/>
        <population id="RMHR" component="generic_iaf_cell" size="1">
            <property tag="OpenWormBackerAssignedName" value="Martino"/>
        </population>
        <population id="SMBDL" component="generic_iaf_cell" size="1"/>
        <population id="SMBDR" component="generic_iaf_cell" size="1"/>
        <population id="SMBVL" component="generic_iaf_cell" size="1"/>
        <population id="SMBVR" component="generic_iaf_cell" size="1"/>
        <population id="SMDDL" component="generic_iaf_cell" size="1"/>
        <population id="SMDDR" component="generic_iaf_cell" size="1"/>
        <population id="SMDVL" component="generic_iaf_cell" size="1"/>
        <population id="SMDVR" component="generic_iaf_cell" size="1"/>
        <population id="URADL" component="generic_iaf_cell" size="1">
            <property tag="OpenWormBackerAssignedName" value="akizzles"/>
        </population>
        <population id="URADR" component="generic_iaf_cell" size="1"/>
        <population id="URAVL" component="generic_iaf_cell" size="1"/>
        <population id="URAVR" component="generic_iaf_cell" size="1"/>
        <population id="VA1" component="generic_iaf_cell" size="1"/>
        <population id="VA10" component="generic_iaf_cell" size="1"/>
        <population id="VA11" component="generic_iaf_cell" size="1"/>
        <population id="VA12" component="generic_iaf_cell" size="1"/>
        <population id="VA2" component="generic_iaf_cell" size="1">
            <property tag="OpenWormBackerAssignedName" value="Marquam Hill"/>
        </population>
        <population id="VA3" component="generic_iaf_cell" size="1"/>
        <population id="VA4" component="generic_iaf_cell" size="1"/>
        <population id="VA5" component="generic_iaf_cell" size="1"/>
        <population id="VA6" component="generic_iaf_cell" size="1"/>
        <population id="VA7" component="generic_iaf_cell" size="1"/>
        <population id="VA8" component="generic_iaf_cell" size="1"/>
        <population id="VA9" component="generic_iaf_cell" size="1"/>
        <population id="VB1" component="generic_iaf_cell" size="1">
            <property tag="OpenWormBackerAssignedName" value="NoTex.ch"/>
        </population>
        <population id="VB10" component="generic_iaf_cell" size="1"/>
        <population id="VB11" component="generic_iaf_cell" size="1"/>
        <population id="VB2" component="generic_iaf_cell" size="1">
            <property tag="OpenWormBackerAssignedName" value="Bloodgood"/>
        </population>
        <population id="VB3" component="generic_iaf_cell" size="1">
            <property tag="OpenWormBackerAssignedName" value="Ramez Naam"/>
        </population>
        <population id="VB4" component="generic_iaf_cell" size="1">
            <property tag="OpenWormBackerAssignedName" value="Worm"/>
        </population>
        <population id="VB5" component="generic_iaf_cell" size="1"/>
        <population id="VB6" component="generic_iaf_cell" size="1"/>
        <population id="VB7" component="generic_iaf_cell" size="1"/>
        <population id="VB8" component="generic_iaf_cell" size="1"/>
        <population id="VB9" component="generic_iaf_cell" size="1"/>
        <population id="VC1" component="generic_iaf_cell" size="1">
            <property tag="OpenWormBackerAssignedName" value="Gnothi seauton"/>
        </population>
        <population id="VC2" component="generic_iaf_cell" size="1">
            <property tag="OpenWormBackerAssignedName" value="M.Habryn"/>
        </population>
        <population id="VC3" component="generic_iaf_cell" size="1"/>
        <population id="VC4" component="generic_iaf_cell" size="1">
            <property tag="OpenWormBackerAssignedName" value="Klob Le Grand"/>
        </population>
        <population id="VC5" component="generic_iaf_cell" size="1"/>
        <population id="VC6" component="generic_iaf_cell" size="1"/>
        <population id="VD1" component="generic_iaf_cell" size="1">
            <property tag="OpenWormBackerAssignedName" value="Ackley Lab"/>
        </population>
        <population id="VD10" component="generic_iaf_cell" size="1"/>
        <population id="VD11" component="generic_iaf_cell" size="1"/>
        <population id="VD12" component="generic_iaf_cell" size="1"/>
        <population id="VD13" component="generic_iaf_cell" size="1"/>
        <population id="VD2" component="generic_iaf_cell" size="1"/>
        <population id="VD3" component="generic_iaf_cell" size="1"/>
        <population id="VD4" component="generic_iaf_cell" size="1"/>
        <population id="VD5" component="generic_iaf_cell" size="1"/>
        <population id="VD6" component="generic_iaf_cell" size="1"/>
        <population id="VD7" component="generic_iaf_cell" size="1"/>
        <population id="VD8" component="generic_iaf_cell" size="1"/>
        <population id="VD9" component="generic_iaf_cell" size="1"/>
        <population id="MDL05" component="generic_iaf_cell" size="1"/>
        <population id="MDR05" component="generic_iaf_cell" size="1"/>
        <population id="MDL08" component="generic_iaf_cell" size="1"/>
        <population id="MDR08" component="generic_iaf_cell" size="1"/>
        <population id="MDL20" component="generic_iaf_cell" size="1"/>
        <population id="MDR20" component="generic_iaf_cell" size="1"/>
        <population id="MDL19" component="generic_iaf_cell" size="1"/>
        <population id="MDR19" component="generic_iaf_cell" size="1"/>
        <population id="MDL21" component="generic_iaf_cell" size="1"/>
        <population id="MDL22" component="generic_iaf_cell" size="1"/>
        <population id="MDL23" component="generic_iaf_cell" size="1"/>
        <population id="MDL24" component="generic_iaf_cell" size="1"/>
        <population id="MDR21" component="generic_iaf_cell" size="1"/>
        <population id="MDR22" component="generic_iaf_cell" size="1"/>
        <population id="MDR23" component="generic_iaf_cell" size="1"/>
        <population id="MDR24" component="generic_iaf_cell" size="1"/>
        <population id="MDL07" component="generic_iaf_cell" size="1"/>
        <population id="MDR07" component="generic_iaf_cell" size="1"/>
        <population id="MDL10" component="generic_iaf_cell" size="1"/>
        <population id="MDR10" component="generic_iaf_cell" size="1"/>
        <population id="MDL09" component="generic_iaf_cell" size="1"/>
        <population id="MDR09" component="generic_iaf_cell" size="1"/>
        <population id="MDL12" component="generic_iaf_cell" size="1"/>
        <population id="MDR12" component="generic_iaf_cell" size="1"/>
        <population id="MDL11" component="generic_iaf_cell" size="1"/>
        <population id="MDR11" component="generic_iaf_cell" size="1"/>
        <population id="MDL14" component="generic_iaf_cell" size="1"/>
        <population id="MDR14" component="generic_iaf_cell" size="1"/>
        <population id="MDL13" component="generic_iaf_cell" size="1"/>
        <population id="MDR13" component="generic_iaf_cell" size="1"/>
        <population id="MDL16" component="generic_iaf_cell" size="1"/>
        <population id="MDR16" component="generic_iaf_cell" size="1"/>
        <population id="MDL15" component="generic_iaf_cell" size="1"/>
        <population id="MDR15" component="generic_iaf_cell" size="1"/>
        <population id="MDL18" component="generic_iaf_cell" size="1"/>
        <population id="MDR18" component="generic_iaf_cell" size="1"/>
        <population id="MDL17" component="generic_iaf_cell" size="1"/>
        <population id="MDR17" component="generic_iaf_cell" size="1"/>
        <population id="MVL12" component="generic_iaf_cell" size="1"/>
        <population id="MVL11" component="generic_iaf_cell" size="1"/>
        <population id="MVL14" component="generic_iaf_cell" size="1"/>
        <population id="MVR14" component="generic_iaf_cell" size="1"/>
        <population id="MVL10" component="generic_iaf_cell" size="1"/>
        <population id="MVR10" component="generic_iaf_cell" size="1"/>
        <population id="MVL03" component="generic_iaf_cell" size="1"/>
        <population id="MVR04" component="generic_iaf_cell" size="1"/>
        <population id="MANAL" component="generic_iaf_cell" size="1"/>
        <population id="MVULVA" component="generic_iaf_cell" size="1"/>
        <population id="MDL01" component="generic_iaf_cell" size="1"/>
        <population id="MDL02" component="generic_iaf_cell" size="1"/>
        <population id="MDL04" component="generic_iaf_cell" size="1"/>
        <population id="MDR01" component="generic_iaf_cell" size="1"/>
        <population id="MDR02" component="generic_iaf_cell" size="1"/>
        <population id="MDL03" component="generic_iaf_cell" size="1"/>
        <population id="MVL01" component="generic_iaf_cell" size="1"/>
        <population id="MDR03" component="generic_iaf_cell" size="1"/>
        <population id="MVR01" component="generic_iaf_cell" size="1"/>
        <population id="MVR03" component="generic_iaf_cell" size="1"/>
        <population id="MVL02" component="generic_iaf_cell" size="1"/>
        <population id="MVR02" component="generic_iaf_cell" size="1"/>
        <population id="MVL22" component="generic_iaf_cell" size="1"/>
        <population id="MVR21" component="generic_iaf_cell" size="1"/>
        <population id="MVL09" component="generic_iaf_cell" size="1"/>
        <population id="MVL13" component="generic_iaf_cell" size="1"/>
        <population id="MVR05" component="generic_iaf_cell" size="1"/>
        <population id="MVL05" component="generic_iaf_cell" size="1"/>
        <population id="MVL07" component="generic_iaf_cell" size="1"/>
        <population id="MVR06" component="generic_iaf_cell" size="1"/>
        <population id="MVR08" component="generic_iaf_cell" size="1"/>
        <population id="MVL06" component="generic_iaf_cell" size="1"/>
        <population id="MVL08" component="generic_iaf_cell" size="1"/>
        <population id="MDR04" component="generic_iaf_cell" size="1"/>
        <population id="MVR07" component="generic_iaf_cell" size="1"/>
        <population id="MVL04" component="generic_iaf_cell" size="1"/>
        <population id="MDL06" component="generic_iaf_cell" size="1"/>
        <population id="MDR06" component="generic_iaf_cell" size="1"/>
        <population id="MVR09" component="generic_iaf_cell" size="1"/>
        <population id="MVR12" component="generic_iaf_cell" size="1"/>
        <population id="MVR11" component="generic_iaf_cell" size="1"/>
        <population id="MVR13" component="generic_iaf_cell" size="1"/>
        <population id="MVL15" component="generic_iaf_cell" size="1"/>
        <population id="MVL16" component="generic_iaf_cell" size="1"/>
        <population id="MVR15" component="generic_iaf_cell" size="1"/>
        <population id="MVR16" component="generic_iaf_cell" size="1"/>
        <population id="MVL18" component="generic_iaf_cell" size="1"/>
        <population id="MVR18" component="generic_iaf_cell" size="1"/>
        <population id="MVL17" component="generic_iaf_cell" size="1"/>
        <population id="MVR17" component="generic_iaf_cell" size="1"/>
        <population id="MVL19" component="generic_iaf_cell" size="1"/>
        <population id="MVL20" component="generic_iaf_cell" size="1"/>
        <population id="MVR19" component="generic_iaf_cell" size="1"/>
        <population id="MVR20" component="generic_iaf_cell" size="1"/>
        <population id="MVL21" component="generic_iaf_cell" size="1"/>
        <population id="MVL23" component="generic_iaf_cell" size="1"/>
        <population id="MVR22" component="generic_iaf_cell" size="1"/>
        <population id="MVR23" component="generic_iaf_cell" size="1"/>
        <population id="MVR24" component="generic_iaf_cell" size="1"/>
        <synapticConnection to="DA1[0]" synapse="exc_syn_2conns" destination="synapses" from="AS1[0]"/>
        <synapticConnection to="VD1[0]" synapse="exc_syn_5conns" destination="synapses" from="AS1[0]"/>
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        <electricalProjection id="NC_AS1_VA3_Generic_GJ" postsynapticPopulation="VA3" presynapticPopulation="AS1">
            <electricalConnection synapse="elec_syn_1conns" preCell="0" id="0" postCell="0"/>
        </electricalProjection>
        <electricalProjection id="NC_AS1_VD2_Generic_GJ" postsynapticPopulation="VD2" presynapticPopulation="AS1">
            <electricalConnection synapse="elec_syn_1conns" preCell="0" id="0" postCell="0"/>
        </electricalProjection>
        <electricalProjection id="NC_AS11_PDB_Generic_GJ" postsynapticPopulation="PDB" presynapticPopulation="AS11">
            <electricalConnection synapse="elec_syn_2conns" preCell="0" id="0" postCell="0"/>
        </electricalProjection>
        <electricalProjection id="NC_AS2_DA2_Generic_GJ" postsynapticPopulation="DA2" presynapticPopulation="AS2">
            <electricalConnection synapse="elec_syn_1conns" preCell="0" id="0" postCell="0"/>
        </electricalProjection>
        <electricalProjection id="NC_AS2_VA4_Generic_GJ" postsynapticPopulation="VA4" presynapticPopulation="AS2">
            <electricalConnection synapse="elec_syn_2conns" preCell="0" id="0" postCell="0"/>
        </electricalProjection>
        <electricalProjection id="NC_AS3_DA2_Generic_GJ" postsynapticPopulation="DA2" presynapticPopulation="AS3">
            <electricalConnection synapse="elec_syn_1conns" preCell="0" id="0" postCell="0"/>
        </electricalProjection>
        <electricalProjection id="NC_AS3_VA5_Generic_GJ" postsynapticPopulation="VA5" presynapticPopulation="AS3">
            <electricalConnection synapse="elec_syn_2conns" preCell="0" id="0" postCell="0"/>
        </electricalProjection>
        <electricalProjection id="NC_AS4_DA3_Generic_GJ" postsynapticPopulation="DA3" presynapticPopulation="AS4">
            <electricalConnection synapse="elec_syn_1conns" preCell="0" id="0" postCell="0"/>
        </electricalProjection>
        <electricalProjection id="NC_AS5_VA7_Generic_GJ" postsynapticPopulation="VA7" presynapticPopulation="AS5">
            <electricalConnection synapse="elec_syn_1conns" preCell="0" id="0" postCell="0"/>
        </electricalProjection>
        <electricalProjection id="NC_AS6_DA5_Generic_GJ" postsynapticPopulation="DA5" presynapticPopulation="AS6">
            <electricalConnection synapse="elec_syn_2conns" preCell="0" id="0" postCell="0"/>
        </electricalProjection>
        <electricalProjection id="NC_AS6_VA8_Generic_GJ" postsynapticPopulation="VA8" presynapticPopulation="AS6">
            <electricalConnection synapse="elec_syn_1conns" preCell="0" id="0" postCell="0"/>
        </electricalProjection>
        <electricalProjection id="NC_AS9_DVB_Generic_GJ" postsynapticPopulation="DVB" presynapticPopulation="AS9">
            <electricalConnection synapse="elec_syn_7conns" preCell="0" id="0" postCell="0"/>
        </electricalProjection>
        <electricalProjection id="NC_AVFL_AVFR_Generic_GJ" postsynapticPopulation="AVFR" presynapticPopulation="AVFL">
            <electricalConnection synapse="elec_syn_23conns" preCell="0" id="0" postCell="0"/>
        </electricalProjection>
        <electricalProjection id="NC_AVFR_AVFL_Generic_GJ" postsynapticPopulation="AVFL" presynapticPopulation="AVFR">
            <electricalConnection synapse="elec_syn_23conns" preCell="0" id="0" postCell="0"/>
        </electricalProjection>
        <electricalProjection id="NC_AVFR_VC4_Generic_GJ" postsynapticPopulation="VC4" presynapticPopulation="AVFR">
            <electricalConnection synapse="elec_syn_1conns" preCell="0" id="0" postCell="0"/>
        </electricalProjection>
        <electricalProjection id="NC_AVKR_SMBDL_Generic_GJ" postsynapticPopulation="SMBDL" presynapticPopulation="AVKR">
            <electricalConnection synapse="elec_syn_1conns" preCell="0" id="0" postCell="0"/>
        </electricalProjection>
        <electricalProjection id="NC_AVKR_SMBDR_Generic_GJ" postsynapticPopulation="SMBDR" presynapticPopulation="AVKR">
            <electricalConnection synapse="elec_syn_2conns" preCell="0" id="0" postCell="0"/>
        </electricalProjection>
        <electricalProjection id="NC_AVKR_SMBVR_Generic_GJ" postsynapticPopulation="SMBVR" presynapticPopulation="AVKR">
            <electricalConnection synapse="elec_syn_1conns" preCell="0" id="0" postCell="0"/>
        </electricalProjection>
        <electricalProjection id="NC_AVL_DVB_Generic_GJ" postsynapticPopulation="DVB" presynapticPopulation="AVL">
            <electricalConnection synapse="elec_syn_1conns" preCell="0" id="0" postCell="0"/>
        </electricalProjection>
        <electricalProjection id="NC_DA1_DA4_Generic_GJ" postsynapticPopulation="DA4" presynapticPopulation="DA1">
            <electricalConnection synapse="elec_syn_1conns" preCell="0" id="0" postCell="0"/>
        </electricalProjection>
        <electricalProjection id="NC_DA2_AS2_Generic_GJ" postsynapticPopulation="AS2" presynapticPopulation="DA2">
            <electricalConnection synapse="elec_syn_1conns" preCell="0" id="0" postCell="0"/>
        </electricalProjection>
        <electricalProjection id="NC_DA2_AS3_Generic_GJ" postsynapticPopulation="AS3" presynapticPopulation="DA2">
            <electricalConnection synapse="elec_syn_1conns" preCell="0" id="0" postCell="0"/>
        </electricalProjection>
        <electricalProjection id="NC_DA2_VA1_Generic_GJ" postsynapticPopulation="VA1" presynapticPopulation="DA2">
            <electricalConnection synapse="elec_syn_2conns" preCell="0" id="0" postCell="0"/>
        </electricalProjection>
        <electricalProjection id="NC_DA3_AS4_Generic_GJ" postsynapticPopulation="AS4" presynapticPopulation="DA3">
            <electricalConnection synapse="elec_syn_1conns" preCell="0" id="0" postCell="0"/>
        </electricalProjection>
        <electricalProjection id="NC_DA4_DA1_Generic_GJ" postsynapticPopulation="DA1" presynapticPopulation="DA4">
            <electricalConnection synapse="elec_syn_1conns" preCell="0" id="0" postCell="0"/>
        </electricalProjection>
        <electricalProjection id="NC_DA4_DB3_Generic_GJ" postsynapticPopulation="DB3" presynapticPopulation="DA4">
            <electricalConnection synapse="elec_syn_1conns" preCell="0" id="0" postCell="0"/>
        </electricalProjection>
        <electricalProjection id="NC_DA4_VB6_Generic_GJ" postsynapticPopulation="VB6" presynapticPopulation="DA4">
            <electricalConnection synapse="elec_syn_1conns" preCell="0" id="0" postCell="0"/>
        </electricalProjection>
        <electricalProjection id="NC_DA5_AS6_Generic_GJ" postsynapticPopulation="AS6" presynapticPopulation="DA5">
            <electricalConnection synapse="elec_syn_2conns" preCell="0" id="0" postCell="0"/>
        </electricalProjection>
        <electricalProjection id="NC_DA5_VA4_Generic_GJ" postsynapticPopulation="VA4" presynapticPopulation="DA5">
            <electricalConnection synapse="elec_syn_1conns" preCell="0" id="0" postCell="0"/>
        </electricalProjection>
        <electricalProjection id="NC_DA5_VA5_Generic_GJ" postsynapticPopulation="VA5" presynapticPopulation="DA5">
            <electricalConnection synapse="elec_syn_2conns" preCell="0" id="0" postCell="0"/>
        </electricalProjection>
        <electricalProjection id="NC_DA8_DA9_Generic_GJ" postsynapticPopulation="DA9" presynapticPopulation="DA8">
            <electricalConnection synapse="elec_syn_1conns" preCell="0" id="0" postCell="0"/>
        </electricalProjection>
        <electricalProjection id="NC_DA9_DA8_Generic_GJ" postsynapticPopulation="DA8" presynapticPopulation="DA9">
            <electricalConnection synapse="elec_syn_1conns" preCell="0" id="0" postCell="0"/>
        </electricalProjection>
        <electricalProjection id="NC_DA9_PDA_Generic_GJ" postsynapticPopulation="PDA" presynapticPopulation="DA9">
            <electricalConnection synapse="elec_syn_1conns" preCell="0" id="0" postCell="0"/>
        </electricalProjection>
        <electricalProjection id="NC_DA9_RID_Generic_GJ" postsynapticPopulation="RID" presynapticPopulation="DA9">
            <electricalConnection synapse="elec_syn_1conns" preCell="0" id="0" postCell="0"/>
        </electricalProjection>
        <electricalProjection id="NC_DB1_DB2_Generic_GJ" postsynapticPopulation="DB2" presynapticPopulation="DB1">
            <electricalConnection synapse="elec_syn_1conns" preCell="0" id="0" postCell="0"/>
        </electricalProjection>
        <electricalProjection id="NC_DB1_DB4_Generic_GJ" postsynapticPopulation="DB4" presynapticPopulation="DB1">
            <electricalConnection synapse="elec_syn_1conns" preCell="0" id="0" postCell="0"/>
        </electricalProjection>
        <electricalProjection id="NC_DB1_RID_Generic_GJ" postsynapticPopulation="RID" presynapticPopulation="DB1">
            <electricalConnection synapse="elec_syn_1conns" preCell="0" id="0" postCell="0"/>
        </electricalProjection>
        <electricalProjection id="NC_DB1_VB3_Generic_GJ" postsynapticPopulation="VB3" presynapticPopulation="DB1">
            <electricalConnection synapse="elec_syn_1conns" preCell="0" id="0" postCell="0"/>
        </electricalProjection>
        <electricalProjection id="NC_DB1_VB4_Generic_GJ" postsynapticPopulation="VB4" presynapticPopulation="DB1">
            <electricalConnection synapse="elec_syn_1conns" preCell="0" id="0" postCell="0"/>
        </electricalProjection>
        <electricalProjection id="NC_DB2_DB1_Generic_GJ" postsynapticPopulation="DB1" presynapticPopulation="DB2">
            <electricalConnection synapse="elec_syn_1conns" preCell="0" id="0" postCell="0"/>
        </electricalProjection>
        <electricalProjection id="NC_DB2_DB3_Generic_GJ" postsynapticPopulation="DB3" presynapticPopulation="DB2">
            <electricalConnection synapse="elec_syn_6conns" preCell="0" id="0" postCell="0"/>
        </electricalProjection>
        <electricalProjection id="NC_DB2_VB1_Generic_GJ" postsynapticPopulation="VB1" presynapticPopulation="DB2">
            <electricalConnection synapse="elec_syn_2conns" preCell="0" id="0" postCell="0"/>
        </electricalProjection>
        <electricalProjection id="NC_DB3_DA4_Generic_GJ" postsynapticPopulation="DA4" presynapticPopulation="DB3">
            <electricalConnection synapse="elec_syn_1conns" preCell="0" id="0" postCell="0"/>
        </electricalProjection>
        <electricalProjection id="NC_DB3_DB2_Generic_GJ" postsynapticPopulation="DB2" presynapticPopulation="DB3">
            <electricalConnection synapse="elec_syn_6conns" preCell="0" id="0" postCell="0"/>
        </electricalProjection>
        <electricalProjection id="NC_DB3_DB4_Generic_GJ" postsynapticPopulation="DB4" presynapticPopulation="DB3">
            <electricalConnection synapse="elec_syn_1conns" preCell="0" id="0" postCell="0"/>
        </electricalProjection>
        <electricalProjection id="NC_DB4_DB1_Generic_GJ" postsynapticPopulation="DB1" presynapticPopulation="DB4">
            <electricalConnection synapse="elec_syn_1conns" preCell="0" id="0" postCell="0"/>
        </electricalProjection>
        <electricalProjection id="NC_DB4_DB3_Generic_GJ" postsynapticPopulation="DB3" presynapticPopulation="DB4">
            <electricalConnection synapse="elec_syn_1conns" preCell="0" id="0" postCell="0"/>
        </electricalProjection>
        <electricalProjection id="NC_DB4_VB2_Generic_GJ" postsynapticPopulation="VB2" presynapticPopulation="DB4">
            <electricalConnection synapse="elec_syn_1conns" preCell="0" id="0" postCell="0"/>
        </electricalProjection>
        <electricalProjection id="NC_DB4_VB4_Generic_GJ" postsynapticPopulation="VB4" presynapticPopulation="DB4">
            <electricalConnection synapse="elec_syn_1conns" preCell="0" id="0" postCell="0"/>
        </electricalProjection>
        <electricalProjection id="NC_DD1_DD2_Generic_GJ" postsynapticPopulation="DD2" presynapticPopulation="DD1">
            <electricalConnection synapse="elec_syn_1conns" preCell="0" id="0" postCell="0"/>
        </electricalProjection>
        <electricalProjection id="NC_DD1_VD1_Generic_GJ" postsynapticPopulation="VD1" presynapticPopulation="DD1">
            <electricalConnection synapse="elec_syn_4conns" preCell="0" id="0" postCell="0"/>
        </electricalProjection>
        <electricalProjection id="NC_DD1_VD2_Generic_GJ" postsynapticPopulation="VD2" presynapticPopulation="DD1">
            <electricalConnection synapse="elec_syn_2conns" preCell="0" id="0" postCell="0"/>
        </electricalProjection>
        <electricalProjection id="NC_DD2_DD1_Generic_GJ" postsynapticPopulation="DD1" presynapticPopulation="DD2">
            <electricalConnection synapse="elec_syn_1conns" preCell="0" id="0" postCell="0"/>
        </electricalProjection>
        <electricalProjection id="NC_DD2_DD3_Generic_GJ" postsynapticPopulation="DD3" presynapticPopulation="DD2">
            <electricalConnection synapse="elec_syn_2conns" preCell="0" id="0" postCell="0"/>
        </electricalProjection>
        <electricalProjection id="NC_DD2_VD4_Generic_GJ" postsynapticPopulation="VD4" presynapticPopulation="DD2">
            <electricalConnection synapse="elec_syn_2conns" preCell="0" id="0" postCell="0"/>
        </electricalProjection>
        <electricalProjection id="NC_DD3_DD2_Generic_GJ" postsynapticPopulation="DD2" presynapticPopulation="DD3">
            <electricalConnection synapse="elec_syn_2conns" preCell="0" id="0" postCell="0"/>
        </electricalProjection>
        <electricalProjection id="NC_DD3_DD4_Generic_GJ" postsynapticPopulation="DD4" presynapticPopulation="DD3">
            <electricalConnection synapse="elec_syn_1conns" preCell="0" id="0" postCell="0"/>
        </electricalProjection>
        <electricalProjection id="NC_DD4_DD3_Generic_GJ" postsynapticPopulation="DD3" presynapticPopulation="DD4">
            <electricalConnection synapse="elec_syn_1conns" preCell="0" id="0" postCell="0"/>
        </electricalProjection>
        <electricalProjection id="NC_DD4_VC3_Generic_GJ" postsynapticPopulation="VC3" presynapticPopulation="DD4">
            <electricalConnection synapse="elec_syn_1conns" preCell="0" id="0" postCell="0"/>
        </electricalProjection>
        <electricalProjection id="NC_DD4_VD8_Generic_GJ" postsynapticPopulation="VD8" presynapticPopulation="DD4">
            <electricalConnection synapse="elec_syn_1conns" preCell="0" id="0" postCell="0"/>
        </electricalProjection>
        <electricalProjection id="NC_DD5_VD10_Generic_GJ" postsynapticPopulation="VD10" presynapticPopulation="DD5">
            <electricalConnection synapse="elec_syn_1conns" preCell="0" id="0" postCell="0"/>
        </electricalProjection>
        <electricalProjection id="NC_DVB_AS9_Generic_GJ" postsynapticPopulation="AS9" presynapticPopulation="DVB">
            <electricalConnection synapse="elec_syn_7conns" preCell="0" id="0" postCell="0"/>
        </electricalProjection>
        <electricalProjection id="NC_DVB_AVL_Generic_GJ" postsynapticPopulation="AVL" presynapticPopulation="DVB">
            <electricalConnection synapse="elec_syn_1conns" preCell="0" id="0" postCell="0"/>
        </electricalProjection>
        <electricalProjection id="NC_DVB_VA9_Generic_GJ" postsynapticPopulation="VA9" presynapticPopulation="DVB">
            <electricalConnection synapse="elec_syn_1conns" preCell="0" id="0" postCell="0"/>
        </electricalProjection>
        <electricalProjection id="NC_DVB_VB9_Generic_GJ" postsynapticPopulation="VB9" presynapticPopulation="DVB">
            <electricalConnection synapse="elec_syn_1conns" preCell="0" id="0" postCell="0"/>
        </electricalProjection>
        <electricalProjection id="NC_HSNL_HSNR_Generic_GJ" postsynapticPopulation="HSNR" presynapticPopulation="HSNL">
            <electricalConnection synapse="elec_syn_1conns" preCell="0" id="0" postCell="0"/>
        </electricalProjection>
        <electricalProjection id="NC_HSNR_HSNL_Generic_GJ" postsynapticPopulation="HSNL" presynapticPopulation="HSNR">
            <electricalConnection synapse="elec_syn_1conns" preCell="0" id="0" postCell="0"/>
        </electricalProjection>
        <electricalProjection id="NC_HSNR_PVNR_Generic_GJ" postsynapticPopulation="PVNR" presynapticPopulation="HSNR">
            <electricalConnection synapse="elec_syn_1conns" preCell="0" id="0" postCell="0"/>
        </electricalProjection>
        <electricalProjection id="NC_IL1DL_IL1DR_Generic_GJ" postsynapticPopulation="IL1DR" presynapticPopulation="IL1DL">
            <electricalConnection synapse="elec_syn_1conns" preCell="0" id="0" postCell="0"/>
        </electricalProjection>
        <electricalProjection id="NC_IL1DL_IL1L_Generic_GJ" postsynapticPopulation="IL1L" presynapticPopulation="IL1DL">
            <electricalConnection synapse="elec_syn_1conns" preCell="0" id="0" postCell="0"/>
        </electricalProjection>
        <electricalProjection id="NC_IL1DL_RMEV_Generic_GJ" postsynapticPopulation="RMEV" presynapticPopulation="IL1DL">
            <electricalConnection synapse="elec_syn_1conns" preCell="0" id="0" postCell="0"/>
        </electricalProjection>
        <electricalProjection id="NC_IL1DR_IL1DL_Generic_GJ" postsynapticPopulation="IL1DL" presynapticPopulation="IL1DR">
            <electricalConnection synapse="elec_syn_1conns" preCell="0" id="0" postCell="0"/>
        </electricalProjection>
        <electricalProjection id="NC_IL1DR_IL1R_Generic_GJ" postsynapticPopulation="IL1R" presynapticPopulation="IL1DR">
            <electricalConnection synapse="elec_syn_1conns" preCell="0" id="0" postCell="0"/>
        </electricalProjection>
        <electricalProjection id="NC_IL1DR_RMEV_Generic_GJ" postsynapticPopulation="RMEV" presynapticPopulation="IL1DR">
            <electricalConnection synapse="elec_syn_1conns" preCell="0" id="0" postCell="0"/>
        </electricalProjection>
        <electricalProjection id="NC_IL1L_IL1DL_Generic_GJ" postsynapticPopulation="IL1DL" presynapticPopulation="IL1L">
            <electricalConnection synapse="elec_syn_1conns" preCell="0" id="0" postCell="0"/>
        </electricalProjection>
        <electricalProjection id="NC_IL1L_IL1VL_Generic_GJ" postsynapticPopulation="IL1VL" presynapticPopulation="IL1L">
            <electricalConnection synapse="elec_syn_1conns" preCell="0" id="0" postCell="0"/>
        </electricalProjection>
        <electricalProjection id="NC_IL1R_IL1DR_Generic_GJ" postsynapticPopulation="IL1DR" presynapticPopulation="IL1R">
            <electricalConnection synapse="elec_syn_1conns" preCell="0" id="0" postCell="0"/>
        </electricalProjection>
        <electricalProjection id="NC_IL1R_IL1VR_Generic_GJ" postsynapticPopulation="IL1VR" presynapticPopulation="IL1R">
            <electricalConnection synapse="elec_syn_1conns" preCell="0" id="0" postCell="0"/>
        </electricalProjection>
        <electricalProjection id="NC_IL1VL_IL1L_Generic_GJ" postsynapticPopulation="IL1L" presynapticPopulation="IL1VL">
            <electricalConnection synapse="elec_syn_1conns" preCell="0" id="0" postCell="0"/>
        </electricalProjection>
        <electricalProjection id="NC_IL1VL_IL1VR_Generic_GJ" postsynapticPopulation="IL1VR" presynapticPopulation="IL1VL">
            <electricalConnection synapse="elec_syn_1conns" preCell="0" id="0" postCell="0"/>
        </electricalProjection>
        <electricalProjection id="NC_IL1VL_RMED_Generic_GJ" postsynapticPopulation="RMED" presynapticPopulation="IL1VL">
            <electricalConnection synapse="elec_syn_1conns" preCell="0" id="0" postCell="0"/>
        </electricalProjection>
        <electricalProjection id="NC_IL1VR_IL1R_Generic_GJ" postsynapticPopulation="IL1R" presynapticPopulation="IL1VR">
            <electricalConnection synapse="elec_syn_1conns" preCell="0" id="0" postCell="0"/>
        </electricalProjection>
        <electricalProjection id="NC_IL1VR_IL1VL_Generic_GJ" postsynapticPopulation="IL1VL" presynapticPopulation="IL1VR">
            <electricalConnection synapse="elec_syn_1conns" preCell="0" id="0" postCell="0"/>
        </electricalProjection>
        <electricalProjection id="NC_VC2_VC1_Generic_GJ" postsynapticPopulation="VC1" presynapticPopulation="VC2">
            <electricalConnection synapse="elec_syn_6conns" preCell="0" id="0" postCell="0"/>
        </electricalProjection>
        <electricalProjection id="NC_VC2_VC3_Generic_GJ" postsynapticPopulation="VC3" presynapticPopulation="VC2">
            <electricalConnection synapse="elec_syn_2conns" preCell="0" id="0" postCell="0"/>
        </electricalProjection>
        <electricalProjection id="NC_VC3_DD4_Generic_GJ" postsynapticPopulation="DD4" presynapticPopulation="VC3">
            <electricalConnection synapse="elec_syn_1conns" preCell="0" id="0" postCell="0"/>
        </electricalProjection>
        <electricalProjection id="NC_VC3_VC1_Generic_GJ" postsynapticPopulation="VC1" presynapticPopulation="VC3">
            <electricalConnection synapse="elec_syn_2conns" preCell="0" id="0" postCell="0"/>
        </electricalProjection>
        <electricalProjection id="NC_VC3_VC2_Generic_GJ" postsynapticPopulation="VC2" presynapticPopulation="VC3">
            <electricalConnection synapse="elec_syn_2conns" preCell="0" id="0" postCell="0"/>
        </electricalProjection>
        <electricalProjection id="NC_VC3_VC4_Generic_GJ" postsynapticPopulation="VC4" presynapticPopulation="VC3">
            <electricalConnection synapse="elec_syn_1conns" preCell="0" id="0" postCell="0"/>
        </electricalProjection>
        <electricalProjection id="NC_VC3_VC5_Generic_GJ" postsynapticPopulation="VC5" presynapticPopulation="VC3">
            <electricalConnection synapse="elec_syn_2conns" preCell="0" id="0" postCell="0"/>
        </electricalProjection>
        <electricalProjection id="NC_VC4_AVFR_Generic_GJ" postsynapticPopulation="AVFR" presynapticPopulation="VC4">
            <electricalConnection synapse="elec_syn_1conns" preCell="0" id="0" postCell="0"/>
        </electricalProjection>
        <electricalProjection id="NC_VC4_VC3_Generic_GJ" postsynapticPopulation="VC3" presynapticPopulation="VC4">
            <electricalConnection synapse="elec_syn_1conns" preCell="0" id="0" postCell="0"/>
        </electricalProjection>
        <electricalProjection id="NC_VC4_VC5_Generic_GJ" postsynapticPopulation="VC5" presynapticPopulation="VC4">
            <electricalConnection synapse="elec_syn_1conns" preCell="0" id="0" postCell="0"/>
        </electricalProjection>
        <electricalProjection id="NC_VC5_VC3_Generic_GJ" postsynapticPopulation="VC3" presynapticPopulation="VC5">
            <electricalConnection synapse="elec_syn_2conns" preCell="0" id="0" postCell="0"/>
        </electricalProjection>
        <electricalProjection id="NC_VC5_VC4_Generic_GJ" postsynapticPopulation="VC4" presynapticPopulation="VC5">
            <electricalConnection synapse="elec_syn_1conns" preCell="0" id="0" postCell="0"/>
        </electricalProjection>
        <electricalProjection id="NC_VD1_DD1_Generic_GJ" postsynapticPopulation="DD1" presynapticPopulation="VD1">
            <electricalConnection synapse="elec_syn_4conns" preCell="0" id="0" postCell="0"/>
        </electricalProjection>
        <electricalProjection id="NC_VD1_SMDDR_Generic_GJ" postsynapticPopulation="SMDDR" presynapticPopulation="VD1">
            <electricalConnection synapse="elec_syn_1conns" preCell="0" id="0" postCell="0"/>
        </electricalProjection>
        <electricalProjection id="NC_VD1_VA2_Generic_GJ" postsynapticPopulation="VA2" presynapticPopulation="VD1">
            <electricalConnection synapse="elec_syn_1conns" preCell="0" id="0" postCell="0"/>
        </electricalProjection>
        <electricalProjection id="NC_VD1_VC1_Generic_GJ" postsynapticPopulation="VC1" presynapticPopulation="VD1">
            <electricalConnection synapse="elec_syn_1conns" preCell="0" id="0" postCell="0"/>
        </electricalProjection>
        <electricalProjection id="NC_VD1_VD2_Generic_GJ" postsynapticPopulation="VD2" presynapticPopulation="VD1">
            <electricalConnection synapse="elec_syn_7conns" preCell="0" id="0" postCell="0"/>
        </electricalProjection>
        <electricalProjection id="NC_VD10_DD5_Generic_GJ" postsynapticPopulation="DD5" presynapticPopulation="VD10">
            <electricalConnection synapse="elec_syn_1conns" preCell="0" id="0" postCell="0"/>
        </electricalProjection>
        <electricalProjection id="NC_VD10_VD9_Generic_GJ" postsynapticPopulation="VD9" presynapticPopulation="VD10">
            <electricalConnection synapse="elec_syn_5conns" preCell="0" id="0" postCell="0"/>
        </electricalProjection>
        <electricalProjection id="NC_VD2_AS1_Generic_GJ" postsynapticPopulation="AS1" presynapticPopulation="VD2">
            <electricalConnection synapse="elec_syn_1conns" preCell="0" id="0" postCell="0"/>
        </electricalProjection>
        <electricalProjection id="NC_VD2_DD1_Generic_GJ" postsynapticPopulation="DD1" presynapticPopulation="VD2">
            <electricalConnection synapse="elec_syn_2conns" preCell="0" id="0" postCell="0"/>
        </electricalProjection>
        <electricalProjection id="NC_VD2_VA2_Generic_GJ" postsynapticPopulation="VA2" presynapticPopulation="VD2">
            <electricalConnection synapse="elec_syn_3conns" preCell="0" id="0" postCell="0"/>
        </electricalProjection>
        <electricalProjection id="NC_VD2_VD1_Generic_GJ" postsynapticPopulation="VD1" presynapticPopulation="VD2">
            <electricalConnection synapse="elec_syn_7conns" preCell="0" id="0" postCell="0"/>
        </electricalProjection>
        <electricalProjection id="NC_VD2_VD3_Generic_GJ" postsynapticPopulation="VD3" presynapticPopulation="VD2">
            <electricalConnection synapse="elec_syn_2conns" preCell="0" id="0" postCell="0"/>
        </electricalProjection>
        <electricalProjection id="NC_VD3_VD2_Generic_GJ" postsynapticPopulation="VD2" presynapticPopulation="VD3">
            <electricalConnection synapse="elec_syn_2conns" preCell="0" id="0" postCell="0"/>
        </electricalProjection>
        <electricalProjection id="NC_VD3_VD4_Generic_GJ" postsynapticPopulation="VD4" presynapticPopulation="VD3">
            <electricalConnection synapse="elec_syn_1conns" preCell="0" id="0" postCell="0"/>
        </electricalProjection>
        <electricalProjection id="NC_VD4_DD2_Generic_GJ" postsynapticPopulation="DD2" presynapticPopulation="VD4">
            <electricalConnection synapse="elec_syn_2conns" preCell="0" id="0" postCell="0"/>
        </electricalProjection>
        <electricalProjection id="NC_VD4_VD3_Generic_GJ" postsynapticPopulation="VD3" presynapticPopulation="VD4">
            <electricalConnection synapse="elec_syn_1conns" preCell="0" id="0" postCell="0"/>
        </electricalProjection>
        <electricalProjection id="NC_VD4_VD5_Generic_GJ" postsynapticPopulation="VD5" presynapticPopulation="VD4">
            <electricalConnection synapse="elec_syn_1conns" preCell="0" id="0" postCell="0"/>
        </electricalProjection>
        <electricalProjection id="NC_VD5_VD4_Generic_GJ" postsynapticPopulation="VD4" presynapticPopulation="VD5">
            <electricalConnection synapse="elec_syn_1conns" preCell="0" id="0" postCell="0"/>
        </electricalProjection>
        <electricalProjection id="NC_VD5_VD6_Generic_GJ" postsynapticPopulation="VD6" presynapticPopulation="VD5">
            <electricalConnection synapse="elec_syn_2conns" preCell="0" id="0" postCell="0"/>
        </electricalProjection>
        <electricalProjection id="NC_VD6_VD5_Generic_GJ" postsynapticPopulation="VD5" presynapticPopulation="VD6">
            <electricalConnection synapse="elec_syn_2conns" preCell="0" id="0" postCell="0"/>
        </electricalProjection>
        <electricalProjection id="NC_VD6_VD7_Generic_GJ" postsynapticPopulation="VD7" presynapticPopulation="VD6">
            <electricalConnection synapse="elec_syn_1conns" preCell="0" id="0" postCell="0"/>
        </electricalProjection>
        <electricalProjection id="NC_VD7_VA9_Generic_GJ" postsynapticPopulation="VA9" presynapticPopulation="VD7">
            <electricalConnection synapse="elec_syn_1conns" preCell="0" id="0" postCell="0"/>
        </electricalProjection>
        <electricalProjection id="NC_VD7_VD6_Generic_GJ" postsynapticPopulation="VD6" presynapticPopulation="VD7">
            <electricalConnection synapse="elec_syn_1conns" preCell="0" id="0" postCell="0"/>
        </electricalProjection>
        <electricalProjection id="NC_VD8_DD4_Generic_GJ" postsynapticPopulation="DD4" presynapticPopulation="VD8">
            <electricalConnection synapse="elec_syn_1conns" preCell="0" id="0" postCell="0"/>
        </electricalProjection>
        <electricalProjection id="NC_VD8_VA8_Generic_GJ" postsynapticPopulation="VA8" presynapticPopulation="VD8">
            <electricalConnection synapse="elec_syn_1conns" preCell="0" id="0" postCell="0"/>
        </electricalProjection>
        <electricalProjection id="NC_VD9_VD10_Generic_GJ" postsynapticPopulation="VD10" presynapticPopulation="VD9">
            <electricalConnection synapse="elec_syn_5conns" preCell="0" id="0" postCell="0"/>
        </electricalProjection>
        <electricalProjection id="NC_PDA_DA9_Generic_GJ" postsynapticPopulation="DA9" presynapticPopulation="PDA">
            <electricalConnection synapse="elec_syn_1conns" preCell="0" id="0" postCell="0"/>
        </electricalProjection>
        <electricalProjection id="NC_PDB_AS11_Generic_GJ" postsynapticPopulation="AS11" presynapticPopulation="PDB">
            <electricalConnection synapse="elec_syn_2conns" preCell="0" id="0" postCell="0"/>
        </electricalProjection>
        <electricalProjection id="NC_PDB_RID_Generic_GJ" postsynapticPopulation="RID" presynapticPopulation="PDB">
            <electricalConnection synapse="elec_syn_2conns" preCell="0" id="0" postCell="0"/>
        </electricalProjection>
        <electricalProjection id="NC_PVNR_HSNR_Generic_GJ" postsynapticPopulation="HSNR" presynapticPopulation="PVNR">
            <electricalConnection synapse="elec_syn_1conns" preCell="0" id="0" postCell="0"/>
        </electricalProjection>
        <electricalProjection id="NC_RID_DA9_Generic_GJ" postsynapticPopulation="DA9" presynapticPopulation="RID">
            <electricalConnection synapse="elec_syn_1conns" preCell="0" id="0" postCell="0"/>
        </electricalProjection>
        <electricalProjection id="NC_RID_DB1_Generic_GJ" postsynapticPopulation="DB1" presynapticPopulation="RID">
            <electricalConnection synapse="elec_syn_1conns" preCell="0" id="0" postCell="0"/>
        </electricalProjection>
        <electricalProjection id="NC_RID_PDB_Generic_GJ" postsynapticPopulation="PDB" presynapticPopulation="RID">
            <electricalConnection synapse="elec_syn_2conns" preCell="0" id="0" postCell="0"/>
        </electricalProjection>
        <electricalProjection id="NC_RIVL_RIVR_Generic_GJ" postsynapticPopulation="RIVR" presynapticPopulation="RIVL">
            <electricalConnection synapse="elec_syn_2conns" preCell="0" id="0" postCell="0"/>
        </electricalProjection>
        <electricalProjection id="NC_RIVL_SMDVL_Generic_GJ" postsynapticPopulation="SMDVL" presynapticPopulation="RIVL">
            <electricalConnection synapse="elec_syn_1conns" preCell="0" id="0" postCell="0"/>
        </electricalProjection>
        <electricalProjection id="NC_RIVR_RIVL_Generic_GJ" postsynapticPopulation="RIVL" presynapticPopulation="RIVR">
            <electricalConnection synapse="elec_syn_2conns" preCell="0" id="0" postCell="0"/>
        </electricalProjection>
        <electricalProjection id="NC_RIVR_SMDVR_Generic_GJ" postsynapticPopulation="SMDVR" presynapticPopulation="RIVR">
            <electricalConnection synapse="elec_syn_2conns" preCell="0" id="0" postCell="0"/>
        </electricalProjection>
        <electricalProjection id="NC_RMDDL_RMDL_Generic_GJ" postsynapticPopulation="RMDL" presynapticPopulation="RMDDL">
            <electricalConnection synapse="elec_syn_1conns" preCell="0" id="0" postCell="0"/>
        </electricalProjection>
        <electricalProjection id="NC_RMDDL_RMDVL_Generic_GJ" postsynapticPopulation="RMDVL" presynapticPopulation="RMDDL">
            <electricalConnection synapse="elec_syn_1conns" preCell="0" id="0" postCell="0"/>
        </electricalProjection>
        <electricalProjection id="NC_RMDDL_SMDDL_Generic_GJ" postsynapticPopulation="SMDDL" presynapticPopulation="RMDDL">
            <electricalConnection synapse="elec_syn_1conns" preCell="0" id="0" postCell="0"/>
        </electricalProjection>
        <electricalProjection id="NC_RMDDR_RMDVR_Generic_GJ" postsynapticPopulation="RMDVR" presynapticPopulation="RMDDR">
            <electricalConnection synapse="elec_syn_1conns" preCell="0" id="0" postCell="0"/>
        </electricalProjection>
        <electricalProjection id="NC_RMDDR_SMDDR_Generic_GJ" postsynapticPopulation="SMDDR" presynapticPopulation="RMDDR">
            <electricalConnection synapse="elec_syn_1conns" preCell="0" id="0" postCell="0"/>
        </electricalProjection>
        <electricalProjection id="NC_RMDL_RMDDL_Generic_GJ" postsynapticPopulation="RMDDL" presynapticPopulation="RMDL">
            <electricalConnection synapse="elec_syn_1conns" preCell="0" id="0" postCell="0"/>
        </electricalProjection>
        <electricalProjection id="NC_RMDL_RMDVL_Generic_GJ" postsynapticPopulation="RMDVL" presynapticPopulation="RMDL">
            <electricalConnection synapse="elec_syn_1conns" preCell="0" id="0" postCell="0"/>
        </electricalProjection>
        <electricalProjection id="NC_RMDR_RMDVR_Generic_GJ" postsynapticPopulation="RMDVR" presynapticPopulation="RMDR">
            <electricalConnection synapse="elec_syn_1conns" preCell="0" id="0" postCell="0"/>
        </electricalProjection>
        <electricalProjection id="NC_RMDVL_RMDDL_Generic_GJ" postsynapticPopulation="RMDDL" presynapticPopulation="RMDVL">
            <electricalConnection synapse="elec_syn_1conns" preCell="0" id="0" postCell="0"/>
        </electricalProjection>
        <electricalProjection id="NC_RMDVL_RMDL_Generic_GJ" postsynapticPopulation="RMDL" presynapticPopulation="RMDVL">
            <electricalConnection synapse="elec_syn_1conns" preCell="0" id="0" postCell="0"/>
        </electricalProjection>
        <electricalProjection id="NC_RMDVL_RMDVR_Generic_GJ" postsynapticPopulation="RMDVR" presynapticPopulation="RMDVL">
            <electricalConnection synapse="elec_syn_1conns" preCell="0" id="0" postCell="0"/>
        </electricalProjection>
        <electricalProjection id="NC_RMDVL_SMDVL_Generic_GJ" postsynapticPopulation="SMDVL" presynapticPopulation="RMDVL">
            <electricalConnection synapse="elec_syn_1conns" preCell="0" id="0" postCell="0"/>
        </electricalProjection>
        <electricalProjection id="NC_RMDVR_RMDDR_Generic_GJ" postsynapticPopulation="RMDDR" presynapticPopulation="RMDVR">
            <electricalConnection synapse="elec_syn_1conns" preCell="0" id="0" postCell="0"/>
        </electricalProjection>
        <electricalProjection id="NC_RMDVR_RMDR_Generic_GJ" postsynapticPopulation="RMDR" presynapticPopulation="RMDVR">
            <electricalConnection synapse="elec_syn_1conns" preCell="0" id="0" postCell="0"/>
        </electricalProjection>
        <electricalProjection id="NC_RMDVR_RMDVL_Generic_GJ" postsynapticPopulation="RMDVL" presynapticPopulation="RMDVR">
            <electricalConnection synapse="elec_syn_1conns" preCell="0" id="0" postCell="0"/>
        </electricalProjection>
        <electricalProjection id="NC_RMDVR_SMDVR_Generic_GJ" postsynapticPopulation="SMDVR" presynapticPopulation="RMDVR">
            <electricalConnection synapse="elec_syn_1conns" preCell="0" id="0" postCell="0"/>
        </electricalProjection>
        <electricalProjection id="NC_RMED_IL1VL_Generic_GJ" postsynapticPopulation="IL1VL" presynapticPopulation="RMED">
            <electricalConnection synapse="elec_syn_1conns" preCell="0" id="0" postCell="0"/>
        </electricalProjection>
        <electricalProjection id="NC_RMED_RMEV_Generic_GJ" postsynapticPopulation="RMEV" presynapticPopulation="RMED">
            <electricalConnection synapse="elec_syn_2conns" preCell="0" id="0" postCell="0"/>
        </electricalProjection>
        <electricalProjection id="NC_RMEL_RMEV_Generic_GJ" postsynapticPopulation="RMEV" presynapticPopulation="RMEL">
            <electricalConnection synapse="elec_syn_1conns" preCell="0" id="0" postCell="0"/>
        </electricalProjection>
        <electricalProjection id="NC_RMER_RMEV_Generic_GJ" postsynapticPopulation="RMEV" presynapticPopulation="RMER">
            <electricalConnection synapse="elec_syn_1conns" preCell="0" id="0" postCell="0"/>
        </electricalProjection>
        <electricalProjection id="NC_RMEV_IL1DL_Generic_GJ" postsynapticPopulation="IL1DL" presynapticPopulation="RMEV">
            <electricalConnection synapse="elec_syn_1conns" preCell="0" id="0" postCell="0"/>
        </electricalProjection>
        <electricalProjection id="NC_RMEV_IL1DR_Generic_GJ" postsynapticPopulation="IL1DR" presynapticPopulation="RMEV">
            <electricalConnection synapse="elec_syn_1conns" preCell="0" id="0" postCell="0"/>
        </electricalProjection>
        <electricalProjection id="NC_RMEV_RMED_Generic_GJ" postsynapticPopulation="RMED" presynapticPopulation="RMEV">
            <electricalConnection synapse="elec_syn_2conns" preCell="0" id="0" postCell="0"/>
        </electricalProjection>
        <electricalProjection id="NC_RMEV_RMEL_Generic_GJ" postsynapticPopulation="RMEL" presynapticPopulation="RMEV">
            <electricalConnection synapse="elec_syn_1conns" preCell="0" id="0" postCell="0"/>
        </electricalProjection>
        <electricalProjection id="NC_RMEV_RMER_Generic_GJ" postsynapticPopulation="RMER" presynapticPopulation="RMEV">
            <electricalConnection synapse="elec_syn_1conns" preCell="0" id="0" postCell="0"/>
        </electricalProjection>
        <electricalProjection id="NC_RMGL_RMHL_Generic_GJ" postsynapticPopulation="RMHL" presynapticPopulation="RMGL">
            <electricalConnection synapse="elec_syn_3conns" preCell="0" id="0" postCell="0"/>
        </electricalProjection>
        <electricalProjection id="NC_RMGR_RMHR_Generic_GJ" postsynapticPopulation="RMHR" presynapticPopulation="RMGR">
            <electricalConnection synapse="elec_syn_1conns" preCell="0" id="0" postCell="0"/>
        </electricalProjection>
        <electricalProjection id="NC_RMHL_RMGL_Generic_GJ" postsynapticPopulation="RMGL" presynapticPopulation="RMHL">
            <electricalConnection synapse="elec_syn_3conns" preCell="0" id="0" postCell="0"/>
        </electricalProjection>
        <electricalProjection id="NC_RMHR_RMGR_Generic_GJ" postsynapticPopulation="RMGR" presynapticPopulation="RMHR">
            <electricalConnection synapse="elec_syn_1conns" preCell="0" id="0" postCell="0"/>
        </electricalProjection>
        <electricalProjection id="NC_SMBDL_AVKR_Generic_GJ" postsynapticPopulation="AVKR" presynapticPopulation="SMBDL">
            <electricalConnection synapse="elec_syn_1conns" preCell="0" id="0" postCell="0"/>
        </electricalProjection>
        <electricalProjection id="NC_SMBDR_AVKR_Generic_GJ" postsynapticPopulation="AVKR" presynapticPopulation="SMBDR">
            <electricalConnection synapse="elec_syn_2conns" preCell="0" id="0" postCell="0"/>
        </electricalProjection>
        <electricalProjection id="NC_SMBVR_AVKR_Generic_GJ" postsynapticPopulation="AVKR" presynapticPopulation="SMBVR">
            <electricalConnection synapse="elec_syn_1conns" preCell="0" id="0" postCell="0"/>
        </electricalProjection>
        <electricalProjection id="NC_SMDDL_RMDDL_Generic_GJ" postsynapticPopulation="RMDDL" presynapticPopulation="SMDDL">
            <electricalConnection synapse="elec_syn_1conns" preCell="0" id="0" postCell="0"/>
        </electricalProjection>
        <electricalProjection id="NC_SMDDR_RMDDR_Generic_GJ" postsynapticPopulation="RMDDR" presynapticPopulation="SMDDR">
            <electricalConnection synapse="elec_syn_1conns" preCell="0" id="0" postCell="0"/>
        </electricalProjection>
        <electricalProjection id="NC_SMDDR_VD1_Generic_GJ" postsynapticPopulation="VD1" presynapticPopulation="SMDDR">
            <electricalConnection synapse="elec_syn_1conns" preCell="0" id="0" postCell="0"/>
        </electricalProjection>
        <electricalProjection id="NC_SMDVL_RIVL_Generic_GJ" postsynapticPopulation="RIVL" presynapticPopulation="SMDVL">
            <electricalConnection synapse="elec_syn_1conns" preCell="0" id="0" postCell="0"/>
        </electricalProjection>
        <electricalProjection id="NC_SMDVL_RMDVL_Generic_GJ" postsynapticPopulation="RMDVL" presynapticPopulation="SMDVL">
            <electricalConnection synapse="elec_syn_1conns" preCell="0" id="0" postCell="0"/>
        </electricalProjection>
        <electricalProjection id="NC_SMDVL_SMDVR_Generic_GJ" postsynapticPopulation="SMDVR" presynapticPopulation="SMDVL">
            <electricalConnection synapse="elec_syn_1conns" preCell="0" id="0" postCell="0"/>
        </electricalProjection>
        <electricalProjection id="NC_SMDVR_RIVR_Generic_GJ" postsynapticPopulation="RIVR" presynapticPopulation="SMDVR">
            <electricalConnection synapse="elec_syn_2conns" preCell="0" id="0" postCell="0"/>
        </electricalProjection>
        <electricalProjection id="NC_SMDVR_RMDVR_Generic_GJ" postsynapticPopulation="RMDVR" presynapticPopulation="SMDVR">
            <electricalConnection synapse="elec_syn_1conns" preCell="0" id="0" postCell="0"/>
        </electricalProjection>
        <electricalProjection id="NC_SMDVR_SMDVL_Generic_GJ" postsynapticPopulation="SMDVL" presynapticPopulation="SMDVR">
            <electricalConnection synapse="elec_syn_1conns" preCell="0" id="0" postCell="0"/>
        </electricalProjection>
        <electricalProjection id="NC_SMDVR_VB1_Generic_GJ" postsynapticPopulation="VB1" presynapticPopulation="SMDVR">
            <electricalConnection synapse="elec_syn_1conns" preCell="0" id="0" postCell="0"/>
        </electricalProjection>
        <electricalProjection id="NC_VA1_DA2_Generic_GJ" postsynapticPopulation="DA2" presynapticPopulation="VA1">
            <electricalConnection synapse="elec_syn_2conns" preCell="0" id="0" postCell="0"/>
        </electricalProjection>
        <electricalProjection id="NC_VA12_VB11_Generic_GJ" postsynapticPopulation="VB11" presynapticPopulation="VA12">
            <electricalConnection synapse="elec_syn_1conns" preCell="0" id="0" postCell="0"/>
        </electricalProjection>
        <electricalProjection id="NC_VA2_VD1_Generic_GJ" postsynapticPopulation="VD1" presynapticPopulation="VA2">
            <electricalConnection synapse="elec_syn_1conns" preCell="0" id="0" postCell="0"/>
        </electricalProjection>
        <electricalProjection id="NC_VA2_VD2_Generic_GJ" postsynapticPopulation="VD2" presynapticPopulation="VA2">
            <electricalConnection synapse="elec_syn_3conns" preCell="0" id="0" postCell="0"/>
        </electricalProjection>
        <electricalProjection id="NC_VA3_AS1_Generic_GJ" postsynapticPopulation="AS1" presynapticPopulation="VA3">
            <electricalConnection synapse="elec_syn_1conns" preCell="0" id="0" postCell="0"/>
        </electricalProjection>
        <electricalProjection id="NC_VA4_AS2_Generic_GJ" postsynapticPopulation="AS2" presynapticPopulation="VA4">
            <electricalConnection synapse="elec_syn_2conns" preCell="0" id="0" postCell="0"/>
        </electricalProjection>
        <electricalProjection id="NC_VA4_DA5_Generic_GJ" postsynapticPopulation="DA5" presynapticPopulation="VA4">
            <electricalConnection synapse="elec_syn_1conns" preCell="0" id="0" postCell="0"/>
        </electricalProjection>
        <electricalProjection id="NC_VA5_AS3_Generic_GJ" postsynapticPopulation="AS3" presynapticPopulation="VA5">
            <electricalConnection synapse="elec_syn_2conns" preCell="0" id="0" postCell="0"/>
        </electricalProjection>
        <electricalProjection id="NC_VA5_DA5_Generic_GJ" postsynapticPopulation="DA5" presynapticPopulation="VA5">
            <electricalConnection synapse="elec_syn_2conns" preCell="0" id="0" postCell="0"/>
        </electricalProjection>
        <electricalProjection id="NC_VA7_AS5_Generic_GJ" postsynapticPopulation="AS5" presynapticPopulation="VA7">
            <electricalConnection synapse="elec_syn_1conns" preCell="0" id="0" postCell="0"/>
        </electricalProjection>
        <electricalProjection id="NC_VA7_VB3_Generic_GJ" postsynapticPopulation="VB3" presynapticPopulation="VA7">
            <electricalConnection synapse="elec_syn_1conns" preCell="0" id="0" postCell="0"/>
        </electricalProjection>
        <electricalProjection id="NC_VA8_AS6_Generic_GJ" postsynapticPopulation="AS6" presynapticPopulation="VA8">
            <electricalConnection synapse="elec_syn_1conns" preCell="0" id="0" postCell="0"/>
        </electricalProjection>
        <electricalProjection id="NC_VA8_VA8_Generic_GJ" postsynapticPopulation="VA8" presynapticPopulation="VA8">
            <electricalConnection synapse="elec_syn_1conns" preCell="0" id="0" postCell="0"/>
        </electricalProjection>
        <electricalProjection id="NC_VA8_VB8_Generic_GJ" postsynapticPopulation="VB8" presynapticPopulation="VA8">
            <electricalConnection synapse="elec_syn_3conns" preCell="0" id="0" postCell="0"/>
        </electricalProjection>
        <electricalProjection id="NC_VA8_VB9_Generic_GJ" postsynapticPopulation="VB9" presynapticPopulation="VA8">
            <electricalConnection synapse="elec_syn_3conns" preCell="0" id="0" postCell="0"/>
        </electricalProjection>
        <electricalProjection id="NC_VA8_VD8_Generic_GJ" postsynapticPopulation="VD8" presynapticPopulation="VA8">
            <electricalConnection synapse="elec_syn_1conns" preCell="0" id="0" postCell="0"/>
        </electricalProjection>
        <electricalProjection id="NC_VA9_DVB_Generic_GJ" postsynapticPopulation="DVB" presynapticPopulation="VA9">
            <electricalConnection synapse="elec_syn_1conns" preCell="0" id="0" postCell="0"/>
        </electricalProjection>
        <electricalProjection id="NC_VA9_VB8_Generic_GJ" postsynapticPopulation="VB8" presynapticPopulation="VA9">
            <electricalConnection synapse="elec_syn_1conns" preCell="0" id="0" postCell="0"/>
        </electricalProjection>
        <electricalProjection id="NC_VA9_VB9_Generic_GJ" postsynapticPopulation="VB9" presynapticPopulation="VA9">
            <electricalConnection synapse="elec_syn_4conns" preCell="0" id="0" postCell="0"/>
        </electricalProjection>
        <electricalProjection id="NC_VA9_VD7_Generic_GJ" postsynapticPopulation="VD7" presynapticPopulation="VA9">
            <electricalConnection synapse="elec_syn_1conns" preCell="0" id="0" postCell="0"/>
        </electricalProjection>
        <electricalProjection id="NC_VB1_DB2_Generic_GJ" postsynapticPopulation="DB2" presynapticPopulation="VB1">
            <electricalConnection synapse="elec_syn_2conns" preCell="0" id="0" postCell="0"/>
        </electricalProjection>
        <electricalProjection id="NC_VB1_SMDVR_Generic_GJ" postsynapticPopulation="SMDVR" presynapticPopulation="VB1">
            <electricalConnection synapse="elec_syn_1conns" preCell="0" id="0" postCell="0"/>
        </electricalProjection>
        <electricalProjection id="NC_VB1_VB2_Generic_GJ" postsynapticPopulation="VB2" presynapticPopulation="VB1">
            <electricalConnection synapse="elec_syn_4conns" preCell="0" id="0" postCell="0"/>
        </electricalProjection>
        <electricalProjection id="NC_VB11_VA12_Generic_GJ" postsynapticPopulation="VA12" presynapticPopulation="VB11">
            <electricalConnection synapse="elec_syn_1conns" preCell="0" id="0" postCell="0"/>
        </electricalProjection>
        <electricalProjection id="NC_VB2_DB4_Generic_GJ" postsynapticPopulation="DB4" presynapticPopulation="VB2">
            <electricalConnection synapse="elec_syn_1conns" preCell="0" id="0" postCell="0"/>
        </electricalProjection>
        <electricalProjection id="NC_VB2_VB1_Generic_GJ" postsynapticPopulation="VB1" presynapticPopulation="VB2">
            <electricalConnection synapse="elec_syn_4conns" preCell="0" id="0" postCell="0"/>
        </electricalProjection>
        <electricalProjection id="NC_VB2_VB3_Generic_GJ" postsynapticPopulation="VB3" presynapticPopulation="VB2">
            <electricalConnection synapse="elec_syn_1conns" preCell="0" id="0" postCell="0"/>
        </electricalProjection>
        <electricalProjection id="NC_VB2_VB5_Generic_GJ" postsynapticPopulation="VB5" presynapticPopulation="VB2">
            <electricalConnection synapse="elec_syn_1conns" preCell="0" id="0" postCell="0"/>
        </electricalProjection>
        <electricalProjection id="NC_VB2_VB7_Generic_GJ" postsynapticPopulation="VB7" presynapticPopulation="VB2">
            <electricalConnection synapse="elec_syn_2conns" preCell="0" id="0" postCell="0"/>
        </electricalProjection>
        <electricalProjection id="NC_VB3_DB1_Generic_GJ" postsynapticPopulation="DB1" presynapticPopulation="VB3">
            <electricalConnection synapse="elec_syn_1conns" preCell="0" id="0" postCell="0"/>
        </electricalProjection>
        <electricalProjection id="NC_VB3_VA7_Generic_GJ" postsynapticPopulation="VA7" presynapticPopulation="VB3">
            <electricalConnection synapse="elec_syn_1conns" preCell="0" id="0" postCell="0"/>
        </electricalProjection>
        <electricalProjection id="NC_VB3_VB2_Generic_GJ" postsynapticPopulation="VB2" presynapticPopulation="VB3">
            <electricalConnection synapse="elec_syn_1conns" preCell="0" id="0" postCell="0"/>
        </electricalProjection>
        <electricalProjection id="NC_VB4_DB1_Generic_GJ" postsynapticPopulation="DB1" presynapticPopulation="VB4">
            <electricalConnection synapse="elec_syn_1conns" preCell="0" id="0" postCell="0"/>
        </electricalProjection>
        <electricalProjection id="NC_VB4_DB4_Generic_GJ" postsynapticPopulation="DB4" presynapticPopulation="VB4">
            <electricalConnection synapse="elec_syn_1conns" preCell="0" id="0" postCell="0"/>
        </electricalProjection>
        <electricalProjection id="NC_VB4_VB5_Generic_GJ" postsynapticPopulation="VB5" presynapticPopulation="VB4">
            <electricalConnection synapse="elec_syn_1conns" preCell="0" id="0" postCell="0"/>
        </electricalProjection>
        <electricalProjection id="NC_VB5_VB2_Generic_GJ" postsynapticPopulation="VB2" presynapticPopulation="VB5">
            <electricalConnection synapse="elec_syn_1conns" preCell="0" id="0" postCell="0"/>
        </electricalProjection>
        <electricalProjection id="NC_VB5_VB4_Generic_GJ" postsynapticPopulation="VB4" presynapticPopulation="VB5">
            <electricalConnection synapse="elec_syn_1conns" preCell="0" id="0" postCell="0"/>
        </electricalProjection>
        <electricalProjection id="NC_VB5_VB6_Generic_GJ" postsynapticPopulation="VB6" presynapticPopulation="VB5">
            <electricalConnection synapse="elec_syn_1conns" preCell="0" id="0" postCell="0"/>
        </electricalProjection>
        <electricalProjection id="NC_VB6_DA4_Generic_GJ" postsynapticPopulation="DA4" presynapticPopulation="VB6">
            <electricalConnection synapse="elec_syn_1conns" preCell="0" id="0" postCell="0"/>
        </electricalProjection>
        <electricalProjection id="NC_VB6_VB5_Generic_GJ" postsynapticPopulation="VB5" presynapticPopulation="VB6">
            <electricalConnection synapse="elec_syn_1conns" preCell="0" id="0" postCell="0"/>
        </electricalProjection>
        <electricalProjection id="NC_VB7_VB2_Generic_GJ" postsynapticPopulation="VB2" presynapticPopulation="VB7">
            <electricalConnection synapse="elec_syn_2conns" preCell="0" id="0" postCell="0"/>
        </electricalProjection>
        <electricalProjection id="NC_VB8_VA8_Generic_GJ" postsynapticPopulation="VA8" presynapticPopulation="VB8">
            <electricalConnection synapse="elec_syn_3conns" preCell="0" id="0" postCell="0"/>
        </electricalProjection>
        <electricalProjection id="NC_VB8_VA9_Generic_GJ" postsynapticPopulation="VA9" presynapticPopulation="VB8">
            <electricalConnection synapse="elec_syn_1conns" preCell="0" id="0" postCell="0"/>
        </electricalProjection>
        <electricalProjection id="NC_VB8_VB9_Generic_GJ" postsynapticPopulation="VB9" presynapticPopulation="VB8">
            <electricalConnection synapse="elec_syn_3conns" preCell="0" id="0" postCell="0"/>
        </electricalProjection>
        <electricalProjection id="NC_VB9_DVB_Generic_GJ" postsynapticPopulation="DVB" presynapticPopulation="VB9">
            <electricalConnection synapse="elec_syn_1conns" preCell="0" id="0" postCell="0"/>
        </electricalProjection>
        <electricalProjection id="NC_VB9_VA8_Generic_GJ" postsynapticPopulation="VA8" presynapticPopulation="VB9">
            <electricalConnection synapse="elec_syn_3conns" preCell="0" id="0" postCell="0"/>
        </electricalProjection>
        <electricalProjection id="NC_VB9_VA9_Generic_GJ" postsynapticPopulation="VA9" presynapticPopulation="VB9">
            <electricalConnection synapse="elec_syn_4conns" preCell="0" id="0" postCell="0"/>
        </electricalProjection>
        <electricalProjection id="NC_VB9_VB8_Generic_GJ" postsynapticPopulation="VB8" presynapticPopulation="VB9">
            <electricalConnection synapse="elec_syn_3conns" preCell="0" id="0" postCell="0"/>
        </electricalProjection>
        <electricalProjection id="NC_VC1_VC2_Generic_GJ" postsynapticPopulation="VC2" presynapticPopulation="VC1">
            <electricalConnection synapse="elec_syn_6conns" preCell="0" id="0" postCell="0"/>
        </electricalProjection>
        <electricalProjection id="NC_VC1_VC3_Generic_GJ" postsynapticPopulation="VC3" presynapticPopulation="VC1">
            <electricalConnection synapse="elec_syn_2conns" preCell="0" id="0" postCell="0"/>
        </electricalProjection>
        <electricalProjection id="NC_VC1_VD1_Generic_GJ" postsynapticPopulation="VD1" presynapticPopulation="VC1">
            <electricalConnection synapse="elec_syn_1conns" preCell="0" id="0" postCell="0"/>
        </electricalProjection>
        <explicitInput input="offset_current" target="AS1[0]"/>
        <explicitInput input="offset_current" target="AS10[0]"/>
        <explicitInput input="offset_current" target="AS11[0]"/>
        <explicitInput input="offset_current" target="AS2[0]"/>
        <explicitInput input="offset_current" target="AS3[0]"/>
        <explicitInput input="offset_current" target="AS4[0]"/>
        <explicitInput input="offset_current" target="DD1[0]"/>
        <explicitInput input="offset_current" target="DD2[0]"/>
        <explicitInput input="offset_current" target="SMBDL[0]"/>
        <explicitInput input="offset_current" target="SMBDR[0]"/>
        <explicitInput input="offset_current" target="VA1[0]"/>
        <explicitInput input="offset_current" target="VA10[0]"/>
    </network>
</neuroml>
