<Lems>

    <!--

Parameters and setting used to generate this network:

    Data reader:                    SpreadsheetDataReader
    c302 version:                   0.5.0
    Cells:                          ['DB2', 'VB2', 'DD2', 'VD2', 'DB3', 'VB3', 'DD3', 'VD3', 'DA2', 'VA2', 'DA3', 'VA3', 'PLML', 'PLMR', 'AVAL', 'AVAR']
    Cell stimulated:                ['PLML', 'PLMR']
    Connection:                     []
    Connection numbers overridden:  None
    Connection numbers scaled:      None
    Connection polarities override: None
    Muscles:                        []

    Known BioParameters:
        BioParameter: neuron_iaf_leak_reversal = -50mV (SRC: BlindGuess, certainty 0.1)
        BioParameter: neuron_iaf_reset = -50mV (SRC: BlindGuess, certainty 0.1)
        BioParameter: neuron_iaf_thresh = -30mV (SRC: BlindGuess, certainty 0.1)
        BioParameter: neuron_iaf_C = 3pF (SRC: BlindGuess, certainty 0.1)
        BioParameter: neuron_iaf_conductance = 0.1nS (SRC: BlindGuess, certainty 0.1)
        BioParameter: neuron_iaf_tau1 = 50ms (SRC: BlindGuess, certainty 0.1)
        BioParameter: muscle_iaf_leak_reversal = -50mV (SRC: BlindGuess, certainty 0.1)
        BioParameter: muscle_iaf_reset = -50mV (SRC: BlindGuess, certainty 0.1)
        BioParameter: muscle_iaf_thresh = -30mV (SRC: BlindGuess, certainty 0.1)
        BioParameter: muscle_iaf_C = 3pF (SRC: BlindGuess, certainty 0.1)
        BioParameter: muscle_iaf_conductance = 0.1nS (SRC: BlindGuess, certainty 0.1)
        BioParameter: muscle_iaf_tau1 = 50ms (SRC: BlindGuess, certainty 0.1)
        BioParameter: neuron_to_neuron_chem_exc_syn_gbase = 0.01nS (SRC: BlindGuess, certainty 0.1)
        BioParameter: neuron_to_muscle_chem_exc_syn_gbase = 0.01nS (SRC: BlindGuess, certainty 0.1)
        BioParameter: chem_exc_syn_erev = 0mV (SRC: BlindGuess, certainty 0.1)
        BioParameter: chem_exc_syn_rise = 3ms (SRC: BlindGuess, certainty 0.1)
        BioParameter: chem_exc_syn_decay = 5 ms (SRC: BlindGuess, certainty 0.1)
        BioParameter: neuron_to_neuron_chem_inh_syn_gbase = 0.01nS (SRC: BlindGuess, certainty 0.1)
        BioParameter: neuron_to_muscle_chem_inh_syn_gbase = 0.01nS (SRC: BlindGuess, certainty 0.1)
        BioParameter: chem_inh_syn_erev = -80mV (SRC: BlindGuess, certainty 0.1)
        BioParameter: chem_inh_syn_rise = 3ms (SRC: BlindGuess, certainty 0.1)
        BioParameter: chem_inh_syn_decay = 30 ms (SRC: BlindGuess, certainty 0.1)
        BioParameter: neuron_to_neuron_elec_syn_gbase = 0.1 nS (SRC: BlindGuess, certainty 0.1)
        BioParameter: neuron_to_muscle_elec_syn_gbase = 0.1 nS (SRC: BlindGuess, certainty 0.1)
        BioParameter: unphysiological_offset_current = 2pA (SRC: Testing Osc, certainty 0)
        BioParameter: unphysiological_offset_current_del = 10 ms (SRC: Testing Osc, certainty 0)
        BioParameter: unphysiological_offset_current_dur = 2500 ms (SRC: Testing Osc, certainty 0)

    -->

    <Target component="sim_c302_B_Oscillator" />

    <!-- Include core NeuroML2 ComponentType definitions -->

    <Include file="Cells.xml" />
    <Include file="Networks.xml" />
    <Include file="Simulation.xml" />

    <Include file="cell_B.xml" />

    <Include file="c302_B_Oscillator.net.nml" />

    <!-- End of NeuroML2 content -->

    <Simulation id="sim_c302_B_Oscillator" length="1000ms" step="0.05ms" target="c302_B_Oscillator">

        <Display id="neurons" title="c302_B_Oscillator: Membrane potential of a number of neurons" timeScale="1ms" xmin="-100.0" xmax="1100.0" ymin="-52" ymax="-28">

            <Line id="AVAL" quantity="AVAL/0/generic_neuron_iaf_cell/v" scale="1mV" color="#f87100" timeScale="1ms" />
            <Line id="AVAR" quantity="AVAR/0/generic_neuron_iaf_cell/v" scale="1mV" color="#ac15c4" timeScale="1ms" />
            <Line id="DA2" quantity="DA2/0/generic_neuron_iaf_cell/v" scale="1mV" color="#58a09e" timeScale="1ms" />
            <Line id="DA3" quantity="DA3/0/generic_neuron_iaf_cell/v" scale="1mV" color="#007df7" timeScale="1ms" />
            <Line id="DB2" quantity="DB2/0/generic_neuron_iaf_cell/v" scale="1mV" color="#9a1694" timeScale="1ms" />
            <Line id="DB3" quantity="DB3/0/generic_neuron_iaf_cell/v" scale="1mV" color="#7b5b40" timeScale="1ms" />
            <Line id="DD2" quantity="DD2/0/generic_neuron_iaf_cell/v" scale="1mV" color="#008200" timeScale="1ms" />
            <Line id="DD3" quantity="DD3/0/generic_neuron_iaf_cell/v" scale="1mV" color="#00962a" timeScale="1ms" />
            <Line id="PLML" quantity="PLML/0/generic_neuron_iaf_cell/v" scale="1mV" color="#c6f524" timeScale="1ms" />
            <Line id="PLMR" quantity="PLMR/0/generic_neuron_iaf_cell/v" scale="1mV" color="#cf2d27" timeScale="1ms" />
            <Line id="VA2" quantity="VA2/0/generic_neuron_iaf_cell/v" scale="1mV" color="#006359" timeScale="1ms" />
            <Line id="VA3" quantity="VA3/0/generic_neuron_iaf_cell/v" scale="1mV" color="#c979d2" timeScale="1ms" />
            <Line id="VB2" quantity="VB2/0/generic_neuron_iaf_cell/v" scale="1mV" color="#d14b1f" timeScale="1ms" />
            <Line id="VB3" quantity="VB3/0/generic_neuron_iaf_cell/v" scale="1mV" color="#88d57c" timeScale="1ms" />
            <Line id="VD2" quantity="VD2/0/generic_neuron_iaf_cell/v" scale="1mV" color="#58b4d0" timeScale="1ms" />
            <Line id="VD3" quantity="VD3/0/generic_neuron_iaf_cell/v" scale="1mV" color="#27d8b9" timeScale="1ms" />

        </Display>

        <Display id="activity_neurons" title="c302_B_Oscillator: Activity of a number of neurons" timeScale="1ms" xmin="-100.0" xmax="1100.0" ymin="-0.1" ymax="1.1">

            <Line id="AVAL" quantity="AVAL/0/generic_neuron_iaf_cell/activity" scale="1" color="#eaf195" timeScale="1ms" />
            <Line id="AVAR" quantity="AVAR/0/generic_neuron_iaf_cell/activity" scale="1" color="#3c00ca" timeScale="1ms" />
            <Line id="DA2" quantity="DA2/0/generic_neuron_iaf_cell/activity" scale="1" color="#262f1d" timeScale="1ms" />
            <Line id="DA3" quantity="DA3/0/generic_neuron_iaf_cell/activity" scale="1" color="#108b77" timeScale="1ms" />
            <Line id="DB2" quantity="DB2/0/generic_neuron_iaf_cell/activity" scale="1" color="#458fa5" timeScale="1ms" />
            <Line id="DB3" quantity="DB3/0/generic_neuron_iaf_cell/activity" scale="1" color="#ef7488" timeScale="1ms" />
            <Line id="DD2" quantity="DD2/0/generic_neuron_iaf_cell/activity" scale="1" color="#247960" timeScale="1ms" />
            <Line id="DD3" quantity="DD3/0/generic_neuron_iaf_cell/activity" scale="1" color="#8f25f0" timeScale="1ms" />
            <Line id="PLML" quantity="PLML/0/generic_neuron_iaf_cell/activity" scale="1" color="#4e0047" timeScale="1ms" />
            <Line id="PLMR" quantity="PLMR/0/generic_neuron_iaf_cell/activity" scale="1" color="#f527d6" timeScale="1ms" />
            <Line id="VA2" quantity="VA2/0/generic_neuron_iaf_cell/activity" scale="1" color="#57d17a" timeScale="1ms" />
            <Line id="VA3" quantity="VA3/0/generic_neuron_iaf_cell/activity" scale="1" color="#e270c8" timeScale="1ms" />
            <Line id="VB2" quantity="VB2/0/generic_neuron_iaf_cell/activity" scale="1" color="#2f701e" timeScale="1ms" />
            <Line id="VB3" quantity="VB3/0/generic_neuron_iaf_cell/activity" scale="1" color="#d2a8a4" timeScale="1ms" />
            <Line id="VD2" quantity="VD2/0/generic_neuron_iaf_cell/activity" scale="1" color="#28e945" timeScale="1ms" />
            <Line id="VD3" quantity="VD3/0/generic_neuron_iaf_cell/activity" scale="1" color="#cb7212" timeScale="1ms" />

        </Display>

        <OutputFile id="neurons_v" fileName="c302_B_Oscillator.dat">
            <OutputColumn id="AVAL_v" quantity="AVAL/0/generic_neuron_iaf_cell/v"/>
            <OutputColumn id="AVAR_v" quantity="AVAR/0/generic_neuron_iaf_cell/v"/>
            <OutputColumn id="DA2_v" quantity="DA2/0/generic_neuron_iaf_cell/v"/>
            <OutputColumn id="DA3_v" quantity="DA3/0/generic_neuron_iaf_cell/v"/>
            <OutputColumn id="DB2_v" quantity="DB2/0/generic_neuron_iaf_cell/v"/>
            <OutputColumn id="DB3_v" quantity="DB3/0/generic_neuron_iaf_cell/v"/>
            <OutputColumn id="DD2_v" quantity="DD2/0/generic_neuron_iaf_cell/v"/>
            <OutputColumn id="DD3_v" quantity="DD3/0/generic_neuron_iaf_cell/v"/>
            <OutputColumn id="PLML_v" quantity="PLML/0/generic_neuron_iaf_cell/v"/>
            <OutputColumn id="PLMR_v" quantity="PLMR/0/generic_neuron_iaf_cell/v"/>
            <OutputColumn id="VA2_v" quantity="VA2/0/generic_neuron_iaf_cell/v"/>
            <OutputColumn id="VA3_v" quantity="VA3/0/generic_neuron_iaf_cell/v"/>
            <OutputColumn id="VB2_v" quantity="VB2/0/generic_neuron_iaf_cell/v"/>
            <OutputColumn id="VB3_v" quantity="VB3/0/generic_neuron_iaf_cell/v"/>
            <OutputColumn id="VD2_v" quantity="VD2/0/generic_neuron_iaf_cell/v"/>
            <OutputColumn id="VD3_v" quantity="VD3/0/generic_neuron_iaf_cell/v"/>
        </OutputFile>

        <OutputFile id="neurons_activity" fileName="c302_B_Oscillator.activity.dat">
            <OutputColumn id="AVAL_v" quantity="AVAL/0/generic_neuron_iaf_cell/activity"/>
            <OutputColumn id="AVAR_v" quantity="AVAR/0/generic_neuron_iaf_cell/activity"/>
            <OutputColumn id="DA2_v" quantity="DA2/0/generic_neuron_iaf_cell/activity"/>
            <OutputColumn id="DA3_v" quantity="DA3/0/generic_neuron_iaf_cell/activity"/>
            <OutputColumn id="DB2_v" quantity="DB2/0/generic_neuron_iaf_cell/activity"/>
            <OutputColumn id="DB3_v" quantity="DB3/0/generic_neuron_iaf_cell/activity"/>
            <OutputColumn id="DD2_v" quantity="DD2/0/generic_neuron_iaf_cell/activity"/>
            <OutputColumn id="DD3_v" quantity="DD3/0/generic_neuron_iaf_cell/activity"/>
            <OutputColumn id="PLML_v" quantity="PLML/0/generic_neuron_iaf_cell/activity"/>
            <OutputColumn id="PLMR_v" quantity="PLMR/0/generic_neuron_iaf_cell/activity"/>
            <OutputColumn id="VA2_v" quantity="VA2/0/generic_neuron_iaf_cell/activity"/>
            <OutputColumn id="VA3_v" quantity="VA3/0/generic_neuron_iaf_cell/activity"/>
            <OutputColumn id="VB2_v" quantity="VB2/0/generic_neuron_iaf_cell/activity"/>
            <OutputColumn id="VB3_v" quantity="VB3/0/generic_neuron_iaf_cell/activity"/>
            <OutputColumn id="VD2_v" quantity="VD2/0/generic_neuron_iaf_cell/activity"/>
            <OutputColumn id="VD3_v" quantity="VD3/0/generic_neuron_iaf_cell/activity"/>
        </OutputFile>
    </Simulation>

</Lems>
