<Lems>

    <!--

Parameters and setting used to generate this network:

    Data reader:                    SpreadsheetDataReader
    c302 version:                   0.5.0
    Cells:                          ['DB2', 'VB2', 'DD2', 'VD2', 'DB3', 'VB3', 'DD3', 'VD3', 'DA2', 'VA2', 'DA3', 'VA3', 'PLML', 'PLMR', 'AVAL', 'AVAR']
    Cell stimulated:                ['PLML', 'PLMR']
    Connection:                     []
    Connection numbers overridden:  None
    Connection numbers scaled:      None
    Connection polarities override: None
    Muscles:                        []

    Known BioParameters:
        BioParameter: ca_boyle_erev = 10 mV (SRC: BlindGuess, certainty 0.1)
        BioParameter: ca_conc_decay_time = 13.811870945509265 ms (SRC: BlindGuess, certainty 0.1)
        BioParameter: ca_conc_decay_time_muscle = 60.811870945509265 ms (SRC: BlindGuess, certainty 0.1)
        BioParameter: ca_conc_rho = 0.000238919 mol_per_m_per_A_per_s (SRC: BlindGuess, certainty 0.1)
        BioParameter: ca_conc_rho_muscle = 0.002238919 mol_per_m_per_A_per_s (SRC: BlindGuess, certainty 0.1)
        BioParameter: cell_diameter = 5 (SRC: BlindGuess, certainty 0.1)
        BioParameter: initial_memb_pot = -60 mV (SRC: BlindGuess, certainty 0.1)
        BioParameter: k_fast_erev = -70 mV (SRC: BlindGuess, certainty 0.1)
        BioParameter: k_slow_erev = -60 mV (SRC: BlindGuess, certainty 0.1)
        BioParameter: leak_erev = -60 mV (SRC: BlindGuess, certainty 0.1)
        BioParameter: muscle_ca_boyle_cond_density = 0.812775772264702 mS_per_cm2 (SRC: BlindGuess, certainty 0.1)
        BioParameter: muscle_ca_boyle_erev = 0 mV (SRC: BlindGuess, certainty 0.1)
        BioParameter: muscle_initial_memb_pot = -28 mV (SRC: BlindGuess, certainty 0.1)
        BioParameter: muscle_k_fast_cond_density = 0.042711643917483308 mS_per_cm2 (SRC: BlindGuess, certainty 0.1)
        BioParameter: muscle_k_fast_erev = -30 mV (SRC: BlindGuess, certainty 0.1)
        BioParameter: muscle_k_slow_cond_density = 0.45833751019872582 mS_per_cm2 (SRC: BlindGuess, certainty 0.1)
        BioParameter: muscle_k_slow_erev = -30 mV (SRC: BlindGuess, certainty 0.1)
        BioParameter: muscle_leak_cond_density = 0.002 mS_per_cm2 (SRC: BlindGuess, certainty 0.1)
        BioParameter: muscle_leak_erev = -20 mV (SRC: BlindGuess, certainty 0.1)
        BioParameter: muscle_length = 20 (SRC: BlindGuess, certainty 0.1)
        BioParameter: muscle_specific_capacitance = 1 uF_per_cm2 (SRC: BlindGuess, certainty 0.1)
        BioParameter: muscle_spike_thresh = -10 mV (SRC: BlindGuess, certainty 0.1)
        BioParameter: muscle_to_muscle_elec_syn_gbase = 0 nS (SRC: BlindGuess, certainty 0.1)
        BioParameter: neuron_ca_boyle_cond_density = 1.812775772264702 mS_per_cm2 (SRC: BlindGuess, certainty 0.1)
        BioParameter: neuron_k_fast_cond_density = 0.042711643917483308 mS_per_cm2 (SRC: BlindGuess, certainty 0.1)
        BioParameter: neuron_k_slow_cond_density = 0.45833751019872582 mS_per_cm2 (SRC: BlindGuess, certainty 0.1)
        BioParameter: neuron_leak_cond_density = 0.002 mS_per_cm2 (SRC: BlindGuess, certainty 0.1)
        BioParameter: neuron_spike_thresh = -55 mV (SRC: BlindGuess, certainty 0.1)
        BioParameter: neuron_to_motor_delayed_elec_syn_gbase = 0.01252 nS (SRC: BlindGuess, certainty 0.1)
        BioParameter: neuron_to_motor_delayed_elec_syn_mu = -30 (SRC: BlindGuess, certainty 0.1)
        BioParameter: neuron_to_motor_delayed_elec_syn_sigma = 0.4 (SRC: BlindGuess, certainty 0.1)
        BioParameter: neuron_to_motor_delayed_elec_syn_weight = 1 (SRC: BlindGuess, certainty 0.1)
        BioParameter: neuron_to_muscle_elec_syn_gbase = 0.00152 nS (SRC: BlindGuess, certainty 0.1)
        BioParameter: neuron_to_muscle_exc_syn_conductance = 0.10 nS (SRC: BlindGuess, certainty 0.1)
        BioParameter: neuron_to_muscle_exc_syn_delta = 19 mV (SRC: BlindGuess, certainty 0.1)
        BioParameter: neuron_to_muscle_exc_syn_erev = 37 mV (SRC: BlindGuess, certainty 0.1)
        BioParameter: neuron_to_muscle_exc_syn_k = 1.205per_ms (SRC: BlindGuess, certainty 0.1)
        BioParameter: neuron_to_muscle_exc_syn_mu = 5 mV (SRC: BlindGuess, certainty 0.1)
        BioParameter: neuron_to_muscle_exc_syn_sigma = 0.5 per_mV (SRC: BlindGuess, certainty 0.1)
        BioParameter: neuron_to_muscle_exc_syn_vth = 27 mV (SRC: BlindGuess, certainty 0.1)
        BioParameter: neuron_to_muscle_exc_syn_weight = 1 (SRC: BlindGuess, certainty 0.1)
        BioParameter: neuron_to_muscle_inh_syn_conductance = 1.29 nS (SRC: BlindGuess, certainty 0.1)
        BioParameter: neuron_to_muscle_inh_syn_delta = 5 mV (SRC: BlindGuess, certainty 0.1)
        BioParameter: neuron_to_muscle_inh_syn_erev = -35 mV (SRC: BlindGuess, certainty 0.1)
        BioParameter: neuron_to_muscle_inh_syn_k = 0.025per_ms (SRC: BlindGuess, certainty 0.1)
        BioParameter: neuron_to_muscle_inh_syn_vth = 0 mV (SRC: BlindGuess, certainty 0.1)
        BioParameter: neuron_to_neuron_elec_syn_gbase = 0.01252 nS (SRC: BlindGuess, certainty 0.1)
        BioParameter: neuron_to_neuron_elec_syn_weight = 1 (SRC: BlindGuess, certainty 0.1)
        BioParameter: neuron_to_neuron_exc_syn_conductance = 0.49 nS (SRC: BlindGuess, certainty 0.1)
        BioParameter: neuron_to_neuron_exc_syn_delta = 5 mV (SRC: BlindGuess, certainty 0.1)
        BioParameter: neuron_to_neuron_exc_syn_erev = -10 mV (SRC: BlindGuess, certainty 0.1)
        BioParameter: neuron_to_neuron_exc_syn_k = 0.5per_ms (SRC: BlindGuess, certainty 0.1)
        BioParameter: neuron_to_neuron_exc_syn_vth = 00 mV (SRC: BlindGuess, certainty 0.1)
        BioParameter: neuron_to_neuron_inh_syn_conductance = 0.29 nS (SRC: BlindGuess, certainty 0.1)
        BioParameter: neuron_to_neuron_inh_syn_delta = 5 mV (SRC: BlindGuess, certainty 0.1)
        BioParameter: neuron_to_neuron_inh_syn_erev = -70 mV (SRC: BlindGuess, certainty 0.1)
        BioParameter: neuron_to_neuron_inh_syn_k = 0.015per_ms (SRC: BlindGuess, certainty 0.1)
        BioParameter: neuron_to_neuron_inh_syn_vth = 0 mV (SRC: BlindGuess, certainty 0.1)
        BioParameter: specific_capacitance = 5 uF_per_cm2 (SRC: BlindGuess, certainty 0.1)
        BioParameter: unphysiological_offset_current = 2pA (SRC: Testing Osc, certainty 0)
        BioParameter: unphysiological_offset_current_del = 10 ms (SRC: Testing Osc, certainty 0)
        BioParameter: unphysiological_offset_current_dur = 2500 ms (SRC: Testing Osc, certainty 0)

    -->

    <Target component="sim_c302_C2_Oscillator" />

    <!-- Include core NeuroML2 ComponentType definitions -->

    <Include file="Cells.xml" />
    <Include file="Networks.xml" />
    <Include file="Simulation.xml" />

    <Include file="cell_C.xml" />

    <Include file="custom_muscle_components.xml" />

    <Include file="custom_synapses.xml" />

    <Include file="c302_C2_Oscillator.net.nml" />

    <!-- End of NeuroML2 content -->

    <Simulation id="sim_c302_C2_Oscillator" length="1000ms" step="0.05ms" target="c302_C2_Oscillator">

        <Display id="neurons" title="c302_C2_Oscillator: Membrane potential of a number of neurons" timeScale="1ms" xmin="-100.0" xmax="1100.0" ymin="-60" ymax="25">

            <Line id="AVAL" quantity="AVAL/0/GenericNeuronCell/v" scale="1mV" color="#8b779a" timeScale="1ms" />
            <Line id="AVAR" quantity="AVAR/0/GenericNeuronCell/v" scale="1mV" color="#ef7488" timeScale="1ms" />
            <Line id="DA2" quantity="DA2/0/GenericNeuronCell/v" scale="1mV" color="#2a8f25" timeScale="1ms" />
            <Line id="DA3" quantity="DA3/0/GenericNeuronCell/v" scale="1mV" color="#2d27f5" timeScale="1ms" />
            <Line id="DB2" quantity="DB2/0/GenericNeuronCell/v" scale="1mV" color="#c979d2" timeScale="1ms" />
            <Line id="DB3" quantity="DB3/0/GenericNeuronCell/v" scale="1mV" color="#1e88d5" timeScale="1ms" />
            <Line id="DD2" quantity="DD2/0/GenericNeuronCell/v" scale="1mV" color="#e94527" timeScale="1ms" />
            <Line id="DD3" quantity="DD3/0/GenericNeuronCell/v" scale="1mV" color="#008216" timeScale="1ms" />
            <Line id="PLML" quantity="PLML/0/GenericNeuronCell/v" scale="1mV" color="#3365b5" timeScale="1ms" />
            <Line id="PLMR" quantity="PLMR/0/GenericNeuronCell/v" scale="1mV" color="#964dd0" timeScale="1ms" />
            <Line id="VA2" quantity="VA2/0/GenericNeuronCell/v" scale="1mV" color="#d81153" timeScale="1ms" />
            <Line id="VA3" quantity="VA3/0/GenericNeuronCell/v" scale="1mV" color="#35d361" timeScale="1ms" />
            <Line id="VB2" quantity="VB2/0/GenericNeuronCell/v" scale="1mV" color="#174269" timeScale="1ms" />
            <Line id="VB3" quantity="VB3/0/GenericNeuronCell/v" scale="1mV" color="#e171c7" timeScale="1ms" />
            <Line id="VD2" quantity="VD2/0/GenericNeuronCell/v" scale="1mV" color="#7a485e" timeScale="1ms" />
            <Line id="VD3" quantity="VD3/0/GenericNeuronCell/v" scale="1mV" color="#baa91a" timeScale="1ms" />

        </Display>

        <Display id="activity_neurons" title="c302_C2_Oscillator: Activity of a number of neurons" timeScale="1ms" xmin="-100.0" xmax="1100.0" ymin="-0.1" ymax="1.1">

            <Line id="AVAL" quantity="AVAL/0/GenericNeuronCell/caConc" scale="1" color="#169445" timeScale="1ms" />
            <Line id="AVAR" quantity="AVAR/0/GenericNeuronCell/caConc" scale="1" color="#008200" timeScale="1ms" />
            <Line id="DA2" quantity="DA2/0/GenericNeuronCell/caConc" scale="1" color="#f0c6f5" timeScale="1ms" />
            <Line id="DA3" quantity="DA3/0/GenericNeuronCell/caConc" scale="1" color="#27d600" timeScale="1ms" />
            <Line id="DB2" quantity="DB2/0/GenericNeuronCell/caConc" scale="1" color="#e270c8" timeScale="1ms" />
            <Line id="DB3" quantity="DB3/0/GenericNeuronCell/caConc" scale="1" color="#7cd2a8" timeScale="1ms" />
            <Line id="DD2" quantity="DD2/0/GenericNeuronCell/caConc" scale="1" color="#d8b9cb" timeScale="1ms" />
            <Line id="DD3" quantity="DD3/0/GenericNeuronCell/caConc" scale="1" color="#efb351" timeScale="1ms" />
            <Line id="PLML" quantity="PLML/0/GenericNeuronCell/caConc" scale="1" color="#e480d2" timeScale="1ms" />
            <Line id="PLMR" quantity="PLMR/0/GenericNeuronCell/caConc" scale="1" color="#8980c6" timeScale="1ms" />
            <Line id="VA2" quantity="VA2/0/GenericNeuronCell/caConc" scale="1" color="#00ada4" timeScale="1ms" />
            <Line id="VA3" quantity="VA3/0/GenericNeuronCell/caConc" scale="1" color="#e0f68a" timeScale="1ms" />
            <Line id="VB2" quantity="VB2/0/GenericNeuronCell/caConc" scale="1" color="#dc471d" timeScale="1ms" />
            <Line id="VB3" quantity="VB3/0/GenericNeuronCell/caConc" scale="1" color="#2a4f12" timeScale="1ms" />
            <Line id="VD2" quantity="VD2/0/GenericNeuronCell/caConc" scale="1" color="#9a3485" timeScale="1ms" />
            <Line id="VD3" quantity="VD3/0/GenericNeuronCell/caConc" scale="1" color="#5ecc10" timeScale="1ms" />

        </Display>

        <OutputFile id="neurons_v" fileName="c302_C2_Oscillator.dat">
            <OutputColumn id="AVAL_v" quantity="AVAL/0/GenericNeuronCell/v"/>
            <OutputColumn id="AVAR_v" quantity="AVAR/0/GenericNeuronCell/v"/>
            <OutputColumn id="DA2_v" quantity="DA2/0/GenericNeuronCell/v"/>
            <OutputColumn id="DA3_v" quantity="DA3/0/GenericNeuronCell/v"/>
            <OutputColumn id="DB2_v" quantity="DB2/0/GenericNeuronCell/v"/>
            <OutputColumn id="DB3_v" quantity="DB3/0/GenericNeuronCell/v"/>
            <OutputColumn id="DD2_v" quantity="DD2/0/GenericNeuronCell/v"/>
            <OutputColumn id="DD3_v" quantity="DD3/0/GenericNeuronCell/v"/>
            <OutputColumn id="PLML_v" quantity="PLML/0/GenericNeuronCell/v"/>
            <OutputColumn id="PLMR_v" quantity="PLMR/0/GenericNeuronCell/v"/>
            <OutputColumn id="VA2_v" quantity="VA2/0/GenericNeuronCell/v"/>
            <OutputColumn id="VA3_v" quantity="VA3/0/GenericNeuronCell/v"/>
            <OutputColumn id="VB2_v" quantity="VB2/0/GenericNeuronCell/v"/>
            <OutputColumn id="VB3_v" quantity="VB3/0/GenericNeuronCell/v"/>
            <OutputColumn id="VD2_v" quantity="VD2/0/GenericNeuronCell/v"/>
            <OutputColumn id="VD3_v" quantity="VD3/0/GenericNeuronCell/v"/>
        </OutputFile>

        <OutputFile id="neurons_activity" fileName="c302_C2_Oscillator.activity.dat">
            <OutputColumn id="AVAL_v" quantity="AVAL/0/GenericNeuronCell/caConc"/>
            <OutputColumn id="AVAR_v" quantity="AVAR/0/GenericNeuronCell/caConc"/>
            <OutputColumn id="DA2_v" quantity="DA2/0/GenericNeuronCell/caConc"/>
            <OutputColumn id="DA3_v" quantity="DA3/0/GenericNeuronCell/caConc"/>
            <OutputColumn id="DB2_v" quantity="DB2/0/GenericNeuronCell/caConc"/>
            <OutputColumn id="DB3_v" quantity="DB3/0/GenericNeuronCell/caConc"/>
            <OutputColumn id="DD2_v" quantity="DD2/0/GenericNeuronCell/caConc"/>
            <OutputColumn id="DD3_v" quantity="DD3/0/GenericNeuronCell/caConc"/>
            <OutputColumn id="PLML_v" quantity="PLML/0/GenericNeuronCell/caConc"/>
            <OutputColumn id="PLMR_v" quantity="PLMR/0/GenericNeuronCell/caConc"/>
            <OutputColumn id="VA2_v" quantity="VA2/0/GenericNeuronCell/caConc"/>
            <OutputColumn id="VA3_v" quantity="VA3/0/GenericNeuronCell/caConc"/>
            <OutputColumn id="VB2_v" quantity="VB2/0/GenericNeuronCell/caConc"/>
            <OutputColumn id="VB3_v" quantity="VB3/0/GenericNeuronCell/caConc"/>
            <OutputColumn id="VD2_v" quantity="VD2/0/GenericNeuronCell/caConc"/>
            <OutputColumn id="VD3_v" quantity="VD3/0/GenericNeuronCell/caConc"/>
        </OutputFile>
    </Simulation>

</Lems>
