<Lems>

    <!--

Parameters and setting used to generate this network:

    Cells:                         ['URYDL', 'SMDDR', 'VD12', 'VB11']
    Cell stimulated:               ['URYDL', 'VD12']
    Connection numbers overridden: None
    Connection numbers scaled:     None
    Include muscles:               False

    Known BioParameters:
        BioParameter: cell_length = 230.3459 (SRC: BlindGuess, certainty 0.1)
        BioParameter: cell_diameter = 10 (SRC: BlindGuess, certainty 0.1)
        BioParameter: initial_memb_pot = -45 mV (SRC: BlindGuess, certainty 0.1)
        BioParameter: specific_capacitance = 1 uF_per_cm2 (SRC: BlindGuess, certainty 0.1)
        BioParameter: spike_thresh = -20 mV (SRC: BlindGuess, certainty 0.1)
        BioParameter: leak_cond_density = 0.05 mS_per_cm2 (SRC: BlindGuess, certainty 0.1)
        BioParameter: leak_erev = -50 mV (SRC: BlindGuess, certainty 0.1)
        BioParameter: k_slow_cond_density = 0.5 mS_per_cm2 (SRC: BlindGuess, certainty 0.1)
        BioParameter: k_slow_erev = -60 mV (SRC: BlindGuess, certainty 0.1)
        BioParameter: k_fast_cond_density = 0.05 mS_per_cm2 (SRC: BlindGuess, certainty 0.1)
        BioParameter: k_fast_erev = -60 mV (SRC: BlindGuess, certainty 0.1)
        BioParameter: ca_boyle_cond_density = 0.5 mS_per_cm2 (SRC: BlindGuess, certainty 0.1)
        BioParameter: ca_boyle_erev = 40 mV (SRC: BlindGuess, certainty 0.1)
        BioParameter: chem_exc_syn_gbase = 8 nS (SRC: BlindGuess, certainty 0.1)
        BioParameter: chem_exc_syn_erev = 0 mV (SRC: BlindGuess, certainty 0.1)
        BioParameter: chem_exc_syn_rise = 1 ms (SRC: Bli ndGuess, certainty 0.1)
        BioParameter: chem_exc_syn_decay = 5 ms (SRC: BlindGuess, certainty 0.1)
        BioParameter: chem_inh_syn_gbase = 1 nS (SRC: BlindGuess, certainty 0.1)
        BioParameter: chem_inh_syn_erev = -55 mV (SRC: BlindGuess, certainty 0.1)
        BioParameter: chem_inh_syn_rise = 2 ms (SRC: BlindGuess, certainty 0.1)
        BioParameter: chem_inh_syn_decay = 40 ms (SRC: BlindGuess, certainty 0.1)
        BioParameter: elec_syn_gbase = 0.3 nS (SRC: BlindGuess, certainty 0.1)
        BioParameter: unphysiological_offset_current = 0.35 nA (SRC: KnownError, certainty 0)
        BioParameter: unphysiological_offset_current_del = 0 ms (SRC: KnownError, certainty 0)
        BioParameter: unphysiological_offset_current_dur = 2000 ms (SRC: KnownError, certainty 0)

    -->

    <Target component="sim_c302_C_Syns" />

    <!-- Include core NeuroML2 ComponentType definitions -->

    <Include file="Cells.xml" />
    <Include file="Networks.xml" />
    <Include file="Simulation.xml" />

    <Include file="cell_C.xml" />

    <Include file="c302_C_Syns.nml" />

    <!-- End of NeuroML2 content -->

    <Simulation id="sim_c302_C_Syns" length="500ms" step="0.1ms" target="c302_C_Syns">

        <Display id="neurons" title="c302_C_Syns: Membrane potential of a number of neurons" timeScale="1ms" xmin="-50.0" xmax="550.0" ymin="-60" ymax="25">

            <Line id="SMDDR" quantity="SMDDR/0/GenericCell/v" scale="1mV" color="#f87100" timeScale="1ms" />
            <Line id="URYDL" quantity="URYDL/0/GenericCell/v" scale="1mV" color="#ac15c4" timeScale="1ms" />
            <Line id="VB11" quantity="VB11/0/GenericCell/v" scale="1mV" color="#58a09e" timeScale="1ms" />
            <Line id="VD12" quantity="VD12/0/GenericCell/v" scale="1mV" color="#007df7" timeScale="1ms" />

        </Display>

        <Display id="activity_neurons" title="c302_C_Syns: Activity of a number of neurons" timeScale="1ms" xmin="-50.0" xmax="550.0" ymin="-0.1" ymax="1.1">

            <Line id="SMDDR" quantity="SMDDR/0/GenericCell/caConc" scale="1" color="#eaf195" timeScale="1ms" />
            <Line id="URYDL" quantity="URYDL/0/GenericCell/caConc" scale="1" color="#3c00ca" timeScale="1ms" />
            <Line id="VB11" quantity="VB11/0/GenericCell/caConc" scale="1" color="#262f1d" timeScale="1ms" />
            <Line id="VD12" quantity="VD12/0/GenericCell/caConc" scale="1" color="#108b77" timeScale="1ms" />

        </Display>

        <OutputFile id="neurons_v" fileName="c302_C_Syns.dat">
            <OutputColumn id="SMDDR_v" quantity="SMDDR/0/GenericCell/v"/>
            <OutputColumn id="URYDL_v" quantity="URYDL/0/GenericCell/v"/>
            <OutputColumn id="VB11_v" quantity="VB11/0/GenericCell/v"/>
            <OutputColumn id="VD12_v" quantity="VD12/0/GenericCell/v"/>
        </OutputFile>

        <OutputFile id="neurons_activity" fileName="c302_C_Syns.activity.dat">
            <OutputColumn id="SMDDR_v" quantity="SMDDR/0/GenericCell/caConc"/>
            <OutputColumn id="URYDL_v" quantity="URYDL/0/GenericCell/caConc"/>
            <OutputColumn id="VB11_v" quantity="VB11/0/GenericCell/caConc"/>
            <OutputColumn id="VD12_v" quantity="VD12/0/GenericCell/caConc"/>
        </OutputFile>
    </Simulation>

</Lems>
