<Lems>

    <!--

Parameters and setting used to generate this network:

    Data reader:                    SpreadsheetDataReader
    Cells:                          ['RMGR', 'ASHR', 'ASKR', 'AWBR', 'IL2R', 'RMHR', 'URXR']
    Cell stimulated:                []
    Connection:                     []
    Connection numbers overridden:  None
    Connection numbers scaled:      None
    Connection polarities override: None
    Muscles:                        []

    Known BioParameters:
        BioParameter: neuron_iaf_leak_reversal = -50mV (SRC: BlindGuess, certainty 0.1)
        BioParameter: neuron_iaf_reset = -50mV (SRC: BlindGuess, certainty 0.1)
        BioParameter: neuron_iaf_thresh = -30mV (SRC: BlindGuess, certainty 0.1)
        BioParameter: neuron_iaf_C = 3pF (SRC: BlindGuess, certainty 0.1)
        BioParameter: neuron_iaf_conductance = 0.1nS (SRC: BlindGuess, certainty 0.1)
        BioParameter: muscle_iaf_leak_reversal = -50mV (SRC: BlindGuess, certainty 0.1)
        BioParameter: muscle_iaf_reset = -50mV (SRC: BlindGuess, certainty 0.1)
        BioParameter: muscle_iaf_thresh = -30mV (SRC: BlindGuess, certainty 0.1)
        BioParameter: muscle_iaf_C = 3pF (SRC: BlindGuess, certainty 0.1)
        BioParameter: muscle_iaf_conductance = 0.1nS (SRC: BlindGuess, certainty 0.1)
        BioParameter: neuron_to_neuron_chem_exc_syn_gbase = .1 nS (SRC: BlindGuess, certainty 0.1)
        BioParameter: neuron_to_muscle_chem_exc_syn_gbase = .1 nS (SRC: BlindGuess, certainty 0.1)
        BioParameter: chem_exc_syn_erev = 0 mV (SRC: BlindGuess, certainty 0.1)
        BioParameter: chem_exc_syn_rise = 1 ms (SRC: Bli ndGuess, certainty 0.1)
        BioParameter: chem_exc_syn_decay = 5 ms (SRC: BlindGuess, certainty 0.1)
        BioParameter: neuron_to_neuron_chem_inh_syn_gbase = .1 nS (SRC: BlindGuess, certainty 0.1)
        BioParameter: neuron_to_muscle_chem_inh_syn_gbase = .1 nS (SRC: BlindGuess, certainty 0.1)
        BioParameter: chem_inh_syn_erev = -60 mV (SRC: BlindGuess, certainty 0.1)
        BioParameter: chem_inh_syn_rise = 2 ms (SRC: BlindGuess, certainty 0.1)
        BioParameter: chem_inh_syn_decay = 40 ms (SRC: BlindGuess, certainty 0.1)
        BioParameter: neuron_to_neuron_elec_syn_gbase = 0.00052 nS (SRC: BlindGuess, certainty 0.1)
        BioParameter: neuron_to_muscle_elec_syn_gbase = 0.00052 nS (SRC: BlindGuess, certainty 0.1)
        BioParameter: elec_syn_erev = 0mV (SRC: BlindGuess, certainty 0.1)
        BioParameter: elec_syn_rise = 3ms (SRC: BlindGuess, certainty 0.1)
        BioParameter: elec_syn_decay = 10ms (SRC: BlindGuess, certainty 0.1)
        BioParameter: unphysiological_offset_current = 9 pA (SRC: KnownError, certainty 0)
        BioParameter: unphysiological_offset_current_del = 0 ms (SRC: KnownError, certainty 0)
        BioParameter: unphysiological_offset_current_dur = 2000 ms (SRC: KnownError, certainty 0)
        BioParameter: neuron_iaf_tau1 = 50ms (SRC: BlindGuess, certainty 0.1)
        BioParameter: muscle_iaf_tau1 = 50ms (SRC: BlindGuess, certainty 0.1)
        BioParameter: cell_diameter = 5 (SRC: BlindGuess, certainty 0.1)
        BioParameter: muscle_length = 20 (SRC: BlindGuess, certainty 0.1)
        BioParameter: muscle_specific_capacitance = 1 uF_per_cm2 (SRC: BlindGuess, certainty 0.1)
        BioParameter: neuron_specific_capacitance = 5 uF_per_cm2 (SRC: BlindGuess, certainty 0.1)
        BioParameter: initial_memb_pot = -45 mV (SRC: BlindGuess, certainty 0.1)
        BioParameter: muscle_spike_thresh = -20 mV (SRC: BlindGuess, certainty 0.1)
        BioParameter: neuron_spike_thresh = -20 mV (SRC: BlindGuess, certainty 0.1)
        BioParameter: muscle_leak_cond_density = 0.005 mS_per_cm2 (SRC: BlindGuess, certainty 0.1)
        BioParameter: neuron_leak_cond_density = 0.005 mS_per_cm2 (SRC: BlindGuess, certainty 0.1)
        BioParameter: muscle_k_slow_cond_density = 1.8333751019872582 mS_per_cm2 (SRC: BlindGuess, certainty 0.1)
        BioParameter: neuron_k_slow_cond_density = 1.8333751019872582 mS_per_cm2 (SRC: BlindGuess, certainty 0.1)
        BioParameter: muscle_ca_simple_cond_density = 0.1953 mS_per_cm2 (SRC: BlindGuess, certainty 0.1)
        BioParameter: neuron_ca_simple_cond_density = .2 mS_per_cm2 (SRC: BlindGuess, certainty 0.1)
        BioParameter: leak_erev = -50 mV (SRC: BlindGuess, certainty 0.1)
        BioParameter: k_slow_erev = -60 mV (SRC: BlindGuess, certainty 0.1)
        BioParameter: ca_simple_erev = 60 mV (SRC: BlindGuess, certainty 0.1)
        BioParameter: ca_conc_decay_time = 11.5943 ms (SRC: BlindGuess, certainty 0.1)
        BioParameter: ca_conc_rho = 0.000238919 mol_per_m_per_A_per_s (SRC: BlindGuess, certainty 0.1)
        BioParameter: global_connectivity_power_scaling = 0 (SRC: BlindGuess, certainty 0.1)
        BioParameter: neuron_to_neuron_exc_syn_conductance = 0.09 nS (SRC: BlindGuess, certainty 0.1)
        BioParameter: neuron_to_muscle_exc_syn_conductance = 0.09 nS (SRC: BlindGuess, certainty 0.1)
        BioParameter: exc_syn_ar = .5 per_s (SRC: BlindGuess, certainty 0.1)
        BioParameter: exc_syn_ad = 50 per_s (SRC: BlindGuess, certainty 0.1)
        BioParameter: exc_syn_beta = 0.125 per_mV (SRC: BlindGuess, certainty 0.1)
        BioParameter: exc_syn_vth = 0 mV (SRC: BlindGuess, certainty 0.1)
        BioParameter: exc_syn_erev = 0 mV (SRC: BlindGuess, certainty 0.1)
        BioParameter: neuron_to_neuron_inh_syn_conductance = 0.09 nS (SRC: BlindGuess, certainty 0.1)
        BioParameter: neuron_to_muscle_inh_syn_conductance = 0.09 nS (SRC: BlindGuess, certainty 0.1)
        BioParameter: inh_syn_ar = .5 per_s (SRC: BlindGuess, certainty 0.1)
        BioParameter: inh_syn_ad = 50 per_s (SRC: BlindGuess, certainty 0.1)
        BioParameter: inh_syn_beta = 0.125 per_mV (SRC: BlindGuess, certainty 0.1)
        BioParameter: inh_syn_vth = 0 mV (SRC: BlindGuess, certainty 0.1)
        BioParameter: inh_syn_erev = -70 mV (SRC: BlindGuess, certainty 0.1)
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    -->

    <Target component="sim_c302_D1_Social" />

    <!-- Include core NeuroML2 ComponentType definitions -->

    <Include file="Cells.xml" />
    <Include file="Networks.xml" />
    <Include file="Simulation.xml" />

    <Include file="cell_C.xml" />

    <Include file="cells/ASHR_D.cell.nml" />

    <Include file="cells/ASKR_D.cell.nml" />

    <Include file="cells/AWBR_D.cell.nml" />

    <Include file="cells/IL2R_D.cell.nml" />

    <Include file="cells/RMGR_D.cell.nml" />

    <Include file="cells/RMHR_D.cell.nml" />

    <Include file="cells/URXR_D.cell.nml" />

    <Include file="c302_D1_Social.nml" />

    <!-- End of NeuroML2 content -->

    <Simulation id="sim_c302_D1_Social" length="2500ms" step="0.05ms" target="c302_D1_Social">

        <Display id="neurons" title="c302_D1_Social: Membrane potential of a number of neurons" timeScale="1ms" xmin="-250.0" xmax="2750.0" ymin="-60" ymax="25">

            <Line id="ASHR" quantity="ASHR/0/ASHR/v" scale="1mV" color="#f87100" timeScale="1ms" />
            <Line id="ASKR" quantity="ASKR/0/ASKR/v" scale="1mV" color="#ac15c4" timeScale="1ms" />
            <Line id="AWBR" quantity="AWBR/0/AWBR/v" scale="1mV" color="#58a09e" timeScale="1ms" />
            <Line id="IL2R" quantity="IL2R/0/IL2R/v" scale="1mV" color="#007df7" timeScale="1ms" />
            <Line id="RMGR" quantity="RMGR/0/RMGR/v" scale="1mV" color="#9a1694" timeScale="1ms" />
            <Line id="RMHR" quantity="RMHR/0/RMHR/v" scale="1mV" color="#7b5b40" timeScale="1ms" />
            <Line id="URXR" quantity="URXR/0/URXR/v" scale="1mV" color="#008200" timeScale="1ms" />

        </Display>

        <Display id="activity_neurons" title="c302_D1_Social: Activity of a number of neurons" timeScale="1ms" xmin="-250.0" xmax="2750.0" ymin="-0.1" ymax="1.1">

            <Line id="ASHR" quantity="ASHR/0/ASHR/caConc" scale="1" color="#eaf195" timeScale="1ms" />
            <Line id="ASKR" quantity="ASKR/0/ASKR/caConc" scale="1" color="#3c00ca" timeScale="1ms" />
            <Line id="AWBR" quantity="AWBR/0/AWBR/caConc" scale="1" color="#262f1d" timeScale="1ms" />
            <Line id="IL2R" quantity="IL2R/0/IL2R/caConc" scale="1" color="#108b77" timeScale="1ms" />
            <Line id="RMGR" quantity="RMGR/0/RMGR/caConc" scale="1" color="#458fa5" timeScale="1ms" />
            <Line id="RMHR" quantity="RMHR/0/RMHR/caConc" scale="1" color="#ef7488" timeScale="1ms" />
            <Line id="URXR" quantity="URXR/0/URXR/caConc" scale="1" color="#247960" timeScale="1ms" />

        </Display>

        <OutputFile id="neurons_v" fileName="c302_D1_Social.dat">
            <OutputColumn id="ASHR_v" quantity="ASHR/0/ASHR/v"/>
            <OutputColumn id="ASKR_v" quantity="ASKR/0/ASKR/v"/>
            <OutputColumn id="AWBR_v" quantity="AWBR/0/AWBR/v"/>
            <OutputColumn id="IL2R_v" quantity="IL2R/0/IL2R/v"/>
            <OutputColumn id="RMGR_v" quantity="RMGR/0/RMGR/v"/>
            <OutputColumn id="RMHR_v" quantity="RMHR/0/RMHR/v"/>
            <OutputColumn id="URXR_v" quantity="URXR/0/URXR/v"/>
        </OutputFile>

        <OutputFile id="neurons_activity" fileName="c302_D1_Social.activity.dat">
            <OutputColumn id="ASHR_v" quantity="ASHR/0/ASHR/caConc"/>
            <OutputColumn id="ASKR_v" quantity="ASKR/0/ASKR/caConc"/>
            <OutputColumn id="AWBR_v" quantity="AWBR/0/AWBR/caConc"/>
            <OutputColumn id="IL2R_v" quantity="IL2R/0/IL2R/caConc"/>
            <OutputColumn id="RMGR_v" quantity="RMGR/0/RMGR/caConc"/>
            <OutputColumn id="RMHR_v" quantity="RMHR/0/RMHR/caConc"/>
            <OutputColumn id="URXR_v" quantity="URXR/0/URXR/caConc"/>
        </OutputFile>
    </Simulation>

</Lems>
