<neuroml xmlns="http://www.neuroml.org/schema/neuroml2"  xmlns:xs="http://www.w3.org/2001/XMLSchema" xmlns:xsi="http://www.w3.org/2001/XMLSchema-instance" xsi:schemaLocation="http://www.neuroml.org/schema/neuroml2 https://raw.github.com/NeuroML/NeuroML2/development/Schemas/NeuroML2/NeuroML_v2beta4.xsd" id="c302_A_IClamp">
    <notes>

Parameters and setting used to generate this network:

    Cells:                         ['ADAL']
    Cell stimulated:               ['ADAL']
    Connection numbers overridden: None
    Connection numbers scaled:     None
    Include muscles:               False

    Known BioParameters:
        BioParameter: iaf_leak_reversal = -70mV (SRC: BlindGuess, certainty 0.1)
        BioParameter: iaf_reset = -70mV (SRC: BlindGuess, certainty 0.1)
        BioParameter: iaf_thresh = -50mV (SRC: BlindGuess, certainty 0.1)
        BioParameter: iaf_C = 0.2nF (SRC: BlindGuess, certainty 0.1)
        BioParameter: iaf_conductance = 0.01uS (SRC: BlindGuess, certainty 0.1)
        BioParameter: chem_exc_syn_gbase = 0.2nS (SRC: BlindGuess, certainty 0.1)
        BioParameter: chem_exc_syn_erev = 0mV (SRC: BlindGuess, certainty 0.1)
        BioParameter: chem_exc_syn_rise = 3ms (SRC: BlindGuess, certainty 0.1)
        BioParameter: chem_exc_syn_decay = 10ms (SRC: BlindGuess, certainty 0.1)
        BioParameter: chem_inh_syn_gbase = 0.2nS (SRC: BlindGuess, certainty 0.1)
        BioParameter: chem_inh_syn_erev = -80mV (SRC: BlindGuess, certainty 0.1)
        BioParameter: chem_inh_syn_rise = 3ms (SRC: BlindGuess, certainty 0.1)
        BioParameter: chem_inh_syn_decay = 10ms (SRC: BlindGuess, certainty 0.1)
        BioParameter: elec_syn_gbase = 0.2nS (SRC: BlindGuess, certainty 0.1)
        BioParameter: elec_syn_erev = 0mV (SRC: BlindGuess, certainty 0.1)
        BioParameter: elec_syn_rise = 3ms (SRC: BlindGuess, certainty 0.1)
        BioParameter: elec_syn_decay = 10ms (SRC: BlindGuess, certainty 0.1)
        BioParameter: unphysiological_offset_current = 0.25nA (SRC: Testing IClamp, certainty 0)
        BioParameter: unphysiological_offset_current_del = 100 ms (SRC: Testing IClamp, certainty 0)
        BioParameter: unphysiological_offset_current_dur = 800 ms (SRC: Testing IClamp, certainty 0)

</notes>
    <iafCell id="generic_iaf_cell" reset="-70mV" C="0.2nF" thresh="-50mV" leakConductance="0.01uS" leakReversal="-70mV"/>
    <pulseGenerator id="offset_current" delay="100 ms" duration="800 ms" amplitude="0.25nA"/>
    <network id="c302_A_IClamp">
        <population id="ADAL" type="populationList" component="generic_iaf_cell">
            <property tag="OpenWormBackerAssignedName" value="Xabe"/>
            <instance id="0">
                <location y="8.65" x="-239.25" z="31.050000000000001"/>
            </instance>
        </population>
        <explicitInput input="offset_current" target="ADAL/0/generic_iaf_cell"/>
    </network>
</neuroml>
