<neuroml xmlns="http://www.neuroml.org/schema/neuroml2"  xmlns:xs="http://www.w3.org/2001/XMLSchema" xmlns:xsi="http://www.w3.org/2001/XMLSchema-instance" xsi:schemaLocation="http://www.neuroml.org/schema/neuroml2 https://raw.github.com/NeuroML/NeuroML2/development/Schemas/NeuroML2/NeuroML_v2beta5.xsd" id="c302_B_IClamp">
    <notes>

Parameters and setting used to generate this network:

    Data reader:                    SpreadsheetDataReader
    Cells:                          ['ADAL', 'PVCL']
    Cell stimulated:                ['ADAL', 'PVCL', 'MDR01']
    Connection:                     []
    Connection numbers overridden:  None
    Connection numbers scaled:      None
    Connection polarities override: None
    Muscles:                        ['MDR01']

    Known BioParameters:
        BioParameter: neuron_iaf_leak_reversal = -50mV (SRC: BlindGuess, certainty 0.1)
        BioParameter: neuron_iaf_reset = -50mV (SRC: BlindGuess, certainty 0.1)
        BioParameter: neuron_iaf_thresh = -30mV (SRC: BlindGuess, certainty 0.1)
        BioParameter: neuron_iaf_C = 3pF (SRC: BlindGuess, certainty 0.1)
        BioParameter: neuron_iaf_conductance = 0.1nS (SRC: BlindGuess, certainty 0.1)
        BioParameter: neuron_iaf_tau1 = 50ms (SRC: BlindGuess, certainty 0.1)
        BioParameter: muscle_iaf_leak_reversal = -50mV (SRC: BlindGuess, certainty 0.1)
        BioParameter: muscle_iaf_reset = -50mV (SRC: BlindGuess, certainty 0.1)
        BioParameter: muscle_iaf_thresh = -30mV (SRC: BlindGuess, certainty 0.1)
        BioParameter: muscle_iaf_C = 3pF (SRC: BlindGuess, certainty 0.1)
        BioParameter: muscle_iaf_conductance = 0.1nS (SRC: BlindGuess, certainty 0.1)
        BioParameter: muscle_iaf_tau1 = 50ms (SRC: BlindGuess, certainty 0.1)
        BioParameter: neuron_to_neuron_chem_exc_syn_gbase = 0.01nS (SRC: BlindGuess, certainty 0.1)
        BioParameter: neuron_to_muscle_chem_exc_syn_gbase = 0.01nS (SRC: BlindGuess, certainty 0.1)
        BioParameter: chem_exc_syn_erev = 0mV (SRC: BlindGuess, certainty 0.1)
        BioParameter: chem_exc_syn_rise = 3ms (SRC: BlindGuess, certainty 0.1)
        BioParameter: chem_exc_syn_decay = 10ms (SRC: BlindGuess, certainty 0.1)
        BioParameter: neuron_to_neuron_chem_inh_syn_gbase = 0.01nS (SRC: BlindGuess, certainty 0.1)
        BioParameter: neuron_to_muscle_chem_inh_syn_gbase = 0.01nS (SRC: BlindGuess, certainty 0.1)
        BioParameter: chem_inh_syn_erev = -80mV (SRC: BlindGuess, certainty 0.1)
        BioParameter: chem_inh_syn_rise = 3ms (SRC: BlindGuess, certainty 0.1)
        BioParameter: chem_inh_syn_decay = 10ms (SRC: BlindGuess, certainty 0.1)
        BioParameter: neuron_to_neuron_elec_syn_gbase = 0.1 nS (SRC: BlindGuess, certainty 0.1)
        BioParameter: neuron_to_muscle_elec_syn_gbase = 0.1 nS (SRC: BlindGuess, certainty 0.1)
        BioParameter: unphysiological_offset_current = 5pA (SRC: Testing IClamp, certainty 0)
        BioParameter: unphysiological_offset_current_del = 100 ms (SRC: Testing IClamp, certainty 0)
        BioParameter: unphysiological_offset_current_dur = 800 ms (SRC: Testing IClamp, certainty 0)

</notes>
    <include href="cell_B.xml"></include>
    <iafCell type="iafActivityCell" id="generic_muscle_iaf_cell" C="3pF" thresh="-30mV" reset="-50mV" leakConductance="0.1nS" leakReversal="-50mV" tau1="50ms"/>
    <iafCell type="iafActivityCell" id="generic_neuron_iaf_cell" C="3pF" thresh="-30mV" reset="-50mV" leakConductance="0.1nS" leakReversal="-50mV" tau1="50ms"/>
    <pulseGenerator id="offset_current" delay="100 ms" duration="800 ms" amplitude="5pA"/>
    <network id="c302_B_IClamp">
        <population id="ADAL" component="generic_neuron_iaf_cell" type="populationList">
            <property tag="OpenWormBackerAssignedName" value="Xabe"/>
            <instance id="0">
                <location x="8.65" y="-239.25" z="31.050000000000001"/>
            </instance>
        </population>
        <population id="PVCL" component="generic_neuron_iaf_cell" type="populationList">
            <property tag="OpenWormBackerAssignedName" value="Ramana Kumar"/>
            <instance id="0">
                <location x="0.85" y="404.150019999999984" z="5.5"/>
            </instance>
        </population>
        <population id="MDR01" component="generic_muscle_iaf_cell" type="populationList">
            <instance id="0">
                <location x="80." y="-270." z="80."/>
            </instance>
        </population>
        <inputList id="Input_ADAL_offset_current" population="ADAL" component="offset_current">
            <input id="0" target="../ADAL/0/generic_neuron_iaf_cell" destination="synapses"/>
        </inputList>
        <inputList id="Input_PVCL_offset_current" population="PVCL" component="offset_current">
            <input id="0" target="../PVCL/0/generic_neuron_iaf_cell" destination="synapses"/>
        </inputList>
        <inputList id="Input_MDR01_offset_current" population="MDR01" component="offset_current">
            <input id="0" target="../MDR01/0/generic_muscle_iaf_cell" destination="synapses"/>
        </inputList>
    </network>
</neuroml>
