<neuroml xmlns="http://www.neuroml.org/schema/neuroml2"  xmlns:xs="http://www.w3.org/2001/XMLSchema" xmlns:xsi="http://www.w3.org/2001/XMLSchema-instance" xsi:schemaLocation="http://www.neuroml.org/schema/neuroml2 https://raw.github.com/NeuroML/NeuroML2/development/Schemas/NeuroML2/NeuroML_v2beta5.xsd" id="c302_D1_Oscillator">
    <notes>

Parameters and setting used to generate this network:

    Data reader:                    SpreadsheetDataReader
    c302 version:                   0.5.0
    Cells:                          ['DB2', 'VB2', 'DD2', 'VD2', 'DB3', 'VB3', 'DD3', 'VD3', 'DA2', 'VA2', 'DA3', 'VA3', 'PLML', 'PLMR', 'AVAL', 'AVAR']
    Cell stimulated:                ['PLML', 'PLMR']
    Connection:                     []
    Connection numbers overridden:  None
    Connection numbers scaled:      None
    Connection polarities override: None
    Muscles:                        []

    Known BioParameters:
        BioParameter: cell_diameter = 5 (SRC: BlindGuess, certainty 0.1)
        BioParameter: muscle_length = 20 (SRC: BlindGuess, certainty 0.1)
        BioParameter: initial_memb_pot = -45 mV (SRC: BlindGuess, certainty 0.1)
        BioParameter: specific_capacitance = 1 uF_per_cm2 (SRC: BlindGuess, certainty 0.1)
        BioParameter: resistivity = 3 kohm_cm (SRC: BlindGuess, certainty 0.1)
        BioParameter: muscle_spike_thresh = -26 mV (SRC: BlindGuess, certainty 0.1)
        BioParameter: neuron_spike_thresh = -26 mV (SRC: BlindGuess, certainty 0.1)
        BioParameter: muscle_leak_cond_density = 0.005 mS_per_cm2 (SRC: BlindGuess, certainty 0.1)
        BioParameter: neuron_leak_cond_density = 0.005 mS_per_cm2 (SRC: BlindGuess, certainty 0.1)
        BioParameter: leak_erev = -50 mV (SRC: BlindGuess, certainty 0.1)
        BioParameter: muscle_k_slow_cond_density = 4 mS_per_cm2 (SRC: BlindGuess, certainty 0.1)
        BioParameter: neuron_k_slow_cond_density = 1.8333751019872582 mS_per_cm2 (SRC: BlindGuess, certainty 0.1)
        BioParameter: k_slow_erev = -60 mV (SRC: BlindGuess, certainty 0.1)
        BioParameter: muscle_k_fast_cond_density = 0.2 mS_per_cm2 (SRC: BlindGuess, certainty 0.1)
        BioParameter: neuron_k_fast_cond_density = 0.0711643917483308 mS_per_cm2 (SRC: BlindGuess, certainty 0.1)
        BioParameter: k_fast_erev = -60 mV (SRC: BlindGuess, certainty 0.1)
        BioParameter: muscle_ca_boyle_cond_density = 4 mS_per_cm2 (SRC: BlindGuess, certainty 0.1)
        BioParameter: neuron_ca_boyle_cond_density = 1.6862775772264702 mS_per_cm2 (SRC: BlindGuess, certainty 0.1)
        BioParameter: ca_boyle_erev = 40 mV (SRC: BlindGuess, certainty 0.1)
        BioParameter: ca_conc_decay_time = 11.5943 ms (SRC: BlindGuess, certainty 0.1)
        BioParameter: ca_conc_rho = 0.000238919 mol_per_m_per_A_per_s (SRC: BlindGuess, certainty 0.1)
        BioParameter: global_connectivity_power_scaling = 0 (SRC: BlindGuess, certainty 0.1)
        BioParameter: neuron_to_neuron_exc_syn_conductance = 2 nS (SRC: BlindGuess, certainty 0.1)
        BioParameter: neuron_to_muscle_exc_syn_conductance = 2 nS (SRC: BlindGuess, certainty 0.1)
        BioParameter: exc_syn_ar = .5 per_s (SRC: BlindGuess, certainty 0.1)
        BioParameter: exc_syn_ad = 20 per_s (SRC: BlindGuess, certainty 0.1)
        BioParameter: exc_syn_beta = 0.25 per_mV (SRC: BlindGuess, certainty 0.1)
        BioParameter: exc_syn_vth = -35 mV (SRC: BlindGuess, certainty 0.1)
        BioParameter: exc_syn_erev = 0 mV (SRC: BlindGuess, certainty 0.1)
        BioParameter: neuron_to_neuron_inh_syn_conductance = 26 nS (SRC: BlindGuess, certainty 0.1)
        BioParameter: neuron_to_muscle_inh_syn_conductance = 0.25 nS (SRC: BlindGuess, certainty 0.1)
        BioParameter: inh_syn_ar = .005 per_s (SRC: BlindGuess, certainty 0.1)
        BioParameter: inh_syn_ad = 10 per_s (SRC: BlindGuess, certainty 0.1)
        BioParameter: inh_syn_beta = 0.5 per_mV (SRC: BlindGuess, certainty 0.1)
        BioParameter: inh_syn_vth = -55 mV (SRC: BlindGuess, certainty 0.1)
        BioParameter: inh_syn_erev = -90 mV (SRC: BlindGuess, certainty 0.1)
        BioParameter: neuron_to_neuron_elec_syn_gbase = 0.005 nS (SRC: BlindGuess, certainty 0.1)
        BioParameter: neuron_to_muscle_elec_syn_gbase = 0.0001 nS (SRC: BlindGuess, certainty 0.1)
        BioParameter: unphysiological_offset_current = 2pA (SRC: Testing Osc, certainty 0)
        BioParameter: unphysiological_offset_current_del = 10 ms (SRC: Testing Osc, certainty 0)
        BioParameter: unphysiological_offset_current_dur = 2500 ms (SRC: Testing Osc, certainty 0)

</notes>
    <include href="cell_C.xml"></include>
    <include href="custom_synapses.xml"></include>
    <include href="cells/AVAL_D.cell.nml"></include>
    <include href="cells/AVAR_D.cell.nml"></include>
    <include href="cells/DA2_D.cell.nml"></include>
    <include href="cells/DA3_D.cell.nml"></include>
    <include href="cells/DB2_D.cell.nml"></include>
    <include href="cells/DB3_D.cell.nml"></include>
    <include href="cells/DD2_D.cell.nml"></include>
    <include href="cells/DD3_D.cell.nml"></include>
    <include href="cells/PLML_D.cell.nml"></include>
    <include href="cells/PLMR_D.cell.nml"></include>
    <include href="cells/VA2_D.cell.nml"></include>
    <include href="cells/VA3_D.cell.nml"></include>
    <include href="cells/VB2_D.cell.nml"></include>
    <include href="cells/VB3_D.cell.nml"></include>
    <include href="cells/VD2_D.cell.nml"></include>
    <include href="cells/VD3_D.cell.nml"></include>
    <fixedFactorConcentrationModel id="CaPool" ion="ca" restingConc="0 mM" decayConstant="11.5943 ms" rho="0.000238919 mol_per_m_per_A_per_s"/>
    <gapJunction id="neuron_to_neuron_elec_syn" conductance="0.005 nS"/>
    <silentSynapse id="silent"/>
    <gradedSynapse2 id="neuron_to_neuron_exc_syn" conductance="2 nS" ar=".5 per_s" ad="20 per_s" beta="0.25 per_mV" vth="-35 mV" erev="0 mV"/>
    <gradedSynapse2 id="neuron_to_neuron_inh_syn" conductance="26 nS" ar=".005 per_s" ad="10 per_s" beta="0.5 per_mV" vth="-55 mV" erev="-90 mV"/>
    <cell id="GenericMuscleCell">
        <morphology id="morphology_GenericMuscleCell">
            <segment id="0" name="soma">
                <proximal x="0.000000e+00" y="0.000000e+00" z="0.000000e+00" diameter="5"/>
                <distal x="0.000000e+00" y="0.000000e+00" z="0.000000e+00" diameter="5"/>
            </segment>
        </morphology>
        <biophysicalProperties id="biophys_GenericMuscleCell">
            <membraneProperties>
                <channelDensity id="Leak_all" ionChannel="Leak" condDensity="0.005 mS_per_cm2" erev="-50 mV" ion="non_specific"/>
                <channelDensity id="k_slow_all" ionChannel="k_slow" condDensity="4 mS_per_cm2" erev="-60 mV" ion="k"/>
                <channelDensity id="k_fast_all" ionChannel="k_fast" condDensity="0.2 mS_per_cm2" erev="-60 mV" ion="k"/>
                <channelDensity id="ca_boyle_all" ionChannel="ca_boyle" condDensity="4 mS_per_cm2" erev="40 mV" ion="ca"/>
                <spikeThresh value="-26 mV"/>
                <specificCapacitance value="1 uF_per_cm2"/>
                <initMembPotential value="-45 mV"/>
            </membraneProperties>
            <intracellularProperties>
                <species id="ca" concentrationModel="CaPool" ion="ca" initialConcentration="0 mM" initialExtConcentration="2E-6 mol_per_cm3"/>
                <resistivity value="3 kohm_cm"/>
            </intracellularProperties>
        </biophysicalProperties>
    </cell>
    <pulseGenerator id="offset_current" delay="10 ms" duration="2500 ms" amplitude="2pA"/>
    <network id="c302_D1_Oscillator">
        <population id="AVAL" component="AVAL" size="1" type="populationList">
            <property tag="type" value="interneuron"/>
            <property tag="receptor" value="GGR-3; GLR-1; GLR-2; GLR-4; GLR-5; NMR-1; NMR-2; NPR-4; UNC-8"/>
            <property tag="neurotransmitter" value=""/>
            <property tag="OpenWormBackerAssignedName" value="JUD"/>
            <instance id="0">
                <location x="0." y="0." z="0."/>
            </instance>
        </population>
        <population id="AVAR" component="AVAR" size="1" type="populationList">
            <property tag="type" value="interneuron"/>
            <property tag="receptor" value="GGR-3; GLR-1; GLR-2; GLR-4; GLR-5; NMR-1; NMR-2; NPR-4; UNC-8"/>
            <property tag="neurotransmitter" value=""/>
            <instance id="0">
                <location x="0." y="0." z="0."/>
            </instance>
        </population>
        <population id="DA2" component="DA2" size="1" type="populationList">
            <property tag="type" value="motor"/>
            <property tag="receptor" value="CKR-2; DOP-1; DOP-3; NPR-3; SER-2; UNC-8"/>
            <property tag="neurotransmitter" value="Acetylcholine"/>
            <property tag="OpenWormBackerAssignedName" value="Ruzila"/>
            <instance id="0">
                <location x="0." y="0." z="0."/>
            </instance>
        </population>
        <population id="DA3" component="DA3" size="1" type="populationList">
            <property tag="type" value="motor"/>
            <property tag="receptor" value="CKR-2; DOP-1; DOP-3; NPR-3; SER-2; UNC-8"/>
            <property tag="neurotransmitter" value="Acetylcholine"/>
            <property tag="OpenWormBackerAssignedName" value="Magoo"/>
            <instance id="0">
                <location x="0." y="0." z="0."/>
            </instance>
        </population>
        <population id="DB2" component="DB2" size="1" type="populationList">
            <property tag="type" value="motor"/>
            <property tag="receptor" value="CKR-2; DOP-1; DOP-3; NPR-3; PDFR-1"/>
            <property tag="neurotransmitter" value="Acetylcholine"/>
            <instance id="0">
                <location x="0." y="0." z="0."/>
            </instance>
        </population>
        <population id="DB3" component="DB3" size="1" type="populationList">
            <property tag="type" value="motor"/>
            <property tag="receptor" value="CKR-2; DOP-1; DOP-3; NPR-3"/>
            <property tag="neurotransmitter" value="Acetylcholine"/>
            <instance id="0">
                <location x="0." y="0." z="0."/>
            </instance>
        </population>
        <population id="DD2" component="DD2" size="1" type="populationList">
            <property tag="type" value="motor"/>
            <property tag="receptor" value="DOP-3; MOD-1; NPR-1"/>
            <property tag="neurotransmitter" value="GABA"/>
            <property tag="OpenWormBackerAssignedName" value="Evolver"/>
            <instance id="0">
                <location x="0." y="0." z="0."/>
            </instance>
        </population>
        <population id="DD3" component="DD3" size="1" type="populationList">
            <property tag="type" value="motor"/>
            <property tag="receptor" value="DOP-3; MOD-1; NPR-1"/>
            <property tag="neurotransmitter" value="GABA"/>
            <instance id="0">
                <location x="0." y="0." z="0."/>
            </instance>
        </population>
        <population id="PLML" component="PLML" size="1" type="populationList">
            <property tag="type" value="sensory"/>
            <property tag="receptor" value="DEG-3; DES-2; DOP-1; GLR-8; MEC-2; MEC-4; MEC-6; MEC-9; PDFR-1"/>
            <property tag="neurotransmitter" value="Glutamate"/>
            <property tag="OpenWormBackerAssignedName" value="Isaac Spear"/>
            <instance id="0">
                <location x="0." y="0." z="0."/>
            </instance>
        </population>
        <population id="PLMR" component="PLMR" size="1" type="populationList">
            <property tag="type" value="sensory"/>
            <property tag="receptor" value="DEG-3; DES-2; DOP-1; GLR-8; MEC-2; MEC-4; MEC-6; MEC-9; PDFR-1"/>
            <property tag="neurotransmitter" value="Glutamate"/>
            <property tag="OpenWormBackerAssignedName" value="Altman"/>
            <instance id="0">
                <location x="0." y="0." z="0."/>
            </instance>
        </population>
        <population id="VA2" component="VA2" size="1" type="populationList">
            <property tag="type" value="motor"/>
            <property tag="receptor" value="CKR-2; DOP-1; DOP-3; LGC-53; NPR-3"/>
            <property tag="neurotransmitter" value="Acetylcholine"/>
            <property tag="OpenWormBackerAssignedName" value="Marquam Hill"/>
            <instance id="0">
                <location x="0." y="0." z="0."/>
            </instance>
        </population>
        <population id="VA3" component="VA3" size="1" type="populationList">
            <property tag="type" value="motor"/>
            <property tag="receptor" value="CKR-2; DOP-1; DOP-3; LGC-53; NPR-3"/>
            <property tag="neurotransmitter" value="Acetylcholine"/>
            <instance id="0">
                <location x="0." y="0." z="0."/>
            </instance>
        </population>
        <population id="VB2" component="VB2" size="1" type="populationList">
            <property tag="type" value="motor; sensory"/>
            <property tag="receptor" value="CKR-2; DOP-1; DOP-3; NPR-3"/>
            <property tag="neurotransmitter" value="Acetylcholine"/>
            <property tag="OpenWormBackerAssignedName" value="Bloodgood"/>
            <instance id="0">
                <location x="0." y="0." z="0."/>
            </instance>
        </population>
        <population id="VB3" component="VB3" size="1" type="populationList">
            <property tag="type" value="motor; sensory"/>
            <property tag="receptor" value="CKR-2; DOP-1; DOP-3; NPR-3"/>
            <property tag="neurotransmitter" value="Acetylcholine"/>
            <property tag="OpenWormBackerAssignedName" value="Ramez Naam"/>
            <instance id="0">
                <location x="0." y="0." z="0."/>
            </instance>
        </population>
        <population id="VD2" component="VD2" size="1" type="populationList">
            <property tag="type" value="motor"/>
            <property tag="receptor" value="DOP-3; MOD-1; NPR-1; SER-2"/>
            <property tag="neurotransmitter" value="GABA"/>
            <instance id="0">
                <location x="0." y="0." z="0."/>
            </instance>
        </population>
        <population id="VD3" component="VD3" size="1" type="populationList">
            <property tag="type" value="motor"/>
            <property tag="receptor" value="DOP-3; MOD-1; NPR-1; SER-2"/>
            <property tag="neurotransmitter" value="GABA"/>
            <instance id="0">
                <location x="0." y="0." z="0."/>
            </instance>
        </population>
        <electricalProjection id="NC_AVAL_AVAR_Generic_GJ" presynapticPopulation="AVAL" postsynapticPopulation="AVAR">
            <electricalConnectionInstanceW id="0" preCell="../AVAL/0/AVAL" preSegment="0" preFractionAlong="0.5" postCell="../AVAR/0/AVAR" postSegment="0" postFractionAlong="0.5" synapse="neuron_to_neuron_elec_syn" weight="1."/>
        </electricalProjection>
        <electricalProjection id="NC_AVAL_DA2_Generic_GJ" presynapticPopulation="AVAL" postsynapticPopulation="DA2">
            <electricalConnectionInstanceW id="0" preCell="../AVAL/0/AVAL" preSegment="0" preFractionAlong="0.5" postCell="../DA2/0/DA2" postSegment="0" postFractionAlong="0.5" synapse="neuron_to_neuron_elec_syn" weight="1."/>
        </electricalProjection>
        <electricalProjection id="NC_AVAL_VA2_Generic_GJ" presynapticPopulation="AVAL" postsynapticPopulation="VA2">
            <electricalConnectionInstanceW id="0" preCell="../AVAL/0/AVAL" preSegment="0" preFractionAlong="0.5" postCell="../VA2/0/VA2" postSegment="0" postFractionAlong="0.5" synapse="neuron_to_neuron_elec_syn" weight="1."/>
        </electricalProjection>
        <electricalProjection id="NC_AVAL_VA3_Generic_GJ" presynapticPopulation="AVAL" postsynapticPopulation="VA3">
            <electricalConnectionInstanceW id="0" preCell="../AVAL/0/AVAL" preSegment="0" preFractionAlong="0.5" postCell="../VA3/0/VA3" postSegment="0" postFractionAlong="0.5" synapse="neuron_to_neuron_elec_syn" weight="1."/>
        </electricalProjection>
        <electricalProjection id="NC_AVAR_AVAL_Generic_GJ" presynapticPopulation="AVAR" postsynapticPopulation="AVAL">
            <electricalConnectionInstanceW id="0" preCell="../AVAR/0/AVAR" preSegment="0" preFractionAlong="0.5" postCell="../AVAL/0/AVAL" postSegment="0" postFractionAlong="0.5" synapse="neuron_to_neuron_elec_syn" weight="1."/>
        </electricalProjection>
        <electricalProjection id="NC_AVAR_DA2_Generic_GJ" presynapticPopulation="AVAR" postsynapticPopulation="DA2">
            <electricalConnectionInstanceW id="0" preCell="../AVAR/0/AVAR" preSegment="0" preFractionAlong="0.5" postCell="../DA2/0/DA2" postSegment="0" postFractionAlong="0.5" synapse="neuron_to_neuron_elec_syn" weight="1."/>
        </electricalProjection>
        <electricalProjection id="NC_AVAR_DA3_Generic_GJ" presynapticPopulation="AVAR" postsynapticPopulation="DA3">
            <electricalConnectionInstanceW id="0" preCell="../AVAR/0/AVAR" preSegment="0" preFractionAlong="0.5" postCell="../DA3/0/DA3" postSegment="0" postFractionAlong="0.5" synapse="neuron_to_neuron_elec_syn" weight="1."/>
        </electricalProjection>
        <electricalProjection id="NC_AVAR_VA3_Generic_GJ" presynapticPopulation="AVAR" postsynapticPopulation="VA3">
            <electricalConnectionInstanceW id="0" preCell="../AVAR/0/AVAR" preSegment="0" preFractionAlong="0.5" postCell="../VA3/0/VA3" postSegment="0" postFractionAlong="0.5" synapse="neuron_to_neuron_elec_syn" weight="1."/>
        </electricalProjection>
        <electricalProjection id="NC_DA2_AVAL_Generic_GJ" presynapticPopulation="DA2" postsynapticPopulation="AVAL">
            <electricalConnectionInstanceW id="0" preCell="../DA2/0/DA2" preSegment="0" preFractionAlong="0.5" postCell="../AVAL/0/AVAL" postSegment="0" postFractionAlong="0.5" synapse="neuron_to_neuron_elec_syn" weight="1."/>
        </electricalProjection>
        <electricalProjection id="NC_DA2_AVAR_Generic_GJ" presynapticPopulation="DA2" postsynapticPopulation="AVAR">
            <electricalConnectionInstanceW id="0" preCell="../DA2/0/DA2" preSegment="0" preFractionAlong="0.5" postCell="../AVAR/0/AVAR" postSegment="0" postFractionAlong="0.5" synapse="neuron_to_neuron_elec_syn" weight="1."/>
        </electricalProjection>
        <electricalProjection id="NC_DA3_AVAR_Generic_GJ" presynapticPopulation="DA3" postsynapticPopulation="AVAR">
            <electricalConnectionInstanceW id="0" preCell="../DA3/0/DA3" preSegment="0" preFractionAlong="0.5" postCell="../AVAR/0/AVAR" postSegment="0" postFractionAlong="0.5" synapse="neuron_to_neuron_elec_syn" weight="1."/>
        </electricalProjection>
        <electricalProjection id="NC_DB2_DB3_Generic_GJ" presynapticPopulation="DB2" postsynapticPopulation="DB3">
            <electricalConnectionInstanceW id="0" preCell="../DB2/0/DB2" preSegment="0" preFractionAlong="0.5" postCell="../DB3/0/DB3" postSegment="0" postFractionAlong="0.5" synapse="neuron_to_neuron_elec_syn" weight="1."/>
        </electricalProjection>
        <electricalProjection id="NC_DB3_DB2_Generic_GJ" presynapticPopulation="DB3" postsynapticPopulation="DB2">
            <electricalConnectionInstanceW id="0" preCell="../DB3/0/DB3" preSegment="0" preFractionAlong="0.5" postCell="../DB2/0/DB2" postSegment="0" postFractionAlong="0.5" synapse="neuron_to_neuron_elec_syn" weight="1."/>
        </electricalProjection>
        <electricalProjection id="NC_DD2_DD3_Generic_GJ" presynapticPopulation="DD2" postsynapticPopulation="DD3">
            <electricalConnectionInstanceW id="0" preCell="../DD2/0/DD2" preSegment="0" preFractionAlong="0.5" postCell="../DD3/0/DD3" postSegment="0" postFractionAlong="0.5" synapse="neuron_to_neuron_elec_syn" weight="1."/>
        </electricalProjection>
        <electricalProjection id="NC_DD3_DD2_Generic_GJ" presynapticPopulation="DD3" postsynapticPopulation="DD2">
            <electricalConnectionInstanceW id="0" preCell="../DD3/0/DD3" preSegment="0" preFractionAlong="0.5" postCell="../DD2/0/DD2" postSegment="0" postFractionAlong="0.5" synapse="neuron_to_neuron_elec_syn" weight="1."/>
        </electricalProjection>
        <electricalProjection id="NC_VD2_VA2_Generic_GJ" presynapticPopulation="VD2" postsynapticPopulation="VA2">
            <electricalConnectionInstanceW id="0" preCell="../VD2/0/VD2" preSegment="0" preFractionAlong="0.5" postCell="../VA2/0/VA2" postSegment="0" postFractionAlong="0.5" synapse="neuron_to_neuron_elec_syn" weight="1."/>
        </electricalProjection>
        <electricalProjection id="NC_VD2_VD3_Generic_GJ" presynapticPopulation="VD2" postsynapticPopulation="VD3">
            <electricalConnectionInstanceW id="0" preCell="../VD2/0/VD2" preSegment="0" preFractionAlong="0.5" postCell="../VD3/0/VD3" postSegment="0" postFractionAlong="0.5" synapse="neuron_to_neuron_elec_syn" weight="1."/>
        </electricalProjection>
        <electricalProjection id="NC_VD3_VD2_Generic_GJ" presynapticPopulation="VD3" postsynapticPopulation="VD2">
            <electricalConnectionInstanceW id="0" preCell="../VD3/0/VD3" preSegment="0" preFractionAlong="0.5" postCell="../VD2/0/VD2" postSegment="0" postFractionAlong="0.5" synapse="neuron_to_neuron_elec_syn" weight="1."/>
        </electricalProjection>
        <electricalProjection id="NC_VA2_AVAL_Generic_GJ" presynapticPopulation="VA2" postsynapticPopulation="AVAL">
            <electricalConnectionInstanceW id="0" preCell="../VA2/0/VA2" preSegment="0" preFractionAlong="0.5" postCell="../AVAL/0/AVAL" postSegment="0" postFractionAlong="0.5" synapse="neuron_to_neuron_elec_syn" weight="1."/>
        </electricalProjection>
        <electricalProjection id="NC_VA2_VD2_Generic_GJ" presynapticPopulation="VA2" postsynapticPopulation="VD2">
            <electricalConnectionInstanceW id="0" preCell="../VA2/0/VA2" preSegment="0" preFractionAlong="0.5" postCell="../VD2/0/VD2" postSegment="0" postFractionAlong="0.5" synapse="neuron_to_neuron_elec_syn" weight="1."/>
        </electricalProjection>
        <electricalProjection id="NC_VA3_AVAL_Generic_GJ" presynapticPopulation="VA3" postsynapticPopulation="AVAL">
            <electricalConnectionInstanceW id="0" preCell="../VA3/0/VA3" preSegment="0" preFractionAlong="0.5" postCell="../AVAL/0/AVAL" postSegment="0" postFractionAlong="0.5" synapse="neuron_to_neuron_elec_syn" weight="1."/>
        </electricalProjection>
        <electricalProjection id="NC_VA3_AVAR_Generic_GJ" presynapticPopulation="VA3" postsynapticPopulation="AVAR">
            <electricalConnectionInstanceW id="0" preCell="../VA3/0/VA3" preSegment="0" preFractionAlong="0.5" postCell="../AVAR/0/AVAR" postSegment="0" postFractionAlong="0.5" synapse="neuron_to_neuron_elec_syn" weight="1."/>
        </electricalProjection>
        <electricalProjection id="NC_VB2_VB3_Generic_GJ" presynapticPopulation="VB2" postsynapticPopulation="VB3">
            <electricalConnectionInstanceW id="0" preCell="../VB2/0/VB2" preSegment="0" preFractionAlong="0.5" postCell="../VB3/0/VB3" postSegment="0" postFractionAlong="0.5" synapse="neuron_to_neuron_elec_syn" weight="1."/>
        </electricalProjection>
        <electricalProjection id="NC_VB3_VB2_Generic_GJ" presynapticPopulation="VB3" postsynapticPopulation="VB2">
            <electricalConnectionInstanceW id="0" preCell="../VB3/0/VB3" preSegment="0" preFractionAlong="0.5" postCell="../VB2/0/VB2" postSegment="0" postFractionAlong="0.5" synapse="neuron_to_neuron_elec_syn" weight="1."/>
        </electricalProjection>
        <continuousProjection id="NC_AVAL_AVAR_FMRFamide" presynapticPopulation="AVAL" postsynapticPopulation="AVAR">
            <continuousConnectionInstanceW id="0" preCell="../AVAL/0/AVAL" preSegment="0" preFractionAlong="0.5" postCell="../AVAR/0/AVAR" postSegment="0" postFractionAlong="0.5" preComponent="silent" postComponent="neuron_to_neuron_exc_syn" weight="1."/>
        </continuousProjection>
        <continuousProjection id="NC_AVAL_DA2_FMRFamide" presynapticPopulation="AVAL" postsynapticPopulation="DA2">
            <continuousConnectionInstanceW id="0" preCell="../AVAL/0/AVAL" preSegment="0" preFractionAlong="0.5" postCell="../DA2/0/DA2" postSegment="0" postFractionAlong="0.5" preComponent="silent" postComponent="neuron_to_neuron_exc_syn" weight="1."/>
        </continuousProjection>
        <continuousProjection id="NC_AVAL_DA3_FMRFamide" presynapticPopulation="AVAL" postsynapticPopulation="DA3">
            <continuousConnectionInstanceW id="0" preCell="../AVAL/0/AVAL" preSegment="0" preFractionAlong="0.5" postCell="../DA3/0/DA3" postSegment="0" postFractionAlong="0.5" preComponent="silent" postComponent="neuron_to_neuron_exc_syn" weight="1."/>
        </continuousProjection>
        <continuousProjection id="NC_AVAL_VA2_FMRFamide" presynapticPopulation="AVAL" postsynapticPopulation="VA2">
            <continuousConnectionInstanceW id="0" preCell="../AVAL/0/AVAL" preSegment="0" preFractionAlong="0.5" postCell="../VA2/0/VA2" postSegment="0" postFractionAlong="0.5" preComponent="silent" postComponent="neuron_to_neuron_exc_syn" weight="1."/>
        </continuousProjection>
        <continuousProjection id="NC_AVAL_VA3_FMRFamide" presynapticPopulation="AVAL" postsynapticPopulation="VA3">
            <continuousConnectionInstanceW id="0" preCell="../AVAL/0/AVAL" preSegment="0" preFractionAlong="0.5" postCell="../VA3/0/VA3" postSegment="0" postFractionAlong="0.5" preComponent="silent" postComponent="neuron_to_neuron_exc_syn" weight="1."/>
        </continuousProjection>
        <continuousProjection id="NC_AVAR_AVAL_FMRFamide" presynapticPopulation="AVAR" postsynapticPopulation="AVAL">
            <continuousConnectionInstanceW id="0" preCell="../AVAR/0/AVAR" preSegment="0" preFractionAlong="0.5" postCell="../AVAL/0/AVAL" postSegment="0" postFractionAlong="0.5" preComponent="silent" postComponent="neuron_to_neuron_exc_syn" weight="1."/>
        </continuousProjection>
        <continuousProjection id="NC_AVAR_DA2_FMRFamide" presynapticPopulation="AVAR" postsynapticPopulation="DA2">
            <continuousConnectionInstanceW id="0" preCell="../AVAR/0/AVAR" preSegment="0" preFractionAlong="0.5" postCell="../DA2/0/DA2" postSegment="0" postFractionAlong="0.5" preComponent="silent" postComponent="neuron_to_neuron_exc_syn" weight="1."/>
        </continuousProjection>
        <continuousProjection id="NC_AVAR_DA3_FMRFamide" presynapticPopulation="AVAR" postsynapticPopulation="DA3">
            <continuousConnectionInstanceW id="0" preCell="../AVAR/0/AVAR" preSegment="0" preFractionAlong="0.5" postCell="../DA3/0/DA3" postSegment="0" postFractionAlong="0.5" preComponent="silent" postComponent="neuron_to_neuron_exc_syn" weight="1."/>
        </continuousProjection>
        <continuousProjection id="NC_AVAR_DB3_FMRFamide" presynapticPopulation="AVAR" postsynapticPopulation="DB3">
            <continuousConnectionInstanceW id="0" preCell="../AVAR/0/AVAR" preSegment="0" preFractionAlong="0.5" postCell="../DB3/0/DB3" postSegment="0" postFractionAlong="0.5" preComponent="silent" postComponent="neuron_to_neuron_exc_syn" weight="1."/>
        </continuousProjection>
        <continuousProjection id="NC_AVAR_VA2_FMRFamide" presynapticPopulation="AVAR" postsynapticPopulation="VA2">
            <continuousConnectionInstanceW id="0" preCell="../AVAR/0/AVAR" preSegment="0" preFractionAlong="0.5" postCell="../VA2/0/VA2" postSegment="0" postFractionAlong="0.5" preComponent="silent" postComponent="neuron_to_neuron_exc_syn" weight="1."/>
        </continuousProjection>
        <continuousProjection id="NC_AVAR_VA3_FMRFamide" presynapticPopulation="AVAR" postsynapticPopulation="VA3">
            <continuousConnectionInstanceW id="0" preCell="../AVAR/0/AVAR" preSegment="0" preFractionAlong="0.5" postCell="../VA3/0/VA3" postSegment="0" postFractionAlong="0.5" preComponent="silent" postComponent="neuron_to_neuron_exc_syn" weight="1."/>
        </continuousProjection>
        <continuousProjection id="NC_DA2_VD2_Acetylcholine" presynapticPopulation="DA2" postsynapticPopulation="VD2">
            <continuousConnectionInstanceW id="0" preCell="../DA2/0/DA2" preSegment="0" preFractionAlong="0.5" postCell="../VD2/0/VD2" postSegment="0" postFractionAlong="0.5" preComponent="silent" postComponent="neuron_to_neuron_exc_syn" weight="1."/>
        </continuousProjection>
        <continuousProjection id="NC_DA2_VD3_Acetylcholine" presynapticPopulation="DA2" postsynapticPopulation="VD3">
            <continuousConnectionInstanceW id="0" preCell="../DA2/0/DA2" preSegment="0" preFractionAlong="0.5" postCell="../VD3/0/VD3" postSegment="0" postFractionAlong="0.5" preComponent="silent" postComponent="neuron_to_neuron_exc_syn" weight="1."/>
        </continuousProjection>
        <continuousProjection id="NC_DA3_DB3_Acetylcholine" presynapticPopulation="DA3" postsynapticPopulation="DB3">
            <continuousConnectionInstanceW id="0" preCell="../DA3/0/DA3" preSegment="0" preFractionAlong="0.5" postCell="../DB3/0/DB3" postSegment="0" postFractionAlong="0.5" preComponent="silent" postComponent="neuron_to_neuron_exc_syn" weight="1."/>
        </continuousProjection>
        <continuousProjection id="NC_DA3_DD2_Acetylcholine" presynapticPopulation="DA3" postsynapticPopulation="DD2">
            <continuousConnectionInstanceW id="0" preCell="../DA3/0/DA3" preSegment="0" preFractionAlong="0.5" postCell="../DD2/0/DD2" postSegment="0" postFractionAlong="0.5" preComponent="silent" postComponent="neuron_to_neuron_exc_syn" weight="1."/>
        </continuousProjection>
        <continuousProjection id="NC_DA3_VD3_Acetylcholine" presynapticPopulation="DA3" postsynapticPopulation="VD3">
            <continuousConnectionInstanceW id="0" preCell="../DA3/0/DA3" preSegment="0" preFractionAlong="0.5" postCell="../VD3/0/VD3" postSegment="0" postFractionAlong="0.5" preComponent="silent" postComponent="neuron_to_neuron_exc_syn" weight="1."/>
        </continuousProjection>
        <continuousProjection id="NC_DB2_DA3_Acetylcholine" presynapticPopulation="DB2" postsynapticPopulation="DA3">
            <continuousConnectionInstanceW id="0" preCell="../DB2/0/DB2" preSegment="0" preFractionAlong="0.5" postCell="../DA3/0/DA3" postSegment="0" postFractionAlong="0.5" preComponent="silent" postComponent="neuron_to_neuron_exc_syn" weight="1."/>
        </continuousProjection>
        <continuousProjection id="NC_DB2_DD2_Acetylcholine" presynapticPopulation="DB2" postsynapticPopulation="DD2">
            <continuousConnectionInstanceW id="0" preCell="../DB2/0/DB2" preSegment="0" preFractionAlong="0.5" postCell="../DD2/0/DD2" postSegment="0" postFractionAlong="0.5" preComponent="silent" postComponent="neuron_to_neuron_exc_syn" weight="1."/>
        </continuousProjection>
        <continuousProjection id="NC_DB2_VD3_Acetylcholine" presynapticPopulation="DB2" postsynapticPopulation="VD3">
            <continuousConnectionInstanceW id="0" preCell="../DB2/0/DB2" preSegment="0" preFractionAlong="0.5" postCell="../VD3/0/VD3" postSegment="0" postFractionAlong="0.5" preComponent="silent" postComponent="neuron_to_neuron_exc_syn" weight="1."/>
        </continuousProjection>
        <continuousProjection id="NC_DB3_DD2_Acetylcholine" presynapticPopulation="DB3" postsynapticPopulation="DD2">
            <continuousConnectionInstanceW id="0" preCell="../DB3/0/DB3" preSegment="0" preFractionAlong="0.5" postCell="../DD2/0/DD2" postSegment="0" postFractionAlong="0.5" preComponent="silent" postComponent="neuron_to_neuron_exc_syn" weight="1."/>
        </continuousProjection>
        <continuousProjection id="NC_DB3_DD3_Acetylcholine" presynapticPopulation="DB3" postsynapticPopulation="DD3">
            <continuousConnectionInstanceW id="0" preCell="../DB3/0/DB3" preSegment="0" preFractionAlong="0.5" postCell="../DD3/0/DD3" postSegment="0" postFractionAlong="0.5" preComponent="silent" postComponent="neuron_to_neuron_exc_syn" weight="1."/>
        </continuousProjection>
        <continuousProjection id="NC_DD2_DA3_GABA" presynapticPopulation="DD2" postsynapticPopulation="DA3">
            <continuousConnectionInstanceW id="0" preCell="../DD2/0/DD2" preSegment="0" preFractionAlong="0.5" postCell="../DA3/0/DA3" postSegment="0" postFractionAlong="0.5" preComponent="silent" postComponent="neuron_to_neuron_inh_syn" weight="1."/>
        </continuousProjection>
        <continuousProjection id="NC_DD2_VD3_GABA" presynapticPopulation="DD2" postsynapticPopulation="VD3">
            <continuousConnectionInstanceW id="0" preCell="../DD2/0/DD2" preSegment="0" preFractionAlong="0.5" postCell="../VD3/0/VD3" postSegment="0" postFractionAlong="0.5" preComponent="silent" postComponent="neuron_to_neuron_inh_syn" weight="1."/>
        </continuousProjection>
        <continuousProjection id="NC_VD2_VA2_GABA" presynapticPopulation="VD2" postsynapticPopulation="VA2">
            <continuousConnectionInstanceW id="0" preCell="../VD2/0/VD2" preSegment="0" preFractionAlong="0.5" postCell="../VA2/0/VA2" postSegment="0" postFractionAlong="0.5" preComponent="silent" postComponent="neuron_to_neuron_inh_syn" weight="1."/>
        </continuousProjection>
        <continuousProjection id="NC_VD2_VB2_GABA" presynapticPopulation="VD2" postsynapticPopulation="VB2">
            <continuousConnectionInstanceW id="0" preCell="../VD2/0/VD2" preSegment="0" preFractionAlong="0.5" postCell="../VB2/0/VB2" postSegment="0" postFractionAlong="0.5" preComponent="silent" postComponent="neuron_to_neuron_inh_syn" weight="1."/>
        </continuousProjection>
        <continuousProjection id="NC_VD3_VA3_GABA" presynapticPopulation="VD3" postsynapticPopulation="VA3">
            <continuousConnectionInstanceW id="0" preCell="../VD3/0/VD3" preSegment="0" preFractionAlong="0.5" postCell="../VA3/0/VA3" postSegment="0" postFractionAlong="0.5" preComponent="silent" postComponent="neuron_to_neuron_inh_syn" weight="1."/>
        </continuousProjection>
        <continuousProjection id="NC_VD3_VB2_GABA" presynapticPopulation="VD3" postsynapticPopulation="VB2">
            <continuousConnectionInstanceW id="0" preCell="../VD3/0/VD3" preSegment="0" preFractionAlong="0.5" postCell="../VB2/0/VB2" postSegment="0" postFractionAlong="0.5" preComponent="silent" postComponent="neuron_to_neuron_inh_syn" weight="1."/>
        </continuousProjection>
        <continuousProjection id="NC_PLMR_AVAL_Glutamate" presynapticPopulation="PLMR" postsynapticPopulation="AVAL">
            <continuousConnectionInstanceW id="0" preCell="../PLMR/0/PLMR" preSegment="0" preFractionAlong="0.5" postCell="../AVAL/0/AVAL" postSegment="0" postFractionAlong="0.5" preComponent="silent" postComponent="neuron_to_neuron_exc_syn" weight="1."/>
        </continuousProjection>
        <continuousProjection id="NC_PLMR_AVAR_Glutamate" presynapticPopulation="PLMR" postsynapticPopulation="AVAR">
            <continuousConnectionInstanceW id="0" preCell="../PLMR/0/PLMR" preSegment="0" preFractionAlong="0.5" postCell="../AVAR/0/AVAR" postSegment="0" postFractionAlong="0.5" preComponent="silent" postComponent="neuron_to_neuron_exc_syn" weight="1."/>
        </continuousProjection>
        <continuousProjection id="NC_VA2_AVAL_Acetylcholine" presynapticPopulation="VA2" postsynapticPopulation="AVAL">
            <continuousConnectionInstanceW id="0" preCell="../VA2/0/VA2" preSegment="0" preFractionAlong="0.5" postCell="../AVAL/0/AVAL" postSegment="0" postFractionAlong="0.5" preComponent="silent" postComponent="neuron_to_neuron_exc_syn" weight="1."/>
        </continuousProjection>
        <continuousProjection id="NC_VA2_VA3_Acetylcholine" presynapticPopulation="VA2" postsynapticPopulation="VA3">
            <continuousConnectionInstanceW id="0" preCell="../VA2/0/VA2" preSegment="0" preFractionAlong="0.5" postCell="../VA3/0/VA3" postSegment="0" postFractionAlong="0.5" preComponent="silent" postComponent="neuron_to_neuron_exc_syn" weight="1."/>
        </continuousProjection>
        <continuousProjection id="NC_VA2_VD2_Acetylcholine" presynapticPopulation="VA2" postsynapticPopulation="VD2">
            <continuousConnectionInstanceW id="0" preCell="../VA2/0/VA2" preSegment="0" preFractionAlong="0.5" postCell="../VD2/0/VD2" postSegment="0" postFractionAlong="0.5" preComponent="silent" postComponent="neuron_to_neuron_exc_syn" weight="1."/>
        </continuousProjection>
        <continuousProjection id="NC_VA3_DD2_Acetylcholine" presynapticPopulation="VA3" postsynapticPopulation="DD2">
            <continuousConnectionInstanceW id="0" preCell="../VA3/0/VA3" preSegment="0" preFractionAlong="0.5" postCell="../DD2/0/DD2" postSegment="0" postFractionAlong="0.5" preComponent="silent" postComponent="neuron_to_neuron_exc_syn" weight="1."/>
        </continuousProjection>
        <continuousProjection id="NC_VA3_VD2_Acetylcholine" presynapticPopulation="VA3" postsynapticPopulation="VD2">
            <continuousConnectionInstanceW id="0" preCell="../VA3/0/VA3" preSegment="0" preFractionAlong="0.5" postCell="../VD2/0/VD2" postSegment="0" postFractionAlong="0.5" preComponent="silent" postComponent="neuron_to_neuron_exc_syn" weight="1."/>
        </continuousProjection>
        <continuousProjection id="NC_VA3_VD3_Acetylcholine" presynapticPopulation="VA3" postsynapticPopulation="VD3">
            <continuousConnectionInstanceW id="0" preCell="../VA3/0/VA3" preSegment="0" preFractionAlong="0.5" postCell="../VD3/0/VD3" postSegment="0" postFractionAlong="0.5" preComponent="silent" postComponent="neuron_to_neuron_exc_syn" weight="1."/>
        </continuousProjection>
        <continuousProjection id="NC_VB2_DD2_Acetylcholine" presynapticPopulation="VB2" postsynapticPopulation="DD2">
            <continuousConnectionInstanceW id="0" preCell="../VB2/0/VB2" preSegment="0" preFractionAlong="0.5" postCell="../DD2/0/DD2" postSegment="0" postFractionAlong="0.5" preComponent="silent" postComponent="neuron_to_neuron_exc_syn" weight="1."/>
        </continuousProjection>
        <continuousProjection id="NC_VB2_VA2_Acetylcholine" presynapticPopulation="VB2" postsynapticPopulation="VA2">
            <continuousConnectionInstanceW id="0" preCell="../VB2/0/VB2" preSegment="0" preFractionAlong="0.5" postCell="../VA2/0/VA2" postSegment="0" postFractionAlong="0.5" preComponent="silent" postComponent="neuron_to_neuron_exc_syn" weight="1."/>
        </continuousProjection>
        <continuousProjection id="NC_VB2_VD2_Acetylcholine" presynapticPopulation="VB2" postsynapticPopulation="VD2">
            <continuousConnectionInstanceW id="0" preCell="../VB2/0/VB2" preSegment="0" preFractionAlong="0.5" postCell="../VD2/0/VD2" postSegment="0" postFractionAlong="0.5" preComponent="silent" postComponent="neuron_to_neuron_exc_syn" weight="1."/>
        </continuousProjection>
        <continuousProjection id="NC_VB2_VD3_Acetylcholine" presynapticPopulation="VB2" postsynapticPopulation="VD3">
            <continuousConnectionInstanceW id="0" preCell="../VB2/0/VB2" preSegment="0" preFractionAlong="0.5" postCell="../VD3/0/VD3" postSegment="0" postFractionAlong="0.5" preComponent="silent" postComponent="neuron_to_neuron_exc_syn" weight="1."/>
        </continuousProjection>
        <continuousProjection id="NC_VB3_DD2_Acetylcholine" presynapticPopulation="VB3" postsynapticPopulation="DD2">
            <continuousConnectionInstanceW id="0" preCell="../VB3/0/VB3" preSegment="0" preFractionAlong="0.5" postCell="../DD2/0/DD2" postSegment="0" postFractionAlong="0.5" preComponent="silent" postComponent="neuron_to_neuron_exc_syn" weight="1."/>
        </continuousProjection>
        <inputList id="Input_PLML_offset_current" population="PLML" component="offset_current">
            <input id="0" target="../PLML/0/PLML/0" destination="synapses"/>
        </inputList>
        <inputList id="Input_PLMR_offset_current" population="PLMR" component="offset_current">
            <input id="0" target="../PLMR/0/PLMR/0" destination="synapses"/>
        </inputList>
    </network>
</neuroml>
