<neuroml xmlns="http://www.neuroml.org/schema/neuroml2"  xmlns:xs="http://www.w3.org/2001/XMLSchema" xmlns:xsi="http://www.w3.org/2001/XMLSchema-instance" xsi:schemaLocation="http://www.neuroml.org/schema/neuroml2 https://raw.github.com/NeuroML/NeuroML2/development/Schemas/NeuroML2/NeuroML_v2beta5.xsd" id="VC4">
    <cell id="VC4">
        <notes>Cell model created by c302 with custom electrical parameters</notes>
        <morphology id="morphology_VC4">
            <segment id="0" name="Seg0_soma_0">
                <proximal x="-1.150000e+00" y="4.385000e+01" z="-2.420000e+01" diameter="3.5749125"/>
                <distal x="-1.150000e+00" y="4.385000e+01" z="-2.420000e+01" diameter="3.5749125"/>
            </segment>
            <segment id="1" name="Seg0_axon_0">
                <parent segment="0" fractionAlong="1"/>
                <proximal x="-1.150000e+00" y="4.385000e+01" z="-2.420000e+01" diameter="0.46904156"/>
                <distal x="-1.150000e+00" y="4.390000e+01" z="-2.415000e+01" diameter="0.46904156"/>
            </segment>
            <segment id="2" name="Seg2_axon_0">
                <parent segment="1" fractionAlong="1"/>
                <distal x="-1.150000e+00" y="4.655000e+01" z="-2.270000e+01" diameter="0.6480741"/>
            </segment>
            <segment id="3" name="Seg3_neurite_0">
                <parent segment="2" fractionAlong="1"/>
                <proximal x="-1.150000e+00" y="4.655000e+01" z="-2.270000e+01" diameter="0.6480741"/>
                <distal x="-1.300000e+00" y="4.655000e+01" z="-2.267500e+01" diameter="0.5024938"/>
            </segment>
            <segment id="4" name="Seg4_neurite_0">
                <parent segment="3" fractionAlong="1"/>
                <distal x="-1.450000e+00" y="4.690000e+01" z="-2.240000e+01" diameter="0.41231057"/>
            </segment>
            <segment id="5" name="Seg5_neurite_0">
                <parent segment="4" fractionAlong="1"/>
                <distal x="-2.850000e+00" y="4.800000e+01" z="-2.085000e+01" diameter="0.37416574"/>
            </segment>
            <segment id="6" name="Seg6_neurite_0">
                <parent segment="5" fractionAlong="1"/>
                <distal x="-3.500000e+00" y="4.950000e+01" z="-1.790000e+01" diameter="0.28284273"/>
            </segment>
            <segment id="7" name="Seg7_neurite_0">
                <parent segment="6" fractionAlong="1"/>
                <proximal x="-3.500000e+00" y="4.950000e+01" z="-1.790000e+01" diameter="0.28284273"/>
                <distal x="-3.500000e+00" y="4.955000e+01" z="-1.765000e+01" diameter="0.37416574"/>
            </segment>
            <segment id="8" name="Seg8_neurite_0">
                <parent segment="7" fractionAlong="1"/>
                <distal x="-3.500000e+00" y="5.005000e+01" z="-1.460000e+01" diameter="0.36055514"/>
            </segment>
            <segment id="9" name="Seg9_neurite_0">
                <parent segment="8" fractionAlong="1"/>
                <distal x="-3.500000e+00" y="5.010000e+01" z="-1.435000e+01" diameter="0.3"/>
            </segment>
            <segment id="10" name="Seg10_neurite_0">
                <parent segment="6" fractionAlong="1"/>
                <proximal x="-3.500000e+00" y="4.950000e+01" z="-1.790000e+01" diameter="0.28284273"/>
                <distal x="-3.500000e+00" y="4.965000e+01" z="-1.780000e+01" diameter="0.3"/>
            </segment>
            <segment id="11" name="Seg11_neurite_0">
                <parent segment="10" fractionAlong="1"/>
                <distal x="-3.500000e+00" y="4.985000e+01" z="-1.780000e+01" diameter="0.3"/>
            </segment>
            <segment id="12" name="Seg12_neurite_0">
                <parent segment="11" fractionAlong="1"/>
                <distal x="-3.500000e+00" y="5.155000e+01" z="-1.515000e+01" diameter="0.37416574"/>
            </segment>
            <segment id="13" name="Seg13_neurite_0">
                <parent segment="12" fractionAlong="1"/>
                <distal x="-3.500000e+00" y="5.165000e+01" z="-1.410000e+01" diameter="0.36055514"/>
            </segment>
            <segment id="14" name="Seg14_neurite_0">
                <parent segment="6" fractionAlong="1"/>
                <proximal x="-3.500000e+00" y="4.950000e+01" z="-1.790000e+01" diameter="0.28284273"/>
                <distal x="-3.500000e+00" y="4.940000e+01" z="-1.775000e+01" diameter="0.36055514"/>
            </segment>
            <segment id="15" name="Seg15_neurite_0">
                <parent segment="14" fractionAlong="1"/>
                <distal x="-3.500000e+00" y="4.920000e+01" z="-1.765000e+01" diameter="0.3"/>
            </segment>
            <segment id="16" name="Seg16_neurite_0">
                <parent segment="15" fractionAlong="1"/>
                <distal x="-3.500000e+00" y="4.835000e+01" z="-1.500000e+01" diameter="0.36055514"/>
            </segment>
            <segment id="17" name="Seg17_neurite_0">
                <parent segment="16" fractionAlong="1"/>
                <distal x="-3.500000e+00" y="4.845000e+01" z="-1.400000e+01" diameter="0.36055514"/>
            </segment>
            <segment id="18" name="Seg18_neurite_0">
                <parent segment="6" fractionAlong="1"/>
                <proximal x="-3.500000e+00" y="4.950000e+01" z="-1.790000e+01" diameter="0.28284273"/>
                <distal x="-3.500000e+00" y="4.955000e+01" z="-1.765000e+01" diameter="0.37416574"/>
            </segment>
            <segment id="19" name="Seg19_neurite_0">
                <parent segment="2" fractionAlong="1"/>
                <proximal x="-1.150000e+00" y="4.655000e+01" z="-2.270000e+01" diameter="0.6480741"/>
                <distal x="-1.000000e+00" y="4.655000e+01" z="-2.270000e+01" diameter="0.45825756"/>
            </segment>
            <segment id="20" name="Seg20_neurite_0">
                <parent segment="19" fractionAlong="1"/>
                <distal x="-8.000000e-01" y="4.690000e+01" z="-2.240000e+01" diameter="0.34641016"/>
            </segment>
            <segment id="21" name="Seg21_neurite_0">
                <parent segment="20" fractionAlong="1"/>
                <distal x="6.000000e-01" y="4.800000e+01" z="-2.085000e+01" diameter="0.3"/>
            </segment>
            <segment id="22" name="Seg22_neurite_0">
                <parent segment="21" fractionAlong="1"/>
                <distal x="1.200000e+00" y="4.950000e+01" z="-1.790000e+01" diameter="0.28284273"/>
            </segment>
            <segment id="23" name="Seg23_neurite_0">
                <parent segment="22" fractionAlong="1"/>
                <proximal x="1.200000e+00" y="4.950000e+01" z="-1.790000e+01" diameter="0.28284273"/>
                <distal x="1.200000e+00" y="4.965000e+01" z="-1.780000e+01" diameter="0.3"/>
            </segment>
            <segment id="24" name="Seg24_neurite_0">
                <parent segment="23" fractionAlong="1"/>
                <distal x="1.200000e+00" y="4.985000e+01" z="-1.780000e+01" diameter="0.3"/>
            </segment>
            <segment id="25" name="Seg25_neurite_0">
                <parent segment="24" fractionAlong="1"/>
                <distal x="1.200000e+00" y="5.155000e+01" z="-1.515000e+01" diameter="0.37416574"/>
            </segment>
            <segment id="26" name="Seg26_neurite_0">
                <parent segment="25" fractionAlong="1"/>
                <distal x="1.200000e+00" y="5.165000e+01" z="-1.410000e+01" diameter="0.36055514"/>
            </segment>
            <segment id="27" name="Seg27_neurite_0">
                <parent segment="22" fractionAlong="1"/>
                <proximal x="1.200000e+00" y="4.950000e+01" z="-1.790000e+01" diameter="0.28284273"/>
                <distal x="1.200000e+00" y="4.955000e+01" z="-1.765000e+01" diameter="0.37416574"/>
            </segment>
            <segment id="28" name="Seg28_neurite_0">
                <parent segment="27" fractionAlong="1"/>
                <distal x="1.200000e+00" y="5.005000e+01" z="-1.460000e+01" diameter="0.36055514"/>
            </segment>
            <segment id="29" name="Seg29_neurite_0">
                <parent segment="28" fractionAlong="1"/>
                <distal x="1.200000e+00" y="5.010000e+01" z="-1.435000e+01" diameter="0.3"/>
            </segment>
            <segment id="30" name="Seg30_neurite_0">
                <parent segment="22" fractionAlong="1"/>
                <proximal x="1.200000e+00" y="4.950000e+01" z="-1.790000e+01" diameter="0.28284273"/>
                <distal x="1.200000e+00" y="4.940000e+01" z="-1.775000e+01" diameter="0.36055514"/>
            </segment>
            <segment id="31" name="Seg31_neurite_0">
                <parent segment="30" fractionAlong="1"/>
                <distal x="1.200000e+00" y="4.920000e+01" z="-1.765000e+01" diameter="0.3"/>
            </segment>
            <segment id="32" name="Seg32_neurite_0">
                <parent segment="31" fractionAlong="1"/>
                <distal x="1.200000e+00" y="4.835000e+01" z="-1.500000e+01" diameter="0.36055514"/>
            </segment>
            <segment id="33" name="Seg33_neurite_0">
                <parent segment="32" fractionAlong="1"/>
                <distal x="1.200000e+00" y="4.845000e+01" z="-1.400000e+01" diameter="0.36055514"/>
            </segment>
            <segment id="34" name="Seg34_neurite_0">
                <parent segment="22" fractionAlong="1"/>
                <proximal x="1.200000e+00" y="4.950000e+01" z="-1.790000e+01" diameter="0.28284273"/>
                <distal x="1.200000e+00" y="4.955000e+01" z="-1.765000e+01" diameter="0.37416574"/>
            </segment>
            <segmentGroup neuroLexId="sao864921383" id="Soma">
                <member segment="0"/>
            </segmentGroup>
            <segmentGroup neuroLexId="sao864921383" id="Axon">
                <member segment="1"/>
                <member segment="2"/>
            </segmentGroup>
            <segmentGroup neuroLexId="sao864921383" id="Neurite2">
                <member segment="3"/>
                <member segment="4"/>
                <member segment="5"/>
                <member segment="6"/>
            </segmentGroup>
            <segmentGroup neuroLexId="sao864921383" id="Neurite3">
                <member segment="7"/>
                <member segment="8"/>
                <member segment="9"/>
            </segmentGroup>
            <segmentGroup neuroLexId="sao864921383" id="Neurite4">
                <member segment="10"/>
                <member segment="11"/>
                <member segment="12"/>
                <member segment="13"/>
            </segmentGroup>
            <segmentGroup neuroLexId="sao864921383" id="Neurite5">
                <member segment="14"/>
                <member segment="15"/>
                <member segment="16"/>
                <member segment="17"/>
            </segmentGroup>
            <segmentGroup neuroLexId="sao864921383" id="Neurite6">
                <member segment="18"/>
            </segmentGroup>
            <segmentGroup neuroLexId="sao864921383" id="Neurite7">
                <member segment="19"/>
                <member segment="20"/>
                <member segment="21"/>
                <member segment="22"/>
            </segmentGroup>
            <segmentGroup neuroLexId="sao864921383" id="Neurite8">
                <member segment="23"/>
                <member segment="24"/>
                <member segment="25"/>
                <member segment="26"/>
            </segmentGroup>
            <segmentGroup neuroLexId="sao864921383" id="Neurite9">
                <member segment="27"/>
                <member segment="28"/>
                <member segment="29"/>
            </segmentGroup>
            <segmentGroup neuroLexId="sao864921383" id="Neurite10">
                <member segment="30"/>
                <member segment="31"/>
                <member segment="32"/>
                <member segment="33"/>
            </segmentGroup>
            <segmentGroup neuroLexId="sao864921383" id="Neurite11">
                <member segment="34"/>
            </segmentGroup>
            <segmentGroup id="all">
                <include segmentGroup="Soma"/>
                <include segmentGroup="Axon"/>
                <include segmentGroup="Neurite2"/>
                <include segmentGroup="Neurite3"/>
                <include segmentGroup="Neurite4"/>
                <include segmentGroup="Neurite5"/>
                <include segmentGroup="Neurite6"/>
                <include segmentGroup="Neurite7"/>
                <include segmentGroup="Neurite8"/>
                <include segmentGroup="Neurite9"/>
                <include segmentGroup="Neurite10"/>
                <include segmentGroup="Neurite11"/>
            </segmentGroup>
            <segmentGroup neuroLexId="GO:0043025" id="soma_group">
                <include segmentGroup="Soma"/>
            </segmentGroup>
            <segmentGroup neuroLexId="GO:0030424" id="axon_group">
                <include segmentGroup="Axon"/>
            </segmentGroup>
            <segmentGroup neuroLexId="GO:0030425" id="dendrite_group">
                <include segmentGroup="Neurite2"/>
                <include segmentGroup="Neurite3"/>
                <include segmentGroup="Neurite4"/>
                <include segmentGroup="Neurite5"/>
                <include segmentGroup="Neurite6"/>
                <include segmentGroup="Neurite7"/>
                <include segmentGroup="Neurite8"/>
                <include segmentGroup="Neurite9"/>
                <include segmentGroup="Neurite10"/>
                <include segmentGroup="Neurite11"/>
            </segmentGroup>
        </morphology>
        <biophysicalProperties id="biophys_VC4">
            <membraneProperties>
                <channelDensity id="Leak_all" ionChannel="Leak" condDensity="0.005 mS_per_cm2" erev="-50 mV" ion="non_specific"/>
                <channelDensity id="k_slow_all" ionChannel="k_slow" condDensity="1.8333751019872582 mS_per_cm2" erev="-60 mV" ion="k"/>
                <channelDensity id="k_fast_all" ionChannel="k_fast" condDensity="0.0711643917483308 mS_per_cm2" erev="-60 mV" ion="k"/>
                <channelDensity id="ca_boyle_all" ionChannel="ca_boyle" condDensity="1.6862775772264702 mS_per_cm2" erev="40 mV" ion="ca"/>
                <spikeThresh value="-20 mV"/>
                <specificCapacitance value="1 uF_per_cm2"/>
                <initMembPotential value="-45 mV"/>
            </membraneProperties>
            <intracellularProperties>
                <species id="ca" concentrationModel="CaPool" ion="ca" initialConcentration="0 mM" initialExtConcentration="2E-6 mol_per_cm3"/>
                <resistivity value="0.1 kohm_cm"/>
            </intracellularProperties>
        </biophysicalProperties>
    </cell>
</neuroml>
