<neuroml xmlns="http://www.neuroml.org/schema/neuroml2"  xmlns:xs="http://www.w3.org/2001/XMLSchema" xmlns:xsi="http://www.w3.org/2001/XMLSchema-instance" xsi:schemaLocation="http://www.neuroml.org/schema/neuroml2 https://raw.github.com/NeuroML/NeuroML2/development/Schemas/NeuroML2/NeuroML_v2beta5.xsd" id="PVDR">
    <cell id="PVDR">
        <notes>Cell model created by c302 with custom electrical parameters</notes>
        <morphology id="morphology_PVDR">
            <segment id="0" name="Seg0_soma_0">
                <proximal x="-2.611400e+01" y="1.751510e+02" z="2.495200e+01" diameter="4.4904957"/>
                <distal x="-2.611400e+01" y="1.751510e+02" z="2.495200e+01" diameter="4.4904957"/>
            </segment>
            <segment id="608" name="Seg0_axon_0">
                <parent segment="0" fractionAlong="1"/>
                <proximal x="-2.611400e+01" y="1.751510e+02" z="2.495200e+01" diameter="0.8336162"/>
                <distal x="-2.611400e+01" y="1.733630e+02" z="2.590500e+01" diameter="0.8336162"/>
            </segment>
            <segment id="609" name="Seg609_axon_0">
                <parent segment="608" fractionAlong="1"/>
                <distal x="-2.646400e+01" y="1.600790e+02" z="2.676300e+01" diameter="0.66747284"/>
            </segment>
            <segment id="610" name="Seg610_axon_0">
                <parent segment="609" fractionAlong="1"/>
                <distal x="-2.646400e+01" y="1.583100e+02" z="2.686300e+01" diameter="0.66747284"/>
            </segment>
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            <segmentGroup neuroLexId="sao864921383" id="Soma">
                <member segment="0"/>
            </segmentGroup>
            <segmentGroup neuroLexId="sao864921383" id="Axon">
                <member segment="608"/>
                <member segment="609"/>
                <member segment="610"/>
            </segmentGroup>
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        </morphology>
        <biophysicalProperties id="biophys_PVDR">
            <membraneProperties>
                <channelDensity id="Leak_all" ionChannel="Leak" condDensity="0.005 mS_per_cm2" erev="-50 mV" ion="non_specific"/>
                <channelDensity id="k_slow_all" ionChannel="k_slow" condDensity="1.8333751019872582 mS_per_cm2" erev="-60 mV" ion="k"/>
                <channelDensity id="k_fast_all" ionChannel="k_fast" condDensity="0.0711643917483308 mS_per_cm2" erev="-60 mV" ion="k"/>
                <channelDensity id="ca_boyle_all" ionChannel="ca_boyle" condDensity="1.6862775772264702 mS_per_cm2" erev="40 mV" ion="ca"/>
                <spikeThresh value="-20 mV"/>
                <specificCapacitance value="1 uF_per_cm2"/>
                <initMembPotential value="-45 mV"/>
            </membraneProperties>
            <intracellularProperties>
                <species id="ca" concentrationModel="CaPool" ion="ca" initialConcentration="0 mM" initialExtConcentration="2E-6 mol_per_cm3"/>
                <resistivity value="0.4 kohm_cm"/>
            </intracellularProperties>
        </biophysicalProperties>
    </cell>
</neuroml>
